# OpenSim document version 40500
Model subject_walk_contact:
  gravity: 0 -9.80665 0
  length_units: meters
  force_units: N
  credits:
    Arnold, E.M., Hamner, S.R., Ward, S.R., Lieber, R. L., and Delp, S.L.
  Ground
  BodySet:
    Body pelvis: mass=17.29544 [kg] mass_center=(-0.0879955 0 0) inertia=(0.160304 0.160304 0.081507 0 0 0)
        meshes=(r_pelvis.vtp l_pelvis.vtp sacrum.vtp)
      WrapCylinder Gmax1_at_pelvis_r: xyz_body_rotation=(-0.6 0.45 0) translation=(-0.0958367 -0.0991651 0.0730389)
          quadrant=-x radius=0.04586477 length=0.1739138
      WrapCylinder Gmax2_at_pelvis_r: xyz_body_rotation=(-0.75 0.39 0) translation=(-0.0995706 -0.0831384 0.0814204)
          quadrant=all radius=0.04646248 length=0.1131066
      WrapCylinder Gmax3_at_pelvis_r: xyz_body_rotation=(-0.1 0 0) translation=(-0.103304 -0.0881467 0.0814204)
          quadrant=all radius=0.04496876 length=0.1195566
      WrapCylinder Gmax1_at_pelvis_l: xyz_body_rotation=(0.6 -0.45 0) translation=(-0.0958367 -0.0991651 -0.0730389)
          quadrant=-x radius=0.04586477 length=0.1739138
      WrapCylinder Gmax2_at_pelvis_l: xyz_body_rotation=(0.75 -0.39 0) translation=(-0.0995706 -0.0831384 -0.0814204)
          quadrant=all radius=0.04646248 length=0.1131066
      WrapCylinder Gmax3_at_pelvis_l: xyz_body_rotation=(0.1 0 0) translation=(-0.103304 -0.0881467 -0.0814204)
          quadrant=all radius=0.04496876 length=0.1195566
      WrapCylinder PS_at_brim_r: xyz_body_rotation=(-0.25 -0.27 0.1) translation=(-0.0921028 -0.0601 0.0785467)
          quadrant=-y radius=0.05640571 length=0.1190552
      WrapCylinder PS_at_brim_l: xyz_body_rotation=(0.25 0.27 0.1) translation=(-0.0921028 -0.0601 -0.0785467)
          quadrant=-y radius=0.05640571 length=0.1190552
      WrapCylinder IL_at_brim_r: xyz_body_rotation=(-0.32 -0.24 0.9) translation=(-0.0883689 -0.0651084 0.0905203)
          quadrant=-y radius=0.0623936 length=0.1183222
      WrapCylinder IL_at_brim_l: xyz_body_rotation=(0.32 0.24 0.9) translation=(-0.0883689 -0.0651084 -0.0905203)
          quadrant=-y radius=0.0623936 length=0.1183222
    Body femur_r: mass=10.50065 mass_center=(0 -0.16286 0) inertia=(0.13876 0.0363739 0.146325 0 0 0)
        meshes=r_femur.vtp
      WrapCylinder Gastroc_at_condyles_r: translation=(0.00479 -0.39278 0) quadrant=all radius=0.02395 length=0.0958
      WrapCylinder KnExt_at_fem_r: xyz_body_rotation=(-0.0623366 0.0507601 0)
          translation=(0.00343757 -0.385817 0.00200328) quadrant=all radius=0.02395 length=0.0958
      WrapCylinder AB_at_femshaft_r: xyz_body_rotation=(1.66157 0.186644 0) translation=(0.0140284 -0.107866 0.0223837)
          quadrant=all radius=0.015807 length=0.06706
      WrapCylinder AL_at_femshaft_r: xyz_body_rotation=(1.77711 0.136489 0) translation=(0.0294419 -0.222169 0.0144789)
          quadrant=all radius=0.0192558 length=0.0958
      WrapCylinder AMprox_at_femshaft_r: xyz_body_rotation=(1.61126 0.18656 0)
          translation=(0.0049653 -0.0698332 0.0243361) quadrant=all radius=0.0202138 length=0.06706
      WrapCylinder AMmid_at_femshaft_r: xyz_body_rotation=(1.61139 0.13656 0)
          translation=(0.022046 -0.153961 0.0197197) quadrant=all radius=0.0205012 length=0.11496
      WrapCylinder AMdist_at_femshaft_r: xyz_body_rotation=(1.71188 0.186636 0)
          translation=(0.030279 -0.249785 0.00897129) quadrant=all radius=0.0208844 length=0.1916
      WrapCylinder AMisch_at_condyles_r: xyz_body_rotation=(1.71115 -0.463363 0)
          translation=(-0.0216998 -0.361004 -0.00302189) quadrant=all radius=0.03832 length=0.22992
      WrapCylinder PECT_at_femshaft_r: xyz_body_rotation=(1.81295 0.276344 0)
          translation=(0.00583013 -0.0809538 0.029162) quadrant=all radius=0.01437 length=0.0479
    Body tibia_r: mass=4.185518 mass_center=(0 -0.214518 0) inertia=(0.0751316 0.0076026 0.076175 0 0 0)
        meshes=(r_tibia.vtp r_fibula.vtp)
      WrapCylinder GasLat_at_shank_r: xyz_body_rotation=(2.96723 -0.279725 -1.47812)
          translation=(-0.0085026 -0.085026 -0.0037917) quadrant=-y radius=0.063195 length=0.1149
      WrapCylinder GasMed_at_shank_r: xyz_body_rotation=(2.96723 0.0279725 -1.47812)
          translation=(-0.0085026 -0.085026 -0.0037917) quadrant=-y radius=0.063195 length=0.1149
      WrapCylinder GR_at_condyles_r: xyz_body_rotation=(0 -0.4 0) translation=(-0.003447 -0.02298 0) quadrant=all
          radius=0.041364 length=0.1149
      WrapCylinder SM_at_condyles_r: xyz_body_rotation=(0 -0.1 0) translation=(-0.001149 -0.02298 0) quadrant=all
          radius=0.0404448 length=0.1149
      WrapCylinder ST_at_condyles_r: xyz_body_rotation=(0 -0.2 0) translation=(-0.002298 -0.0235545 0) quadrant=all
          radius=0.0488325 length=0.1149
      WrapCylinder BF_at_gastroc_r: translation=(-0.066642 -0.06894 0) quadrant=y radius=0.03447 length=0.17235
    Body patella_r: mass=0.09731399 mass_center=(0.0017244 0.0252912 0)
        inertia=(2.97416e-6 1.35858e-5 1.35858e-5 0 0 0) meshes=r_patella.vtp
    Body talus_r: mass=0.1128933 mass_center=(0 0 0) inertia=(0.00280824 0.00214191 0.00214191 0 0 0)
        meshes=r_talus.vtp
    Body calcn_r: mass=1.411166 mass_center=(0.114316 0.0498228 0) inertia=(0.00393153 0.00668762 0.00668762 0 0 0)
        meshes=r_foot.vtp
    Body toes_r: mass=0.2445268 mass_center=(0.0395532 0.00996457 -0.0262067)
        inertia=(0.000280824 0.000361749 0.000361749 0 0 0) meshes=r_bofoot.vtp
    Body femur_l: mass=10.50065 mass_center=(0 -0.16286 0) inertia=(0.13876 0.0363739 0.146325 0 0 0)
        meshes=l_femur.vtp
      WrapCylinder Gastroc_at_condyles_l: translation=(0.00479 -0.39278 0) quadrant=all radius=0.02395 length=0.0958
      WrapCylinder KnExt_at_fem_l: xyz_body_rotation=(0.0623366 -0.0507601 0)
          translation=(0.00343757 -0.385817 -0.00200328) quadrant=all radius=0.02395 length=0.0958
      WrapCylinder AB_at_femshaft_l: xyz_body_rotation=(-1.66157 -0.186644 0)
          translation=(0.0140284 -0.107866 -0.0223837) quadrant=all radius=0.015807 length=0.06706
      WrapCylinder AL_at_femshaft_l: xyz_body_rotation=(-1.77711 -0.136489 0)
          translation=(0.0294419 -0.222169 -0.0144789) quadrant=all radius=0.0192558 length=0.0958
      WrapCylinder AMprox_at_femshaft_l: xyz_body_rotation=(-1.61126 -0.18656 0)
          translation=(0.0049653 -0.0698332 -0.0243361) quadrant=all radius=0.0202138 length=0.06706
      WrapCylinder AMmid_at_femshaft_l: xyz_body_rotation=(-1.61139 -0.13656 0)
          translation=(0.022046 -0.153961 -0.0197197) quadrant=all radius=0.0205012 length=0.11496
      WrapCylinder AMdist_at_femshaft_l: xyz_body_rotation=(-1.71188 -0.186636 0)
          translation=(0.030279 -0.249785 -0.00897129) quadrant=all radius=0.0208844 length=0.1916
      WrapCylinder AMisch_at_condyles_l: xyz_body_rotation=(-1.71115 0.463363 0)
          translation=(-0.0216998 -0.361004 0.00302189) quadrant=all radius=0.03832 length=0.22992
      WrapCylinder PECT_at_femshaft_l: xyz_body_rotation=(-1.81295 -0.276344 0)
          translation=(0.00583013 -0.0809538 -0.029162) quadrant=all radius=0.01437 length=0.0479
    Body tibia_l: mass=4.185518 mass_center=(0 -0.214518 0) inertia=(0.0751316 0.0076026 0.076175 0 0 0)
        meshes=(l_tibia.vtp l_fibula.vtp)
      WrapCylinder GasLat_at_shank_l: xyz_body_rotation=(-2.96723 0.279725 -1.47812)
          translation=(-0.0085026 -0.085026 0.0037917) quadrant=-y radius=0.063195 length=0.1149
      WrapCylinder GasMed_at_shank_l: xyz_body_rotation=(-2.96723 -0.0279725 -1.47812)
          translation=(-0.0085026 -0.085026 0.0037917) quadrant=-y radius=0.063195 length=0.1149
      WrapCylinder GR_at_condyles_l: xyz_body_rotation=(0 0.4 0) translation=(-0.003447 -0.02298 0) quadrant=all
          radius=0.041364 length=0.1149
      WrapCylinder SM_at_condyles_l: xyz_body_rotation=(0 0.1 0) translation=(-0.001149 -0.02298 0) quadrant=all
          radius=0.0404448 length=0.1149
      WrapCylinder ST_at_condyles_l: xyz_body_rotation=(0 0.2 0) translation=(-0.002298 -0.0235545 0) quadrant=all
          radius=0.0488325 length=0.1149
      WrapCylinder BF_at_gastroc_l: translation=(-0.066642 -0.06894 0) quadrant=all radius=0.03447 length=0.17235
    Body patella_l: mass=0.09731399 mass_center=(0.0017244 0.0252912 0)
        inertia=(2.97416e-6 1.35858e-5 1.35858e-5 0 0 0) meshes=l_patella.vtp
    Body talus_l: mass=0.1128933 mass_center=(0 0 0) inertia=(0.00280824 0.00214191 0.00214191 0 0 0)
        meshes=l_talus.vtp
    Body calcn_l: mass=1.411166 mass_center=(0.114316 0.0498228 0) inertia=(0.00393153 0.00668762 0.00668762 0 0 0)
        meshes=l_foot.vtp
    Body toes_l: mass=0.2445268 mass_center=(0.0395532 0.00996457 0.0262067)
        inertia=(0.000280824 0.000361749 0.000361749 0 0 0) meshes=l_bofoot.vtp
    Body torso: mass=34.28542 mass_center=(-0.0147068 0.376899 -0.00230561) inertia=(2.34257 1.24925 2.34257 0 0 0)
        meshes=(hat_spine.vtp hat_jaw.vtp hat_skull.vtp hat_ribs_scap.vtp)
    Body exo_back: mass=1 mass_center=(0 0 0) inertia=(0.1 0.1 0.1 0 0 0)
      Brick exo_back_geom_1: half_lengths=(0.01 0.05 0.05)
    Body exo_back_2_waist: mass=1 mass_center=(0 0 0) inertia=(0.1 0.1 0.1 0 0 0)
      Brick exo_back_2_waist_geom_1: half_lengths=(0.01 0.04244565 0.01)
    Body exo_waist: mass=1 mass_center=(0 0 0) inertia=(0.1 0.1 0.1 0 0 0)
      Brick exo_waist_geom_1: half_lengths=(0.02 0.01 0.2054522)
    Body exo_w2h_R: mass=0 mass_center=(0 0 0) inertia=(0 0 0 0 0 0)
      Brick exo_w2h_R_geom_1: half_lengths=(0.1039491 0.01 0.01)
    Body exo_w2h_L: mass=0 mass_center=(0 0 0) inertia=(0 0 0 0 0 0)
      Brick exo_w2h_L_geom_1: half_lengths=(0.1039491 0.01 0.01)
    Body exo_waist_2_thigh_R: mass=1 mass_center=(0 0 0) inertia=(0.1 0.1 0.1 0 0 0)
      Cylinder exo_waist_2_thigh_R_geom_1: radius=0.01 half_height=-0.09257405
    Body exo_R_thigh: mass=1 mass_center=(0 0 0) inertia=(0.1 0.1 0.1 0 0 0)
      Cylinder exo_R_thigh_geom_1: radius=0.01 half_height=0.203516
    Body exo_R_shank: mass=1 mass_center=(0 0 0) inertia=(0.1 0.1 0.1 0 0 0)
      Cylinder exo_R_shank_geom_1: radius=0.01 half_height=0.220894
    Body exo_R_feet: mass=1 mass_center=(0 0 0) inertia=(0.1 0.1 0.1 0 0 0)
      PhysicalOffsetFrame calcn_weld_frame_r: socket_parent=.. translation=(-0.0557517 0.0225978 0.0118604) [meters]
          orientation=(-1.76819 0.906223 1.8196) [radians]
      Brick exo_R_feet_geom_1: half_lengths=(0.1 0.001 0.1)
    Body exo_waist_2_thigh_L: mass=1 mass_center=(0 0 0) inertia=(0.1 0.1 0.1 0 0 0)
      Cylinder exo_waist_2_thigh_L_geom_1: radius=0.01 half_height=-0.09257405
    Body exo_L_thigh: mass=1 mass_center=(0 0 0) inertia=(0.1 0.1 0.1 0 0 0)
      Cylinder exo_L_thigh_geom_1: radius=0.01 half_height=0.203516
    Body exo_L_shank: mass=1 mass_center=(0 0 0) inertia=(0.1 0.1 0.1 0 0 0)
      Cylinder exo_L_shank_geom_1: radius=0.01 half_height=0.220894
    Body exo_L_feet: mass=1 mass_center=(0 0 0) inertia=(0.1 0.1 0.1 0 0 0)
      PhysicalOffsetFrame calcn_weld_frame_l: socket_parent=.. translation=(-0.0557517 0.0225978 -0.0118604)
          orientation=(1.76819 -0.906223 1.8196)
      Brick exo_L_feet_geom_1: half_lengths=(0.1 0.001 0.1)
  JointSet:
    CustomJoint ground_pelvis: socket_parent_frame=ground_offset socket_child_frame=pelvis_offset
      Coordinate pelvis_tilt: default_value=0 range=(-1.570796 1.570796) clamped=true
      Coordinate pelvis_list: default_value=0 range=(-1.570796 1.570796) clamped=true
      Coordinate pelvis_rotation: default_value=0 range=(-1.570796 1.570796) clamped=true
      Coordinate pelvis_tx: default_value=0 range=(-5 5) clamped=true
      Coordinate pelvis_ty: default_value=0.93 range=(-1 2) clamped=true
      Coordinate pelvis_tz: default_value=0 range=(-3 3) clamped=true
      PhysicalOffsetFrame ground_offset: socket_parent=/ground translation=(0 0 0)
      PhysicalOffsetFrame pelvis_offset: socket_parent=/bodyset/pelvis translation=(0 0 0)
      SpatialTransform:
        TransformAxis rotation1: coordinates=pelvis_tilt axis=(0 0 1) LinearFunction(coefficients=1 0)
        TransformAxis rotation2: coordinates=pelvis_list axis=(1 0 0) LinearFunction(coefficients=1 0)
        TransformAxis rotation3: coordinates=pelvis_rotation axis=(0 1 0) LinearFunction(coefficients=1 0)
        TransformAxis translation1: coordinates=pelvis_tx axis=(1 0 0) LinearFunction(coefficients=1 0)
        TransformAxis translation2: coordinates=pelvis_ty axis=(0 1 0) LinearFunction(coefficients=1 0)
        TransformAxis translation3: coordinates=pelvis_tz axis=(0 0 1) LinearFunction(coefficients=1 0)
    CustomJoint hip_r: socket_parent_frame=pelvis_offset socket_child_frame=femur_r_offset
      Coordinate hip_flexion_r: default_value=0 range=(-0.5235988 2.094395) clamped=true
      Coordinate hip_adduction_r: default_value=0 range=(-0.8726646 0.5235988) clamped=true
      Coordinate hip_rotation_r: default_value=0 range=(-0.6981317 0.6981317) clamped=true
      PhysicalOffsetFrame pelvis_offset: socket_parent=/bodyset/pelvis translation=(-0.0700429 -0.0786209 0.0925079)
      PhysicalOffsetFrame femur_r_offset: socket_parent=/bodyset/femur_r translation=(0 0 0)
      SpatialTransform: axes_held_at_zero=(translation1 translation2 translation3)
        TransformAxis rotation1: coordinates=hip_flexion_r axis=(0 0 1) LinearFunction(coefficients=1 0)
        TransformAxis rotation2: coordinates=hip_adduction_r axis=(1 0 0) LinearFunction(coefficients=1 0)
        TransformAxis rotation3: coordinates=hip_rotation_r axis=(0 1 0) LinearFunction(coefficients=1 0)
    CustomJoint walker_knee_r: socket_parent_frame=femur_r_offset socket_child_frame=tibia_r_offset
      Coordinate knee_angle_r: default_value=0 range=(0 2.0944) clamped=true
      PhysicalOffsetFrame femur_r_offset: socket_parent=/bodyset/femur_r translation=(-0.00775022 -0.390826 -0.0026345)
          orientation=(-1.64157 1.44618 1.5708)
      PhysicalOffsetFrame tibia_r_offset: socket_parent=/bodyset/tibia_r
          translation=(-0.00929488 -0.00406149 -0.00170597) orientation=(-1.64157 1.44618 1.5708)
      SpatialTransform: axes_held_at_zero=translation3
        TransformAxis rotation1: coordinates=knee_angle_r axis=(1 0 0) LinearFunction(coefficients=1 0)
        TransformAxis rotation2: coordinates=knee_angle_r axis=(0 0 1)
          SimmSpline: x=(0 0.174533 0.349066 0.523599 0.698132 0.872665 1.0472 1.22173 1.39626 1.5708 1.74533 1.91986 2.0944)
              y=(0 0.0126809 0.0226969 0.0296054 0.0332049 0.0335354 0.0308779 0.0257548 0.0189295 0.011407 0.00443314 -0.00050475 -0.0016782)
        TransformAxis rotation3: coordinates=knee_angle_r axis=(0 1 0)
          SimmSpline: x=(0 0.174533 0.349066 0.523599 0.698132 0.872665 1.0472 1.22173 1.39626 1.5708 1.74533 1.91986 2.0944)
              y=(0 0.059461 0.109399 0.150618 0.18392 0.210107 0.229983 0.24435 0.254012 0.25977 0.262428 0.262788 0.261654)
        TransformAxis translation1: coordinates=knee_angle_r axis=(0 1 0)
          MultiplierFunction: scale=0.958
            SimmSpline: x=(0 0.174533 0.349066 0.523599 0.698132 0.872665 1.0472 1.22173 1.39626 1.5708 1.74533 1.91986 2.0944)
                y=(0 0.000479 0.000835 0.001086 0.001251 0.001346 0.001391 0.001403 0.0014 0.0014 0.001421 0.001481 0.001599)
        TransformAxis translation2: coordinates=knee_angle_r axis=(0 0 1)
          MultiplierFunction: scale=0.958
            SimmSpline: x=(0 0.174533 0.349066 0.523599 0.698132 0.872665 1.0472 1.22173 1.39626 1.5708 1.74533 1.91986 2.0944)
                y=(0 0.000988 0.001899 0.002734 0.003492 0.004173 0.004777 0.005305 0.005756 0.00613 0.006427 0.006648 0.006792)
    CustomJoint patellofemoral_r: socket_parent_frame=femur_r_offset socket_child_frame=patella_r_offset
      Coordinate knee_angle_r_beta: default_value=0 range=(-99999.9 99999.9) clamped=false
      PhysicalOffsetFrame femur_r_offset: socket_parent=/bodyset/femur_r translation=(-0.00775022 -0.390826 -0.0026345)
      PhysicalOffsetFrame patella_r_offset: socket_parent=/bodyset/patella_r translation=(0 0 0)
      SpatialTransform: axes_held_at_zero=(rotation2 rotation3)
        TransformAxis rotation1: coordinates=knee_angle_r_beta axis=(0 0 1)
          SimmSpline: x=(0 0.174533 0.349066 0.523599 0.698132 0.872665 1.0472 1.22173 1.39626 1.5708 1.74533 1.91986 2.0944)
              y=(0.00113686 -0.00629212 -0.105582 -0.253683 -0.414245 -0.579047 -0.747244 -0.91799 -1.09044 -1.26379 -1.43763 -1.61186 -1.78634)
        TransformAxis translation1: coordinates=knee_angle_r_beta axis=(1 0 0)
          MultiplierFunction: scale=0.958
            SimmSpline f9: x=(0 0.174533 0.349066 0.523599 0.698132 0.872665 1.0472 1.22173 1.39626 1.5708 1.74533 1.91986 2.0944)
                y=(0.0524 0.0488 0.0437 0.0371 0.0296 0.0216 0.0136 0.0057 -0.0019 -0.0088 -0.0148 -0.0196 -0.0227)
        TransformAxis translation2: coordinates=knee_angle_r_beta axis=(0 1 0)
          MultiplierFunction: scale=0.958
            SimmSpline f10: x=(0 0.174533 0.349066 0.523599 0.698132 0.872665 1.0472 1.22173 1.39626 1.5708 1.74533 1.91986 2.0944)
                y=(-0.0108 -0.019 -0.0263 -0.0322 -0.0367 -0.0395 -0.0408 -0.0404 -0.0384 -0.0349 -0.0301 -0.0245 -0.0187)
        TransformAxis translation3: axis=(0 0 1) MultiplierFunction(scale=0.958, Constant(value=0.00275))
    PinJoint ankle_r: socket_parent_frame=tibia_r_offset socket_child_frame=talus_r_offset
      Coordinate ankle_angle_r: default_value=0 range=(-0.4 0.4) clamped=true
      PhysicalOffsetFrame tibia_r_offset: socket_parent=/bodyset/tibia_r translation=(-0.01149 -0.4596 0)
          orientation=(0.175895 -0.105208 0.0186622)
      PhysicalOffsetFrame talus_r_offset: socket_parent=/bodyset/talus_r translation=(0 0 0)
          orientation=(0.175895 -0.105208 0.0186622)
    CustomJoint hip_l: socket_parent_frame=pelvis_offset socket_child_frame=femur_l_offset
      Coordinate hip_flexion_l: default_value=0 range=(-0.5235988 2.094395) clamped=true
      Coordinate hip_adduction_l: default_value=0 range=(-0.8726646 0.5235988) clamped=true
      Coordinate hip_rotation_l: default_value=0 range=(-0.6981317 0.6981317) clamped=true
      PhysicalOffsetFrame pelvis_offset: socket_parent=/bodyset/pelvis translation=(-0.0700429 -0.0786209 -0.0925079)
      PhysicalOffsetFrame femur_l_offset: socket_parent=/bodyset/femur_l translation=(0 0 0)
      SpatialTransform: axes_held_at_zero=(translation1 translation2 translation3)
        TransformAxis rotation1: coordinates=hip_flexion_l axis=(0 0 1) LinearFunction(coefficients=1 0)
        TransformAxis rotation2: coordinates=hip_adduction_l axis=(1 0 0) LinearFunction(coefficients=-1 0)
        TransformAxis rotation3: coordinates=hip_rotation_l axis=(0 1 0) LinearFunction(coefficients=-1 0)
    CustomJoint walker_knee_l: socket_parent_frame=femur_l_offset socket_child_frame=tibia_l_offset
      Coordinate knee_angle_l: default_value=0 range=(0 2.0944) clamped=true
      PhysicalOffsetFrame femur_l_offset: socket_parent=/bodyset/femur_l translation=(-0.00775022 -0.390826 0.0026345)
          orientation=(1.64157 -1.44618 1.5708)
      PhysicalOffsetFrame tibia_l_offset: socket_parent=/bodyset/tibia_l
          translation=(-0.00929488 -0.00406149 0.00170597) orientation=(1.64157 -1.44618 1.5708)
      SpatialTransform: axes_held_at_zero=translation3
        TransformAxis rotation1: coordinates=knee_angle_l axis=(-1 0 0) LinearFunction(coefficients=1 0)
        TransformAxis rotation2: coordinates=knee_angle_l axis=(0 0 1)
          SimmSpline: x=(0 0.174533 0.349066 0.523599 0.698132 0.872665 1.0472 1.22173 1.39626 1.5708 1.74533 1.91986 2.0944)
              y=(0 0.0126809 0.0226969 0.0296054 0.0332049 0.0335354 0.0308779 0.0257548 0.0189295 0.011407 0.00443314 -0.00050475 -0.0016782)
        TransformAxis rotation3: coordinates=knee_angle_l axis=(0 1 0)
          SimmSpline: x=(0 0.174533 0.349066 0.523599 0.698132 0.872665 1.0472 1.22173 1.39626 1.5708 1.74533 1.91986 2.0944)
              y=(0 -0.059461 -0.109399 -0.150618 -0.18392 -0.210107 -0.229983 -0.24435 -0.254012 -0.25977 -0.262428 -0.262788 -0.261654)
        TransformAxis translation1: coordinates=knee_angle_l axis=(0 1 0)
          MultiplierFunction: scale=0.958
            SimmSpline: x=(0 0.174533 0.349066 0.523599 0.698132 0.872665 1.0472 1.22173 1.39626 1.5708 1.74533 1.91986 2.0944)
                y=(0 0.000479 0.000835 0.001086 0.001251 0.001346 0.001391 0.001403 0.0014 0.0014 0.001421 0.001481 0.001599)
        TransformAxis translation2: coordinates=knee_angle_l axis=(0 0 1)
          MultiplierFunction: scale=0.958
            SimmSpline: x=(0 0.174533 0.349066 0.523599 0.698132 0.872665 1.0472 1.22173 1.39626 1.5708 1.74533 1.91986 2.0944)
                y=(0 -0.000988 -0.001899 -0.002734 -0.003492 -0.004173 -0.004777 -0.005305 -0.005756 -0.00613 -0.006427 -0.006648 -0.006792)
    CustomJoint patellofemoral_l: socket_parent_frame=femur_l_offset socket_child_frame=patella_l_offset
      Coordinate knee_angle_l_beta: default_value=0 range=(-99999.9 99999.9) clamped=false
      PhysicalOffsetFrame femur_l_offset: socket_parent=/bodyset/femur_l translation=(-0.00775022 -0.390826 0.0026345)
      PhysicalOffsetFrame patella_l_offset: socket_parent=/bodyset/patella_l translation=(0 0 0)
      SpatialTransform: axes_held_at_zero=(rotation2 rotation3)
        TransformAxis rotation1: coordinates=knee_angle_l_beta axis=(0 0 1)
          SimmSpline: x=(0 0.174533 0.349066 0.523599 0.698132 0.872665 1.0472 1.22173 1.39626 1.5708 1.74533 1.91986 2.0944)
              y=(0.00113686 -0.00629212 -0.105582 -0.253683 -0.414245 -0.579047 -0.747244 -0.91799 -1.09044 -1.26379 -1.43763 -1.61186 -1.78634)
        TransformAxis translation1: coordinates=knee_angle_l_beta axis=(1 0 0)
          MultiplierFunction: scale=0.958
            SimmSpline f23: x=(0 0.174533 0.349066 0.523599 0.698132 0.872665 1.0472 1.22173 1.39626 1.5708 1.74533 1.91986 2.0944)
                y=(0.0524 0.0488 0.0437 0.0371 0.0296 0.0216 0.0136 0.0057 -0.0019 -0.0088 -0.0148 -0.0196 -0.0227)
        TransformAxis translation2: coordinates=knee_angle_l_beta axis=(0 1 0)
          MultiplierFunction: scale=0.958
            SimmSpline f24: x=(0 0.174533 0.349066 0.523599 0.698132 0.872665 1.0472 1.22173 1.39626 1.5708 1.74533 1.91986 2.0944)
                y=(-0.0108 -0.019 -0.0263 -0.0322 -0.0367 -0.0395 -0.0408 -0.0404 -0.0384 -0.0349 -0.0301 -0.0245 -0.0187)
        TransformAxis translation3: axis=(0 0 1) MultiplierFunction(scale=0.958, Constant(value=-0.00275))
    PinJoint ankle_l: socket_parent_frame=tibia_l_offset socket_child_frame=talus_l_offset
      Coordinate ankle_angle_l: default_value=0 range=(-0.4 0.4) clamped=true
      PhysicalOffsetFrame tibia_l_offset: socket_parent=/bodyset/tibia_l translation=(-0.01149 -0.4596 0)
          orientation=(-0.175895 0.105208 0.0186622)
      PhysicalOffsetFrame talus_l_offset: socket_parent=/bodyset/talus_l translation=(0 0 0)
          orientation=(-0.175895 0.105208 0.0186622)
    WeldJoint mtp_l: socket_parent_frame=calcn_l_offset socket_child_frame=toes_l_offset
      PhysicalOffsetFrame calcn_l_offset: socket_parent=/bodyset/calcn_l translation=(0.204396 -0.00332152 -0.00161733)
          orientation=(-3.14159 -0.619901 0)
      PhysicalOffsetFrame toes_l_offset: socket_parent=/bodyset/toes_l translation=(0 0 0)
          orientation=(-3.14159 -0.619901 0)
    WeldJoint mtp_r: socket_parent_frame=calcn_r_offset socket_child_frame=toes_r_offset
      PhysicalOffsetFrame calcn_r_offset: socket_parent=/bodyset/calcn_r translation=(0.204396 -0.00332152 0.00161733)
          orientation=(-3.14159 0.619901 0)
      PhysicalOffsetFrame toes_r_offset: socket_parent=/bodyset/toes_r translation=(0 0 0)
          orientation=(-3.14159 0.619901 0)
    WeldJoint back: socket_parent_frame=pelvis_offset socket_child_frame=torso_offset
      PhysicalOffsetFrame pelvis_offset: socket_parent=/bodyset/pelvis translation=(-0.125334 0.0816359 0)
      PhysicalOffsetFrame torso_offset: socket_parent=/bodyset/torso translation=(0 0 0)
    WeldJoint subtalar_r: socket_parent_frame=talus_r_offset socket_child_frame=calcn_r_offset
      PhysicalOffsetFrame talus_r_offset: socket_parent=/bodyset/talus_r translation=(-0.0557517 -0.0696689 0.0118604)
          orientation=(-1.76819 0.906223 1.8196)
      PhysicalOffsetFrame calcn_r_offset: socket_parent=/bodyset/calcn_r translation=(0 0 0)
          orientation=(-1.76819 0.906223 1.8196)
    WeldJoint subtalar_l: socket_parent_frame=talus_l_offset socket_child_frame=calcn_l_offset
      PhysicalOffsetFrame talus_l_offset: socket_parent=/bodyset/talus_l translation=(-0.0557517 -0.0696689 -0.0118604)
          orientation=(1.76819 -0.906223 1.8196)
      PhysicalOffsetFrame calcn_l_offset: socket_parent=/bodyset/calcn_l translation=(0 0 0)
          orientation=(1.76819 -0.906223 1.8196)
    WeldJoint exo_back_2_human: socket_parent_frame=torso_offset socket_child_frame=exo_back_offset
      PhysicalOffsetFrame torso_offset: socket_parent=/bodyset/torso translation=(0 0 0)
      PhysicalOffsetFrame exo_back_offset: socket_parent=/bodyset/exo_back translation=(0.1087 -0.1697826 0)
    PinJoint exo_b2w_bjoint: socket_parent_frame=exo_back_offset socket_child_frame=exo_back_2_waist_offset
      Coordinate exo_b2w_bjoint_coord_0: range=(-10 3.5) clamped=true
      PhysicalOffsetFrame exo_back_offset: socket_parent=/bodyset/exo_back translation=(0 -0.05 0)
      PhysicalOffsetFrame exo_back_2_waist_offset: socket_parent=/bodyset/exo_back_2_waist translation=(0 0.04244565 0)
    PinJoint exo_b2w_wjoint: socket_parent_frame=exo_back_2_waist_offset socket_child_frame=exo_waist_offset
      Coordinate exo_b2w_wjoint_coord_0: range=(-10 3.5) clamped=true
      PhysicalOffsetFrame exo_back_2_waist_offset: socket_parent=/bodyset/exo_back_2_waist
          translation=(0 -0.04244565 0)
      PhysicalOffsetFrame exo_waist_offset: socket_parent=/bodyset/exo_waist translation=(0 0.01 0)
    WeldJoint exo_waist2_w2h_R: socket_parent_frame=exo_waist_offset socket_child_frame=exo_w2h_R_offset
      PhysicalOffsetFrame exo_waist_offset: socket_parent=/bodyset/exo_waist translation=(0.1039491 0 0.1954522)
      PhysicalOffsetFrame exo_w2h_R_offset: socket_parent=/bodyset/exo_w2h_R translation=(0 0 0)
    WeldJoint exo_waist2_w2h_L: socket_parent_frame=exo_waist_offset socket_child_frame=exo_w2h_L_offset
      PhysicalOffsetFrame exo_waist_offset: socket_parent=/bodyset/exo_waist translation=(0.1039491 0 -0.1954522)
      PhysicalOffsetFrame exo_w2h_L_offset: socket_parent=/bodyset/exo_w2h_L translation=(0 0 0)
    CustomJoint exo_hip_AR_joint_R: socket_parent_frame=exo_w2h_R_offset socket_child_frame=exo_waist_2_thigh_R_offset
      Coordinate exo_hip_adduction_R: range=(-1.8 1.52) clamped=true
      Coordinate exo_hip_rot_R: range=(-1.69 1.69) clamped=true
      PhysicalOffsetFrame exo_w2h_R_offset: socket_parent=/bodyset/exo_w2h_R translation=(0.060042 0 0)
      PhysicalOffsetFrame exo_waist_2_thigh_R_offset: socket_parent=/bodyset/exo_waist_2_thigh_R
          translation=(0 0.09257405 0)
      SpatialTransform:
        TransformAxis rotation1: coordinates=exo_hip_adduction_R axis=(1 0 0) LinearFunction(coefficients=1 0)
        TransformAxis rotation2: coordinates=exo_hip_rot_R axis=(0 1 0) LinearFunction(coefficients=1 0)
        TransformAxis rotation3: axis=(0 0 1)
        TransformAxis translation1: axis=(1 0 0)
        TransformAxis translation2: axis=(0 1 0)
        TransformAxis translation3: axis=(0 0 1)
    PinJoint exo_hipF_joint_R: socket_parent_frame=exo_waist_2_thigh_R_offset socket_child_frame=exo_R_thigh_offset
      Coordinate exo_hipF_joint_R_coord_0: range=(-1.5 3.1) clamped=true
      PhysicalOffsetFrame exo_waist_2_thigh_R_offset: socket_parent=/bodyset/exo_waist_2_thigh_R
          translation=(0 -0.09257405 -1.387779e-17)
      PhysicalOffsetFrame exo_R_thigh_offset: socket_parent=/bodyset/exo_R_thigh translation=(0 0.193516 0)
    PinJoint exo_knee_joint_R: socket_parent_frame=exo_R_thigh_offset socket_child_frame=exo_R_shank_offset
      Coordinate exo_knee_joint_R_coord_0: range=(-1 3.5) clamped=true
      PhysicalOffsetFrame exo_R_thigh_offset: socket_parent=/bodyset/exo_R_thigh
          translation=(-0.00775022 -0.19731 -0.0026345) orientation=(-3.141593 1.224647e-16 -3.141593)
      PhysicalOffsetFrame exo_R_shank_offset: socket_parent=/bodyset/exo_R_shank translation=(0 0.210894 0)
          orientation=(-3.141593 1.224647e-16 -3.141593)
    CustomJoint exo_ankle_joint_R: socket_parent_frame=exo_R_shank_offset socket_child_frame=exo_R_feet_offset
      Coordinate q_rz: range=(-1.8 1.8) clamped=true
      Coordinate q_ry: range=(-1.69 1.69) clamped=true
      PhysicalOffsetFrame exo_R_shank_offset: socket_parent=/bodyset/exo_R_shank
          translation=(-0.00219512 -0.2446445 -0.1012383) orientation=(0 0 -1.047198)
      PhysicalOffsetFrame exo_R_feet_offset: socket_parent=/bodyset/exo_R_feet translation=(0 0.0922667 0)
          orientation=(0 0 -1.047198)
      SpatialTransform:
        TransformAxis rotation1: coordinates=q_rz axis=(0 0 1) LinearFunction(coefficients=1 0)
        TransformAxis rotation2: coordinates=q_ry axis=(0 1 0) LinearFunction(coefficients=1 0)
        TransformAxis rotation3: axis=(1 0 0)
        TransformAxis translation1: axis=(1 0 0)
        TransformAxis translation2: axis=(0 1 0)
        TransformAxis translation3: axis=(0 0 1)
    CustomJoint exo_hip_AR_joint_L: socket_parent_frame=exo_w2h_L_offset socket_child_frame=exo_waist_2_thigh_L_offset
      Coordinate exo_hip_adduction_L: range=(-1.8 1.52) clamped=true
      Coordinate exo_hip_rot_L: range=(-1.69 1.69) clamped=true
      PhysicalOffsetFrame exo_w2h_L_offset: socket_parent=/bodyset/exo_w2h_L translation=(0.060042 0 0)
          orientation=(-3.141593 1.224647e-16 -3.141593)
      PhysicalOffsetFrame exo_waist_2_thigh_L_offset: socket_parent=/bodyset/exo_waist_2_thigh_L
          translation=(0 0.09257405 0) orientation=(-3.141593 1.224647e-16 -3.141593)
      SpatialTransform:
        TransformAxis rotation1: coordinates=exo_hip_adduction_L axis=(1 0 0) LinearFunction(coefficients=1 0)
        TransformAxis rotation2: coordinates=exo_hip_rot_L axis=(0 1 0) LinearFunction(coefficients=1 0)
        TransformAxis rotation3: axis=(0 0 1)
        TransformAxis translation1: axis=(1 0 0)
        TransformAxis translation2: axis=(0 1 0)
        TransformAxis translation3: axis=(0 0 1)
    PinJoint exo_hipF_joint_L: socket_parent_frame=exo_waist_2_thigh_L_offset socket_child_frame=exo_L_thigh_offset
      Coordinate exo_hipF_joint_L_coord_0: range=(-1.5 3.1)
      PhysicalOffsetFrame exo_waist_2_thigh_L_offset: socket_parent=/bodyset/exo_waist_2_thigh_L
          translation=(0 -0.09257405 1.387779e-17)
      PhysicalOffsetFrame exo_L_thigh_offset: socket_parent=/bodyset/exo_L_thigh translation=(0 0.193516 0)
    PinJoint exo_knee_joint_L: socket_parent_frame=exo_L_thigh_offset socket_child_frame=exo_L_shank_offset
      Coordinate exo_knee_joint_L_coord_0: range=(-1 3.5) clamped=true
      PhysicalOffsetFrame exo_L_thigh_offset: socket_parent=/bodyset/exo_L_thigh
          translation=(-0.00775022 -0.19731 0.0026345) orientation=(-3.141593 1.224647e-16 -3.141593)
      PhysicalOffsetFrame exo_L_shank_offset: socket_parent=/bodyset/exo_L_shank translation=(0 0.210894 0)
          orientation=(-3.141593 1.224647e-16 -3.141593)
    CustomJoint exo_ankle_joint_L: socket_parent_frame=exo_L_shank_offset socket_child_frame=exo_L_feet_offset
      Coordinate q_rz: range=(-1.8 1.8) clamped=true
      Coordinate q_ry: range=(-1.69 1.69) clamped=true
      PhysicalOffsetFrame exo_L_shank_offset: socket_parent=/bodyset/exo_L_shank
          translation=(-0.00219512 -0.2446445 0.1012383) orientation=(0 0 -1.047198)
      PhysicalOffsetFrame exo_L_feet_offset: socket_parent=/bodyset/exo_L_feet translation=(0 0.0922667 0)
          orientation=(0 0 -1.047198)
      SpatialTransform:
        TransformAxis rotation1: coordinates=q_rz axis=(0 0 1) LinearFunction(coefficients=1 0)
        TransformAxis rotation2: coordinates=q_ry axis=(0 1 0) LinearFunction(coefficients=1 0)
        TransformAxis rotation3: axis=(1 0 0)
        TransformAxis translation1: axis=(1 0 0)
        TransformAxis translation2: axis=(0 1 0)
        TransformAxis translation3: axis=(0 0 1)
  ConstraintSet:
    CoordinateCouplerConstraint patellofemoral_knee_angle_r_con: independent_coordinate_names=knee_angle_r
        dependent_coordinate_name=knee_angle_r_beta scale_factor=1
        coupled_coordinates_function=LinearFunction(coefficients=1 0)
    CoordinateCouplerConstraint patellofemoral_knee_angle_l_con: independent_coordinate_names=knee_angle_l
        dependent_coordinate_name=knee_angle_l_beta scale_factor=1
        coupled_coordinates_function=LinearFunction(coefficients=1 0)
    WeldConstraint weld_constraint_r: socket_frame1=/jointset/subtalar_r/calcn_r_offset
        socket_frame2=/bodyset/exo_R_feet/calcn_weld_frame_r
    WeldConstraint weld_constraint_l: socket_frame1=/jointset/subtalar_l/calcn_l_offset
        socket_frame2=/bodyset/exo_L_feet/calcn_weld_frame_l
  ForceSet:
    Millard2012EquilibriumMuscle [values shared by the 80 below unless stated]: max_contraction_velocity=15
        fiber_damping=0.01 default_activation=0.01 minimum_activation=0.01
      ActiveForceLengthCurve: min_norm_active_fiber_length=0.25 transition_norm_fiber_length=0.77
          max_norm_active_fiber_length=1.9 shallow_ascending_slope=0.75 minimum_value=0
      ForceVelocityCurve: concentric_slope_at_vmax=0 concentric_slope_near_vmax=0.25 isometric_slope=5
          eccentric_slope_at_vmax=0 eccentric_slope_near_vmax=0.15 max_eccentric_velocity_force_multiplier=1.4
      FiberForceLengthCurve: strain_at_zero_force=0 strain_at_one_norm_force=0.7
      TendonForceLengthCurve
    Millard2012EquilibriumMuscle addbrev_r: max_isometric_force=666.05 optimal_fiber_length=0.1078796
        tendon_slack_length=0.03709374 pennation_angle_at_optimal=0.1147809 [radians] ignore_tendon_compliance=true
      PathPoint P1: pelvis (-0.0237725 -0.0941567 0.0184393)
      PathPoint P2: femur_r (-0.001916 -0.113044 0.0238542)
      PathWrap: wrap_object=AB_at_femshaft_r method=hybrid
    Millard2012EquilibriumMuscle addlong_r: max_isometric_force=975.7358 optimal_fiber_length=0.1066855
        tendon_slack_length=0.1299546 pennation_angle_at_optimal=0.1377704
      PathPoint P1: pelvis (-0.00943431 -0.0890482 0.0226061)
      PathPoint P2: femur_r (0.0107871 -0.229316 0.0151651)
      PathWrap: wrap_object=AL_at_femshaft_r method=hybrid
    Millard2012EquilibriumMuscle addmagDist_r: max_isometric_force=635.6917 optimal_fiber_length=0.1706143
        tendon_slack_length=0.08413315 pennation_angle_at_optimal=0.194705 ignore_tendon_compliance=true
      PathPoint P1: pelvis (-0.0921525 -0.127883 0.0476788)
      PathPoint P2: femur_r (0.0107775 -0.251475 0.0184894)
      PathWrap: wrap_object=AMdist_at_femshaft_r method=hybrid
    Millard2012EquilibriumMuscle addmagIsch_r: max_isometric_force=635.6917 optimal_fiber_length=0.1492279
        tendon_slack_length=0.2066864 pennation_angle_at_optimal=0.1680443
      PathPoint P1: pelvis (-0.111544 -0.129976 0.0499418)
      PathPoint P2: femur_r (0.00460798 -0.371675 -0.0313553)
      PathWrap: wrap_object=AMisch_at_condyles_r method=hybrid
    Millard2012EquilibriumMuscle addmagMid_r: max_isometric_force=635.6917 optimal_fiber_length=0.1369106
        tendon_slack_length=0.04636038 pennation_angle_at_optimal=0.2073076 ignore_tendon_compliance=true
      PathPoint P1: pelvis (-0.0655423 -0.120951 0.0341726)
      PathPoint P2: femur_r (0.00231836 -0.155579 0.0279928)
      PathWrap: wrap_object=AMmid_at_femshaft_r method=hybrid
    Millard2012EquilibriumMuscle addmagProx_r: max_isometric_force=635.6917 optimal_fiber_length=0.1146936
        tendon_slack_length=0.04379655 pennation_angle_at_optimal=0.3114833 ignore_tendon_compliance=true
      PathPoint P1: pelvis (-0.0385587 -0.107729 0.0163439)
      PathPoint P2: femur_r (-0.0146287 -0.0755479 0.0306752)
      PathWrap: wrap_object=AMprox_at_femshaft_r method=hybrid
    Millard2012EquilibriumMuscle bflh_r: max_isometric_force=1397.601 optimal_fiber_length=0.09542323
        tendon_slack_length=0.3179731 pennation_angle_at_optimal=0.1759182
      PathPoint P1: pelvis (-0.129442 -0.119299 0.0701652)
      PathPoint P2: tibia_r (-0.0387213 -0.040215 0.0290697)
      PathPoint P3: tibia_r (-0.0329763 -0.0522795 0.0348147)
    Millard2012EquilibriumMuscle bfsh_r: max_isometric_force=592.9284 optimal_fiber_length=0.1094475
        tendon_slack_length=0.1049994 pennation_angle_at_optimal=0.2642232 ignore_tendon_compliance=true
      PathPoint P1: femur_r (0.00479 -0.202234 0.0224172)
      PathPoint P2: tibia_r (-0.0345849 -0.0481431 0.0365382)
      PathWrap: wrap_object=BF_at_gastroc_r method=hybrid
    Millard2012EquilibriumMuscle edl_r: max_isometric_force=642.2936 optimal_fiber_length=0.08144145
        tendon_slack_length=0.4335026 pennation_angle_at_optimal=0.2182582
      PathPoint P1: tibia_r (-0.018384 -0.132939 0.0235545)
      PathPoint P2: tibia_r (0.0188436 -0.432024 0.0128688)
      PathPoint P3: calcn_r (0.105056 0.0597874 0.00119802)
      PathPoint P4: calcn_r (0.184734 0.00913418 0.0194679)
      PathPoint P5: toes_r (0.000342947 0.00780558 0.0229122)
      PathPoint P6: toes_r (0.0506418 -0.000664304 0.0374382)
    Millard2012EquilibriumMuscle ehl_r: max_isometric_force=304.2443 optimal_fiber_length=0.0877965
        tendon_slack_length=0.383576 pennation_angle_at_optimal=0.1972681
      PathPoint P1: tibia_r (-0.016086 -0.178095 0.0217161)
      PathPoint P2: tibia_r (0.0081579 -0.334244 0.0188436)
      PathPoint P3: tibia_r (0.02298 -0.424326 -0.0032172)
      PathPoint P4: calcn_r (0.110886 0.0646036 -0.0315978)
      PathPoint P5: calcn_r (0.14781 0.0513175 -0.0384865)
      PathPoint P6: calcn_r (0.198223 0.0230846 -0.0419308)
      PathPoint P7: toes_r (0.034066 0.00680912 -0.0366894)
      PathPoint P8: toes_r (0.0643597 0.00564659 -0.027854)
    Millard2012EquilibriumMuscle fdl_r: max_isometric_force=450.3807 optimal_fiber_length=0.05337008
        tendon_slack_length=0.4532542 pennation_angle_at_optimal=0.2248391
      PathPoint P1: tibia_r (-0.0026427 -0.210497 -0.0020682)
      PathPoint P2: tibia_r (-0.0202224 -0.41881 -0.0142476)
      PathPoint P3: calcn_r (0.0498416 0.052314 -0.0419308)
      PathPoint P4: calcn_r (0.0809354 0.0292294 -0.039385)
      PathPoint P5: calcn_r (0.189535 -0.0134522 0.0173713)
      PathPoint P6: toes_r (-0.002172 -0.0129539 0.0220137)
      PathPoint P7: toes_r (0.0325799 -0.0117914 0.0321969)
      PathPoint P8: toes_r (0.0504132 -0.00996457 0.0362402)
    Millard2012EquilibriumMuscle fhl_r: max_isometric_force=966.1991 optimal_fiber_length=0.06232212
        tendon_slack_length=0.419036 pennation_angle_at_optimal=0.2580255
      PathPoint P1: tibia_r (-0.035619 -0.248529 0.02298)
      PathPoint P2: tibia_r (-0.0278058 -0.421798 -0.0087324)
      PathPoint P3: calcn_r (0.042754 0.045837 -0.0360904)
      PathPoint P4: calcn_r (0.11866 0.0112932 -0.0383367)
      PathPoint P5: calcn_r (0.197309 -0.00880203 -0.0402835)
      PathPoint P6: toes_r (0.0177189 -0.0106289 -0.0396845)
      PathPoint P7: toes_r (0.0642453 -0.0169398 -0.0271053)
    Millard2012EquilibriumMuscle gaslat_r: max_isometric_force=1676.31 optimal_fiber_length=0.06769082
        tendon_slack_length=0.4329336 pennation_angle_at_optimal=0.2102268
      PathPoint P1: femur_r (-0.002874 -0.365381 0.0265366)
      PathPoint P2: calcn_r (0.00502988 0.0514836 -0.0079369)
      PathWrap shank: wrap_object=GasLat_at_shank_r method=hybrid
      PathWrap condyles: wrap_object=Gastroc_at_condyles_r method=hybrid
    Millard2012EquilibriumMuscle gasmed_r: max_isometric_force=3315.793 optimal_fiber_length=0.05848648
        tendon_slack_length=0.4572454 pennation_angle_at_optimal=0.1656816
      PathPoint P1: femur_r (0.007664 -0.36289 -0.0199264)
      PathPoint P2: calcn_r (0.00502988 0.0514836 -0.0079369)
      PathWrap shank: wrap_object=GasMed_at_shank_r method=hybrid
      PathWrap condyles: wrap_object=Gastroc_at_condyles_r method=hybrid
    Millard2012EquilibriumMuscle glmax1_r: max_isometric_force=1047.025 optimal_fiber_length=0.151263
        tendon_slack_length=0.05025728 pennation_angle_at_optimal=0.3540118 ignore_tendon_compliance=true
      PathPoint P1: pelvis (-0.153214 0.0345575 0.0674113)
      PathPoint P2: pelvis (-0.15645 -0.0242404 0.0932742)
      PathPoint P3: femur_r (-0.0425352 -0.0312308 0.0289316)
      PathPoint P4: femur_r (-0.0265366 -0.0542228 0.045026)
      PathWrap: wrap_object=Gmax1_at_pelvis_r method=hybrid
    Millard2012EquilibriumMuscle glmax2_r: max_isometric_force=1496.432 optimal_fiber_length=0.1634475
        tendon_slack_length=0.07067508 pennation_angle_at_optimal=0.3673821 ignore_tendon_compliance=true
      PathPoint P1: pelvis (-0.163918 0.00871451 0.0553179)
      PathPoint P2: pelvis (-0.167279 -0.0610015 0.0973452)
      PathPoint P3: femur_r (-0.04311 -0.0559472 0.0241416)
      PathPoint P4: femur_r (-0.0149448 -0.0973328 0.0401402)
      PathWrap: wrap_object=Gmax2_at_pelvis_r method=hybrid
    Millard2012EquilibriumMuscle glmax3_r: max_isometric_force=1008.68 optimal_fiber_length=0.1757076
        tendon_slack_length=0.07335171 pennation_angle_at_optimal=0.3824161 ignore_tendon_compliance=true
      PathPoint P1: pelvis (-0.161802 -0.0525875 0.0107762)
      PathPoint P2: pelvis (-0.158442 -0.126511 0.0520851)
      PathPoint P3: femur_r (-0.0269198 -0.107775 0.0090052)
      PathPoint P4: femur_r (-0.005748 -0.13594 0.0393738)
      PathWrap: wrap_object=Gmax3_at_pelvis_r method=hybrid
    Millard2012EquilibriumMuscle glmed1_r: max_isometric_force=1163.759 optimal_fiber_length=0.07261971
        tendon_slack_length=0.05552605 pennation_angle_at_optimal=0.3165559 ignore_tendon_compliance=true
      PathPoint P1: pelvis (-0.0553861 0.0245409 0.14033)
      PathPoint P2: femur_r (-0.0208844 -0.0112086 0.053169)
    Millard2012EquilibriumMuscle glmed2_r: max_isometric_force=814.275 optimal_fiber_length=0.07313355
        tendon_slack_length=0.06536818 pennation_angle_at_optimal=0.3165559 ignore_tendon_compliance=true
      PathPoint P1: pelvis (-0.105794 0.0316527 0.0808217)
      PathPoint P2: femur_r (-0.0247164 -0.0055564 0.0504866)
    Millard2012EquilibriumMuscle glmed3_r: max_isometric_force=927.2036 optimal_fiber_length=0.07738803
        tendon_slack_length=0.04795179 pennation_angle_at_optimal=0.3165559 ignore_tendon_compliance=true
      PathPoint P1: pelvis (-0.143382 -0.00731217 0.062981)
      PathPoint P2: femur_r (-0.0296022 -0.0045026 0.0496244)
    Millard2012EquilibriumMuscle glmin1_r: max_isometric_force=398.0911 optimal_fiber_length=0.06612733
        tendon_slack_length=0.01569336 pennation_angle_at_optimal=0.1745329 ignore_tendon_compliance=true
      PathPoint P1: pelvis (-0.0577509 -0.0149248 0.124765)
      PathPoint P2: femur_r (-0.0068976 -0.0099632 0.053648)
    Millard2012EquilibriumMuscle glmin2_r: max_isometric_force=420.2003 optimal_fiber_length=0.05404025
        tendon_slack_length=0.0251857 pennation_angle_at_optimal=0 ignore_tendon_compliance=true
      PathPoint P1: pelvis (-0.0766693 -0.0142237 0.116263)
      PathPoint P2: femur_r (-0.0091968 -0.0099632 0.053648)
    Millard2012EquilibriumMuscle glmin3_r: max_isometric_force=475.4943 optimal_fiber_length=0.03758218
        tendon_slack_length=0.05031314 pennation_angle_at_optimal=0.01745329
      PathPoint P1: pelvis (-0.0982015 -0.0155258 0.0955492)
      PathPoint P2: femur_r (-0.012933 -0.0079514 0.05269)
    Millard2012EquilibriumMuscle grac_r: max_isometric_force=299.3954 optimal_fiber_length=0.2254393
        tendon_slack_length=0.1702312 pennation_angle_at_optimal=0.1720016 ignore_tendon_compliance=true
      PathPoint P1: pelvis (-0.0589458 -0.129536 0.0294071)
      PathPoint P2: tibia_r (-0.0211646 -0.054635 -0.0340219)
      PathPoint P3: tibia_r (0.00204522 -0.0799934 -0.0180738)
      PathWrap: wrap_object=GR_at_condyles_r method=hybrid
    Millard2012EquilibriumMuscle iliacus_r: max_isometric_force=1086.784 optimal_fiber_length=0.1112431
        tendon_slack_length=0.1003074 pennation_angle_at_optimal=0.279914 ignore_tendon_compliance=true
      PathPoint P1: pelvis (-0.0753002 0.0309515 0.100937)
      PathPoint P2: pelvis (-0.0168025 -0.0557929 0.0905203)
      PathPoint P3: femur_r (-0.0022034 -0.054127 0.0133162)
      PathPoint P4: femur_r (-0.0116876 -0.0610246 0.0187768)
      PathWrap: wrap_object=IL_at_brim_r method=hybrid range=(2 3)
    Millard2012EquilibriumMuscle perbrev_r: max_isometric_force=554.7066 optimal_fiber_length=0.05489738
        tendon_slack_length=0.1783893 pennation_angle_at_optimal=0.2052361
      PathPoint P1: tibia_r (-0.0279207 -0.290927 0.0288399)
      PathPoint P2: tibia_r (-0.0389511 -0.447306 0.0286101)
      PathPoint P3: tibia_r (-0.0327465 -0.46006 0.0292995)
      PathPoint P4: calcn_r (0.0538426 0.0448405 0.0348924)
      PathPoint P5: calcn_r (0.0773916 0.0363707 0.0513652)
    Millard2012EquilibriumMuscle perlong_r: max_isometric_force=1187.072 optimal_fiber_length=0.06195446
        tendon_slack_length=0.4051685 pennation_angle_at_optimal=0.2479525
      PathPoint P1: tibia_r (-0.02298 -0.157758 0.0324018)
      PathPoint P2: tibia_r (-0.0364233 -0.44811 0.0272313)
      PathPoint P3: tibia_r (-0.0312528 -0.461209 0.027576)
      PathPoint P4: calcn_r (0.0500702 0.0381975 0.0330954)
      PathPoint P5: calcn_r (0.0778489 0.0176041 0.0425298)
      PathPoint P6: calcn_r (0.0973968 0.0114593 0.0176708)
      PathPoint P7: calcn_r (0.137522 0.0141165 -0.0275545)
    Millard2012EquilibriumMuscle piri_r: max_isometric_force=1095.986 optimal_fiber_length=0.02870658
        tendon_slack_length=0.1268679 pennation_angle_at_optimal=0.1745329
      PathPoint P1: pelvis (-0.126716 -0.00654089 0.0161763)
      PathPoint P2: pelvis (-0.126977 -0.0307111 0.0729431)
      PathPoint P3: femur_r (-0.0141784 -0.0034488 0.0418646)
    Millard2012EquilibriumMuscle psoas_r: max_isometric_force=1518.51 optimal_fiber_length=0.120956
        tendon_slack_length=0.1029969 pennation_angle_at_optimal=0.2155251 ignore_tendon_compliance=true
      PathPoint P1: pelvis (-0.0754247 0.0621034 0.046697)
      PathPoint P2: pelvis (-0.025515 -0.0655091 0.0785467)
      PathPoint P3: femur_r (-0.0126456 -0.0447386 0.0044068)
      PathPoint P4: femur_r (-0.022513 -0.0501992 0.0084304)
      PathWrap: wrap_object=PS_at_brim_r method=hybrid range=(2 3)
    Millard2012EquilibriumMuscle recfem_r: max_isometric_force=2332.635 optimal_fiber_length=0.07432678
        tendon_slack_length=0.4391974 pennation_angle_at_optimal=0.2170149
      PathPoint P1: pelvis (-0.0298712 -0.0388647 0.111714)
      PathPoint P2: patella_r (0.00958 0.046942 0.0006706)
      PathPoint P3: patella_r (0.0115918 0.0418646 -0.000958)
      PathPoint P4: patella_r (0.00479 0.00236626 2.874e-5)
      PathPoint P5: tibia_r (0.0374574 -0.0725249 -0.00054003)
      PathWrap: wrap_object=KnExt_at_fem_r method=hybrid
    Millard2012EquilibriumMuscle sart_r: max_isometric_force=265.4464 optimal_fiber_length=0.4035308
        tendon_slack_length=0.1241631 pennation_angle_at_optimal=0.02613542 ignore_tendon_compliance=true
      PathPoint P1: pelvis (-0.0242703 -0.015626 0.126441)
      PathPoint P2: femur_r (-0.002874 -0.341814 -0.0403318)
      PathPoint P3: tibia_r (-0.0288399 -0.0460749 -0.0419385)
      PathPoint P4: tibia_r (-0.0182691 -0.0688251 -0.0303336)
      PathPoint P5: tibia_r (0.0156264 -0.093069 -0.0029874)
    Millard2012EquilibriumMuscle semimem_r: max_isometric_force=2342.476 optimal_fiber_length=0.06712464
        tendon_slack_length=0.3381389 pennation_angle_at_optimal=0.2545615
      PathPoint P1: pelvis (-0.122845 -0.11419 0.0735178)
      PathPoint P2: tibia_r (-0.033321 -0.0479133 -0.0225204)
      PathWrap: wrap_object=SM_at_condyles_r method=hybrid
    Millard2012EquilibriumMuscle semiten_r: max_isometric_force=629.306 optimal_fiber_length=0.1916541
        tendon_slack_length=0.2454751 pennation_angle_at_optimal=0.241295
      PathPoint P1: pelvis (-0.129193 -0.125509 0.0616639)
      PathPoint P2: tibia_r (-0.0358488 -0.0583692 -0.0263121)
      PathPoint P3: tibia_r (0.0021831 -0.0888177 -0.0134433)
      PathWrap: wrap_object=ST_at_condyles_r method=hybrid
    Millard2012EquilibriumMuscle soleus_r: max_isometric_force=6593.073 optimal_fiber_length=0.05130401
        tendon_slack_length=0.3226974 pennation_angle_at_optimal=0.3814289
      PathPoint P1: tibia_r (-0.0087324 -0.105248 0.0112602)
      PathPoint P2: calcn_r (0.00502988 0.0514836 -0.0079369)
    Millard2012EquilibriumMuscle tfl_r: max_isometric_force=437.6406 optimal_fiber_length=0.09307454
        tendon_slack_length=0.25 pennation_angle_at_optimal=0.05235988
      PathPoint P1: pelvis (-0.0387081 0.0214357 0.148592)
      PathPoint P2: femur_r (0.0281652 -0.095321 0.0571926)
      PathPoint P3: femur_r (0.0102506 -0.38799 0.0310392)
      PathPoint P4: tibia_r (0.0124092 -0.047109 0.0397554)
    Millard2012EquilibriumMuscle tibant_r: max_isometric_force=1306.358 optimal_fiber_length=0.08112939
        tendon_slack_length=0.2856289 pennation_angle_at_optimal=0.1951828
      PathPoint P1: tibia_r (0.0176946 -0.150749 0.0186138)
      PathPoint P2: tibia_r (0.0288399 -0.218999 0.0147072)
      PathPoint P3: tibia_r (0.0267717 -0.420419 -0.0151668)
      PathPoint P4: calcn_r (0.133292 0.0295615 -0.0456746)
    Millard2012EquilibriumMuscle tibpost_r: max_isometric_force=1841.376 optimal_fiber_length=0.04458645
        tendon_slack_length=0.3311896 pennation_angle_at_optimal=0.2264891
      PathPoint P1: tibia_r (-0.0047109 -0.14983 0.0118347)
      PathPoint P2: tibia_r (-0.0188436 -0.419959 -0.0201075)
      PathPoint P3: calcn_r (0.0476696 0.0554694 -0.0428293)
      PathPoint P4: calcn_r (0.0882516 0.0264061 -0.0420805)
    Millard2012EquilibriumMuscle vasint_r: max_isometric_force=1806.474 optimal_fiber_length=0.09844094
        tendon_slack_length=0.2004613 pennation_angle_at_optimal=0.06309973
      PathPoint P1: femur_r (0.027782 -0.184319 0.029698)
      PathPoint P2: femur_r (0.032093 -0.199647 0.027303)
      PathPoint P3: patella_r (0.0055564 0.045984 -0.0005748)
      PathPoint P4: patella_r (0.00479 0.00236626 -0.00037362)
      PathPoint P5: tibia_r (0.0374229 -0.0726168 0.00049407)
      PathWrap: wrap_object=KnExt_at_fem_r method=hybrid
    Millard2012EquilibriumMuscle vaslat_r: max_isometric_force=5479.752 optimal_fiber_length=0.09837626
        tendon_slack_length=0.2183293 pennation_angle_at_optimal=0.2528673
      PathPoint P1: femur_r (0.0045984 -0.177613 0.0334342)
      PathPoint P2: femur_r (0.0257702 -0.248218 0.0391822)
      PathPoint P3: patella_r (0.0098674 0.0405234 0.0135078)
      PathPoint P4: patella_r (0.00479 0.00236626 0.00702214)
      PathPoint P5: tibia_r (0.0373885 -0.0728236 0.00587139)
      PathWrap: wrap_object=KnExt_at_fem_r method=hybrid
    Millard2012EquilibriumMuscle vasmed_r: max_isometric_force=2924.465 optimal_fiber_length=0.09610254
        tendon_slack_length=0.1984639 pennation_angle_at_optimal=0.4222225
      PathPoint P1: femur_r (0.013412 -0.201084 0.0180104)
      PathPoint P2: femur_r (0.0341048 -0.26527 0.0008622)
      PathPoint P3: patella_r (0.0060354 0.042631 -0.016286)
      PathPoint P4: patella_r (0.00479 0.00236626 -0.008143)
      PathPoint P5: tibia_r (0.0366531 -0.0730419 -0.00779022)
      PathWrap: wrap_object=KnExt_at_fem_r method=hybrid
    Millard2012EquilibriumMuscle addbrev_l: max_isometric_force=666.05 optimal_fiber_length=0.1078796
        tendon_slack_length=0.03709374 pennation_angle_at_optimal=0.1147809 ignore_tendon_compliance=true
      PathPoint P1: pelvis (-0.0237725 -0.0941567 -0.0184393)
      PathPoint P2: femur_l (-0.001916 -0.113044 -0.0238542)
      PathWrap: wrap_object=AB_at_femshaft_l method=hybrid
    Millard2012EquilibriumMuscle addlong_l: max_isometric_force=975.7358 optimal_fiber_length=0.1066855
        tendon_slack_length=0.1299546 pennation_angle_at_optimal=0.1377704
      PathPoint P1: pelvis (-0.00943431 -0.0890482 -0.0226061)
      PathPoint P2: femur_l (0.0107871 -0.229316 -0.0151651)
      PathWrap: wrap_object=AL_at_femshaft_l method=hybrid
    Millard2012EquilibriumMuscle addmagDist_l: max_isometric_force=635.6917 optimal_fiber_length=0.1706143
        tendon_slack_length=0.08413315 pennation_angle_at_optimal=0.194705 ignore_tendon_compliance=true
      PathPoint P1: pelvis (-0.0921525 -0.127883 -0.0476788)
      PathPoint P2: femur_l (0.0107775 -0.251475 -0.0184894)
      PathWrap: wrap_object=AMdist_at_femshaft_l method=hybrid
    Millard2012EquilibriumMuscle addmagIsch_l: max_isometric_force=635.6917 optimal_fiber_length=0.1492279
        tendon_slack_length=0.2066864 pennation_angle_at_optimal=0.1680443
      PathPoint P1: pelvis (-0.111544 -0.129976 -0.0499418)
      PathPoint P2: femur_l (0.00460798 -0.371675 0.0313553)
      PathWrap: wrap_object=AMisch_at_condyles_l method=hybrid
    Millard2012EquilibriumMuscle addmagMid_l: max_isometric_force=635.6917 optimal_fiber_length=0.1369106
        tendon_slack_length=0.04636038 pennation_angle_at_optimal=0.2073076 ignore_tendon_compliance=true
      PathPoint P1: pelvis (-0.0655423 -0.120951 -0.0341726)
      PathPoint P2: femur_l (0.00231836 -0.155579 -0.0279928)
      PathWrap: wrap_object=AMmid_at_femshaft_l method=hybrid
    Millard2012EquilibriumMuscle addmagProx_l: max_isometric_force=635.6917 optimal_fiber_length=0.1146936
        tendon_slack_length=0.04379655 pennation_angle_at_optimal=0.3114833 ignore_tendon_compliance=true
      PathPoint P1: pelvis (-0.0385587 -0.107729 -0.0163439)
      PathPoint P2: femur_l (-0.0146287 -0.0755479 -0.0306752)
      PathWrap: wrap_object=AMprox_at_femshaft_l method=hybrid
    Millard2012EquilibriumMuscle bflh_l: max_isometric_force=1397.601 optimal_fiber_length=0.09542323
        tendon_slack_length=0.3179731 pennation_angle_at_optimal=0.1759182
      PathPoint P1: pelvis (-0.129442 -0.119299 -0.0701652)
      PathPoint P2: tibia_l (-0.0387213 -0.040215 -0.0290697)
      PathPoint P3: tibia_l (-0.0329763 -0.0522795 -0.0348147)
    Millard2012EquilibriumMuscle bfsh_l: max_isometric_force=592.9284 optimal_fiber_length=0.1094475
        tendon_slack_length=0.1049994 pennation_angle_at_optimal=0.2642232 ignore_tendon_compliance=true
      PathPoint P1: femur_l (0.00479 -0.202234 -0.0224172)
      PathPoint P2: tibia_l (-0.0345849 -0.0481431 -0.0365382)
      PathWrap: wrap_object=BF_at_gastroc_l method=hybrid
    Millard2012EquilibriumMuscle edl_l: max_isometric_force=642.2936 optimal_fiber_length=0.08144145
        tendon_slack_length=0.4335026 pennation_angle_at_optimal=0.2182582
      PathPoint P1: tibia_l (-0.018384 -0.132939 -0.0235545)
      PathPoint P2: tibia_l (0.0188436 -0.432024 -0.0128688)
      PathPoint P3: calcn_l (0.105056 0.0597874 -0.00119802)
      PathPoint P4: calcn_l (0.184734 0.00913418 -0.0194679)
      PathPoint P5: toes_l (0.000342947 0.00780558 -0.0229122)
      PathPoint P6: toes_l (0.0506418 -0.000664304 -0.0374382)
    Millard2012EquilibriumMuscle ehl_l: max_isometric_force=304.2443 optimal_fiber_length=0.0877965
        tendon_slack_length=0.383576 pennation_angle_at_optimal=0.1972681
      PathPoint P1: tibia_l (-0.016086 -0.178095 -0.0217161)
      PathPoint P2: tibia_l (0.0081579 -0.334244 -0.0188436)
      PathPoint P3: tibia_l (0.02298 -0.424326 0.0032172)
      PathPoint P4: calcn_l (0.110886 0.0646036 0.0315978)
      PathPoint P5: calcn_l (0.14781 0.0513175 0.0384865)
      PathPoint P6: calcn_l (0.198223 0.0230846 0.0419308)
      PathPoint P7: toes_l (0.034066 0.00680912 0.0366894)
      PathPoint P8: toes_l (0.0643597 0.00564659 0.027854)
    Millard2012EquilibriumMuscle fdl_l: max_isometric_force=450.3807 optimal_fiber_length=0.05337008
        tendon_slack_length=0.4532542 pennation_angle_at_optimal=0.2248391
      PathPoint P1: tibia_l (-0.0026427 -0.210497 0.0020682)
      PathPoint P2: tibia_l (-0.0202224 -0.41881 0.0142476)
      PathPoint P3: calcn_l (0.0498416 0.052314 0.0419308)
      PathPoint P4: calcn_l (0.0809354 0.0292294 0.039385)
      PathPoint P5: calcn_l (0.189535 -0.0134522 -0.0173713)
      PathPoint P6: toes_l (-0.002172 -0.0129539 -0.0220137)
      PathPoint P7: toes_l (0.0325799 -0.0117914 -0.0321969)
      PathPoint P8: toes_l (0.0504132 -0.00996457 -0.0362402)
    Millard2012EquilibriumMuscle fhl_l: max_isometric_force=966.1991 optimal_fiber_length=0.06232212
        tendon_slack_length=0.419036 pennation_angle_at_optimal=0.2580255
      PathPoint P1: tibia_l (-0.035619 -0.248529 -0.02298)
      PathPoint P2: tibia_l (-0.0278058 -0.421798 0.0087324)
      PathPoint P3: calcn_l (0.042754 0.045837 0.0360904)
      PathPoint P4: calcn_l (0.11866 0.0112932 0.0383367)
      PathPoint P5: calcn_l (0.197309 -0.00880203 0.0402835)
      PathPoint P6: toes_l (0.0177189 -0.0106289 0.0396845)
      PathPoint P7: toes_l (0.0642453 -0.0169398 0.0271053)
    Millard2012EquilibriumMuscle gaslat_l: max_isometric_force=1676.31 optimal_fiber_length=0.06769082
        tendon_slack_length=0.4329336 pennation_angle_at_optimal=0.2102268
      PathPoint P1: femur_l (-0.002874 -0.365381 -0.0265366)
      PathPoint P2: calcn_l (0.00502988 0.0514836 0.0079369)
      PathWrap shank: wrap_object=GasLat_at_shank_l method=hybrid
      PathWrap condyles: wrap_object=Gastroc_at_condyles_l method=hybrid
    Millard2012EquilibriumMuscle gasmed_l: max_isometric_force=3315.793 optimal_fiber_length=0.05848648
        tendon_slack_length=0.4572454 pennation_angle_at_optimal=0.1656816
      PathPoint P1: femur_l (0.007664 -0.36289 0.0199264)
      PathPoint P2: calcn_l (0.00502988 0.0514836 0.0079369)
      PathWrap shank: wrap_object=GasMed_at_shank_l method=hybrid
      PathWrap condyles: wrap_object=Gastroc_at_condyles_l method=hybrid
    Millard2012EquilibriumMuscle glmax1_l: max_isometric_force=1047.025 optimal_fiber_length=0.151263
        tendon_slack_length=0.05025728 pennation_angle_at_optimal=0.3540118 ignore_tendon_compliance=true
      PathPoint P1: pelvis (-0.153214 0.0345575 -0.0674113)
      PathPoint P2: pelvis (-0.15645 -0.0242404 -0.0932742)
      PathPoint P3: femur_l (-0.0425352 -0.0312308 -0.0289316)
      PathPoint P4: femur_l (-0.0265366 -0.0542228 -0.045026)
      PathWrap: wrap_object=Gmax1_at_pelvis_l method=hybrid
    Millard2012EquilibriumMuscle glmax2_l: max_isometric_force=1496.432 optimal_fiber_length=0.1634475
        tendon_slack_length=0.07067508 pennation_angle_at_optimal=0.3673821 ignore_tendon_compliance=true
      PathPoint P1: pelvis (-0.163918 0.00871451 -0.0553179)
      PathPoint P2: pelvis (-0.167279 -0.0610015 -0.0973452)
      PathPoint P3: femur_l (-0.04311 -0.0559472 -0.0241416)
      PathPoint P4: femur_l (-0.0149448 -0.0973328 -0.0401402)
      PathWrap: wrap_object=Gmax2_at_pelvis_l method=hybrid
    Millard2012EquilibriumMuscle glmax3_l: max_isometric_force=1008.68 optimal_fiber_length=0.1757076
        tendon_slack_length=0.07335171 pennation_angle_at_optimal=0.3824161 ignore_tendon_compliance=true
      PathPoint P1: pelvis (-0.161802 -0.0525875 -0.0107762)
      PathPoint P2: pelvis (-0.158442 -0.126511 -0.0520851)
      PathPoint P3: femur_l (-0.0269198 -0.107775 -0.0090052)
      PathPoint P4: femur_l (-0.005748 -0.13594 -0.0393738)
      PathWrap: wrap_object=Gmax3_at_pelvis_l method=hybrid
    Millard2012EquilibriumMuscle glmed1_l: max_isometric_force=1163.759 optimal_fiber_length=0.07261971
        tendon_slack_length=0.05552605 pennation_angle_at_optimal=0.3165559 ignore_tendon_compliance=true
      PathPoint P1: pelvis (-0.0553861 0.0245409 -0.14033)
      PathPoint P2: femur_l (-0.0208844 -0.0112086 -0.053169)
    Millard2012EquilibriumMuscle glmed2_l: max_isometric_force=814.275 optimal_fiber_length=0.07313355
        tendon_slack_length=0.06536818 pennation_angle_at_optimal=0.3165559 ignore_tendon_compliance=true
      PathPoint P1: pelvis (-0.105794 0.0316527 -0.0808217)
      PathPoint P2: femur_l (-0.0247164 -0.0055564 -0.0504866)
    Millard2012EquilibriumMuscle glmed3_l: max_isometric_force=927.2036 optimal_fiber_length=0.07738803
        tendon_slack_length=0.04795179 pennation_angle_at_optimal=0.3165559 ignore_tendon_compliance=true
      PathPoint P1: pelvis (-0.143382 -0.00731217 -0.062981)
      PathPoint P2: femur_l (-0.0296022 -0.0045026 -0.0496244)
    Millard2012EquilibriumMuscle glmin1_l: max_isometric_force=398.0911 optimal_fiber_length=0.06612733
        tendon_slack_length=0.01569336 pennation_angle_at_optimal=0.1745329 ignore_tendon_compliance=true
      PathPoint P1: pelvis (-0.0577509 -0.0149248 -0.124765)
      PathPoint P2: femur_l (-0.0068976 -0.0099632 -0.053648)
    Millard2012EquilibriumMuscle glmin2_l: max_isometric_force=420.2003 optimal_fiber_length=0.05404025
        tendon_slack_length=0.0251857 pennation_angle_at_optimal=0 ignore_tendon_compliance=true
      PathPoint P1: pelvis (-0.0766693 -0.0142237 -0.116263)
      PathPoint P2: femur_l (-0.0091968 -0.0099632 -0.053648)
    Millard2012EquilibriumMuscle glmin3_l: max_isometric_force=475.4943 optimal_fiber_length=0.03758218
        tendon_slack_length=0.05031314 pennation_angle_at_optimal=0.01745329
      PathPoint P1: pelvis (-0.0982015 -0.0155258 -0.0955492)
      PathPoint P2: femur_l (-0.012933 -0.0079514 -0.05269)
    Millard2012EquilibriumMuscle grac_l: max_isometric_force=299.3954 optimal_fiber_length=0.2254393
        tendon_slack_length=0.1702312 pennation_angle_at_optimal=0.1720016 ignore_tendon_compliance=true
      PathPoint P1: pelvis (-0.0589458 -0.129536 -0.0294071)
      PathPoint P2: tibia_l (-0.0211646 -0.054635 0.0340219)
      PathPoint P3: tibia_l (0.00204522 -0.0799934 0.0180738)
      PathWrap: wrap_object=GR_at_condyles_l method=hybrid
    Millard2012EquilibriumMuscle iliacus_l: max_isometric_force=1086.784 optimal_fiber_length=0.1112431
        tendon_slack_length=0.1003074 pennation_angle_at_optimal=0.279914 ignore_tendon_compliance=true
      PathPoint P1: pelvis (-0.0753002 0.0309515 -0.100937)
      PathPoint P2: pelvis (-0.0168025 -0.0557929 -0.0905203)
      PathPoint P3: femur_l (-0.0022034 -0.054127 -0.0133162)
      PathPoint P4: femur_l (-0.0116876 -0.0610246 -0.0187768)
      PathWrap: wrap_object=IL_at_brim_l method=hybrid range=(2 3)
    Millard2012EquilibriumMuscle perbrev_l: max_isometric_force=554.7066 optimal_fiber_length=0.05489738
        tendon_slack_length=0.1783893 pennation_angle_at_optimal=0.2052361
      PathPoint P1: tibia_l (-0.0279207 -0.290927 -0.0288399)
      PathPoint P2: tibia_l (-0.0389511 -0.447306 -0.0286101)
      PathPoint P3: tibia_l (-0.0327465 -0.46006 -0.0292995)
      PathPoint P4: calcn_l (0.0538426 0.0448405 -0.0348924)
      PathPoint P5: calcn_l (0.0773916 0.0363707 -0.0513652)
    Millard2012EquilibriumMuscle perlong_l: max_isometric_force=1187.072 optimal_fiber_length=0.06195446
        tendon_slack_length=0.4051685 pennation_angle_at_optimal=0.2479525
      PathPoint P1: tibia_l (-0.02298 -0.157758 -0.0324018)
      PathPoint P2: tibia_l (-0.0364233 -0.44811 -0.0272313)
      PathPoint P3: tibia_l (-0.0312528 -0.461209 -0.027576)
      PathPoint P4: calcn_l (0.0500702 0.0381975 -0.0330954)
      PathPoint P5: calcn_l (0.0778489 0.0176041 -0.0425298)
      PathPoint P6: calcn_l (0.0973968 0.0114593 -0.0176708)
      PathPoint P7: calcn_l (0.137522 0.0141165 0.0275545)
    Millard2012EquilibriumMuscle piri_l: max_isometric_force=1095.986 optimal_fiber_length=0.02870658
        tendon_slack_length=0.1268679 pennation_angle_at_optimal=0.1745329
      PathPoint P1: pelvis (-0.126716 -0.00654089 -0.0161763)
      PathPoint P2: pelvis (-0.126977 -0.0307111 -0.0729431)
      PathPoint P3: femur_l (-0.0141784 -0.0034488 -0.0418646)
    Millard2012EquilibriumMuscle psoas_l: max_isometric_force=1518.51 optimal_fiber_length=0.120956
        tendon_slack_length=0.1029969 pennation_angle_at_optimal=0.2155251 ignore_tendon_compliance=true
      PathPoint P1: pelvis (-0.0754247 0.0621034 -0.046697)
      PathPoint P2: pelvis (-0.025515 -0.0655091 -0.0785467)
      PathPoint P3: femur_l (-0.0126456 -0.0447386 -0.0044068)
      PathPoint P4: femur_l (-0.022513 -0.0501992 -0.0084304)
      PathWrap: wrap_object=PS_at_brim_l method=hybrid range=(2 3)
    Millard2012EquilibriumMuscle recfem_l: max_isometric_force=2332.635 optimal_fiber_length=0.07432678
        tendon_slack_length=0.4391974 pennation_angle_at_optimal=0.2170149
      PathPoint P1: pelvis (-0.0298712 -0.0388647 -0.111714)
      PathPoint P2: patella_l (0.00958 0.046942 -0.0006706)
      PathPoint P3: patella_l (0.0115918 0.0418646 0.000958)
      PathPoint P4: patella_l (0.00479 0.00236626 -2.874e-5)
      PathPoint P5: tibia_l (0.0374574 -0.0725249 0.00054003)
      PathWrap: wrap_object=KnExt_at_fem_l method=hybrid
    Millard2012EquilibriumMuscle sart_l: max_isometric_force=265.4464 optimal_fiber_length=0.4035308
        tendon_slack_length=0.1241631 pennation_angle_at_optimal=0.02613542 ignore_tendon_compliance=true
      PathPoint P1: pelvis (-0.0242703 -0.015626 -0.126441)
      PathPoint P2: femur_l (-0.002874 -0.341814 0.0403318)
      PathPoint P3: tibia_l (-0.0288399 -0.0460749 0.0419385)
      PathPoint P4: tibia_l (-0.0182691 -0.0688251 0.0303336)
      PathPoint P5: tibia_l (0.0156264 -0.093069 0.0029874)
    Millard2012EquilibriumMuscle semimem_l: max_isometric_force=2342.476 optimal_fiber_length=0.06712464
        tendon_slack_length=0.3381389 pennation_angle_at_optimal=0.2545615
      PathPoint P1: pelvis (-0.122845 -0.11419 -0.0735178)
      PathPoint P2: tibia_l (-0.033321 -0.0479133 0.0225204)
      PathWrap: wrap_object=SM_at_condyles_l method=hybrid
    Millard2012EquilibriumMuscle semiten_l: max_isometric_force=629.306 optimal_fiber_length=0.1916541
        tendon_slack_length=0.2454751 pennation_angle_at_optimal=0.241295
      PathPoint P1: pelvis (-0.129193 -0.125509 -0.0616639)
      PathPoint P2: tibia_l (-0.0358488 -0.0583692 0.0263121)
      PathPoint P3: tibia_l (0.0021831 -0.0888177 0.0134433)
      PathWrap: wrap_object=ST_at_condyles_l method=hybrid
    Millard2012EquilibriumMuscle soleus_l: max_isometric_force=6593.073 optimal_fiber_length=0.05130401
        tendon_slack_length=0.3226974 pennation_angle_at_optimal=0.3814289
      PathPoint P1: tibia_l (-0.0087324 -0.105248 -0.0112602)
      PathPoint P2: calcn_l (0.00502988 0.0514836 0.0079369)
    Millard2012EquilibriumMuscle tfl_l: max_isometric_force=437.6406 optimal_fiber_length=0.09307454
        tendon_slack_length=0.25 pennation_angle_at_optimal=0.05235988
      PathPoint P1: pelvis (-0.0387081 0.0214357 -0.148592)
      PathPoint P2: femur_l (0.0281652 -0.095321 -0.0571926)
      PathPoint P3: femur_l (0.0102506 -0.38799 -0.0310392)
      PathPoint P4: tibia_l (0.0124092 -0.047109 -0.0397554)
    Millard2012EquilibriumMuscle tibant_l: max_isometric_force=1306.358 optimal_fiber_length=0.08112939
        tendon_slack_length=0.2856289 pennation_angle_at_optimal=0.1951828
      PathPoint P1: tibia_l (0.0176946 -0.150749 -0.0186138)
      PathPoint P2: tibia_l (0.0288399 -0.218999 -0.0147072)
      PathPoint P3: tibia_l (0.0267717 -0.420419 0.0151668)
      PathPoint P4: calcn_l (0.133292 0.0295615 0.0456746)
    Millard2012EquilibriumMuscle tibpost_l: max_isometric_force=1841.376 optimal_fiber_length=0.04458645
        tendon_slack_length=0.3311896 pennation_angle_at_optimal=0.2264891
      PathPoint P1: tibia_l (-0.0047109 -0.14983 -0.0118347)
      PathPoint P2: tibia_l (-0.0188436 -0.419959 0.0201075)
      PathPoint P3: calcn_l (0.0476696 0.0554694 0.0428293)
      PathPoint P4: calcn_l (0.0882516 0.0264061 0.0420805)
    Millard2012EquilibriumMuscle vasint_l: max_isometric_force=1806.474 optimal_fiber_length=0.09844094
        tendon_slack_length=0.2004613 pennation_angle_at_optimal=0.06309973
      PathPoint P1: femur_l (0.027782 -0.184319 -0.029698)
      PathPoint P2: femur_l (0.032093 -0.199647 -0.027303)
      PathPoint P3: patella_l (0.0055564 0.045984 0.0005748)
      PathPoint P4: patella_l (0.00479 0.00236626 0.00037362)
      PathPoint P5: tibia_l (0.0374229 -0.0726168 -0.00049407)
      PathWrap: wrap_object=KnExt_at_fem_l method=hybrid
    Millard2012EquilibriumMuscle vaslat_l: max_isometric_force=5479.752 optimal_fiber_length=0.09837626
        tendon_slack_length=0.2183293 pennation_angle_at_optimal=0.2528673
      PathPoint P1: femur_l (0.0045984 -0.177613 -0.0334342)
      PathPoint P2: femur_l (0.0257702 -0.248218 -0.0391822)
      PathPoint P3: patella_l (0.0098674 0.0405234 -0.0135078)
      PathPoint P4: patella_l (0.00479 0.00236626 -0.00702214)
      PathPoint P5: tibia_l (0.0373885 -0.0728236 -0.00587139)
      PathWrap: wrap_object=KnExt_at_fem_l method=hybrid
    Millard2012EquilibriumMuscle vasmed_l: max_isometric_force=2924.465 optimal_fiber_length=0.09610254
        tendon_slack_length=0.1984639 pennation_angle_at_optimal=0.4222225
      PathPoint P1: femur_l (0.013412 -0.201084 -0.0180104)
      PathPoint P2: femur_l (0.0341048 -0.26527 -0.0008622)
      PathPoint P3: patella_l (0.0060354 0.042631 0.016286)
      PathPoint P4: patella_l (0.00479 0.00236626 0.008143)
      PathPoint P5: tibia_l (0.0366531 -0.0730419 0.00779022)
      PathWrap: wrap_object=KnExt_at_fem_l method=hybrid
    CoordinateActuator tau_pelvis_tilt: coordinate=pelvis_tilt optimal_force=1
    CoordinateActuator tau_pelvis_list: coordinate=pelvis_list optimal_force=1
    CoordinateActuator tau_pelvis_rotation: coordinate=pelvis_rotation optimal_force=1
    CoordinateActuator tau_pelvis_tx: coordinate=pelvis_tx optimal_force=10
    CoordinateActuator tau_pelvis_ty: coordinate=pelvis_ty optimal_force=10
    CoordinateActuator tau_pelvis_tz: coordinate=pelvis_tz optimal_force=10
    SmoothSphereHalfSpaceForce [values shared by the 10 below unless stated]: socket_half_space=/contactgeometryset/floor
        stiffness=1000000 [N/m^2] dissipation=2 [s/m] static_friction=0.8 dynamic_friction=0.8 viscous_friction=0.5
        transition_velocity=0.2 [m/s]
    SmoothSphereHalfSpaceForce heel_r_force: socket_sphere=/contactgeometryset/heel_r_geom
    SmoothSphereHalfSpaceForce mh5_r_force: socket_sphere=/contactgeometryset/mh5_r_geom
    SmoothSphereHalfSpaceForce mh3_r_force: socket_sphere=/contactgeometryset/mh3_r_geom
    SmoothSphereHalfSpaceForce mh1_r_force: socket_sphere=/contactgeometryset/mh1_r_geom
    SmoothSphereHalfSpaceForce hallux_r_force: socket_sphere=/contactgeometryset/hallux_r_geom
    SmoothSphereHalfSpaceForce heel_l_force: socket_sphere=/contactgeometryset/heel_l_geom
    SmoothSphereHalfSpaceForce mh5_l_force: socket_sphere=/contactgeometryset/mh5_l_geom
    SmoothSphereHalfSpaceForce mh3_l_force: socket_sphere=/contactgeometryset/mh3_l_geom
    SmoothSphereHalfSpaceForce mh1_l_force: socket_sphere=/contactgeometryset/mh1_l_geom
    SmoothSphereHalfSpaceForce hallux_l_force: socket_sphere=/contactgeometryset/hallux_l_geom
    ExpressionBasedPointToPointForce coupling_thigh_r: body1=/bodyset/femur_r body2=/bodyset/exo_R_thigh
        point1=(0 -0.2 0) point2=(0 0 0) expression=3283.0*(0.1-d)+367.0*ddot
      PathPoint human_point: femur_r (0 -0.2 0)
      PathPoint exo_point: exo_R_thigh (0 0 0)
    ExpressionBasedPointToPointForce coupling_thigh_l: body1=/bodyset/femur_l body2=/bodyset/exo_L_thigh
        point1=(0 -0.2 0) point2=(0 0 0) expression=3283.0*(0.1-d)+367.0*ddot
      PathPoint human_point: femur_l (0 -0.2 0)
      PathPoint exo_point: exo_L_thigh (0 0 0)
    ExpressionBasedPointToPointForce coupling_shank_r: body1=/bodyset/tibia_r body2=/bodyset/exo_R_shank
        point1=(0 -0.2 0) point2=(0 0 0) expression=3283.0*(0.1-d)+367.0*ddot
      PathPoint human_point: tibia_r (0 -0.2 0)
      PathPoint exo_point: exo_R_shank (0 0 0)
    ExpressionBasedPointToPointForce coupling_shank_l: body1=/bodyset/tibia_l body2=/bodyset/exo_L_shank
        point1=(0 -0.2 0) point2=(0 0 0) expression=3283.0*(0.1-d)+367.0*ddot
      PathPoint human_point: tibia_l (0 -0.2 0)
      PathPoint exo_point: exo_L_shank (0 0 0)
  MarkerSet:
    Marker R.ASIS: pelvis (0.0161802 0.03005 0.153262) fixed=true
    Marker L.ASIS: pelvis (0.0161802 0.03005 -0.153262) fixed=true
    Marker S2: pelvis (-0.224034 0.0250417 0) fixed=true
    Marker R.PSIS: pelvis (-0.191718 0.0223867 0.0347068)
    Marker L.PSIS: pelvis (-0.18765 0.019958 -0.0569678)
    Marker R.TH1: femur_r (0.0630927 -0.131502 0.101979)
    Marker R.TH2: femur_r (-0.045609 -0.13459 0.109406)
    Marker R.TH3: femur_r (-0.0534715 -0.260686 0.0832786)
    Marker R.Knee: femur_r (0 -0.387032 0.045026) fixed=true
    Marker R.SH1: tibia_r (0.000790797 -0.100523 0.0731009)
    Marker R.SH2: tibia_r (0.00547937 -0.212703 0.0805341)
    Marker R.SH3: tibia_r (-0.0830496 -0.108513 0.0759119)
    Marker R.SH4: tibia_r (-0.0778699 -0.228612 0.0764179)
    Marker R.Ankle: tibia_r (-0.012714 -0.426398 0.0534636)
    Marker R.Toe: calcn_r (0.281235 0.0670071 -0.0219348)
    Marker R.MT5: calcn_r (0.174879 0.0274022 0.0742901)
    Marker R.Heel: calcn_r (-0.0159277 0.0264722 -0.00867383)
    Marker L.TH1: femur_l (0.119555 -0.133189 -0.0694037)
    Marker L.TH2: femur_l (0.102279 -0.262359 -0.0477409)
    Marker L.TH3: femur_l (0.0277485 -0.119254 -0.12261)
    Marker L.TH4: femur_l (-0.00684747 -0.248047 -0.0923285)
    Marker L.Knee: femur_l (0 -0.387032 -0.045026) fixed=true
    Marker L.SH1: tibia_l (0.0190401 -0.107873 -0.0463174)
    Marker L.SH2: tibia_l (-0.0736853 -0.101662 -0.0739524)
    Marker L.SH3: tibia_l (-0.0750906 -0.218544 -0.0710846)
    Marker L.Ankle: tibia_l (-0.00256788 -0.425301 -0.0543071)
    Marker L.Toe: calcn_l (0.277751 0.0589609 0.0153878)
    Marker L.Heel: calcn_l (-0.0167905 0.025191 0.00784964)
    Marker L.MT5: calcn_l (0.173816 0.0260923 -0.0767306)
  ContactGeometrySet:
    ContactHalfSpace floor: socket_frame=/ground location=(0 0 0) orientation=(0 0 -1.570796)
    ContactSphere heel_r_geom: socket_frame=/bodyset/calcn_r location=(0.0313 0.0104 0) radius=0.035
    ContactSphere mh5_r_geom: socket_frame=/bodyset/calcn_r location=(0.143 -0.0081 0.037) radius=0.015
    ContactSphere mh3_r_geom: socket_frame=/bodyset/calcn_r location=(0.1658 -0.0081 0.0116) radius=0.015
    ContactSphere mh1_r_geom: socket_frame=/bodyset/calcn_r location=(0.182 -0.0081 -0.023) radius=0.015
    ContactSphere hallux_r_geom: socket_frame=/bodyset/toes_r location=(0.0562 -0.0102 -0.0181) radius=0.015
    ContactSphere heel_l_geom: socket_frame=/bodyset/calcn_l location=(0.0313 0.0104 0) radius=0.035
    ContactSphere mh5_l_geom: socket_frame=/bodyset/calcn_l location=(0.143 -0.0081 -0.037) radius=0.015
    ContactSphere mh3_l_geom: socket_frame=/bodyset/calcn_l location=(0.1658 -0.0081 -0.0116) radius=0.015
    ContactSphere mh1_l_geom: socket_frame=/bodyset/calcn_l location=(0.182 -0.0081 0.023) radius=0.015
    ContactSphere hallux_l_geom: socket_frame=/bodyset/toes_l location=(0.0562 -0.0102 0.0181) radius=0.015
