# OpenSim document version 40500
Model LaiArnoldModified2017_poly_withArms_weldHand_scaled:
  gravity: 0 -9.80665 0
  length_units: meters
  force_units: N
  credits:
    Rajagopal, A, Dembia, C.L., DeMers, M.S., Delp, D.D., Hicks, J.L., and Delp, S.L.
  publications:
    Rajagopal, Apoorva, et al. "Full-Body Musculoskeletal Model for Muscle-Driven Simulation of Human Gait." IEEE Transactions on Biomedical Engineering 63.10 (2016): 2068-2079. (2016)
  Ground
  BodySet:
    Body pelvis: mass=9.92659 [kg] mass_center=(-0.07192531 0 0) inertia=(0.086648 0.07341479 0.04880271 0 0 0)
        meshes=(r_pelvis.vtp l_pelvis.vtp sacrum.vtp)
      WrapCylinder Gmax1_at_pelvis_r: xyz_body_rotation=(-0.6 0.45 0) translation=(-0.0783345 -0.1007158 0.07476083)
          quadrant=-x radius=0.04269128 length=0.1705616
      WrapCylinder Gmax2_at_pelvis_r: xyz_body_rotation=(-0.75 0.39 0) translation=(-0.08138649 -0.08443849 0.08333995)
          quadrant=all radius=0.04307738 length=0.1117537
      WrapCylinder Gmax3_at_pelvis_r: xyz_body_rotation=(-0.1 0 0) translation=(-0.08443849 -0.08952514 0.08333995)
          quadrant=all radius=0.04073896 length=0.1223687
      WrapCylinder Gmax1_at_pelvis_l: xyz_body_rotation=(0.6 -0.45 0) translation=(-0.0783345 -0.1007158 -0.07476083)
          quadrant=-x radius=0.04269128 length=0.1705616
      WrapCylinder Gmax2_at_pelvis_l: xyz_body_rotation=(0.75 -0.39 0)
          translation=(-0.08138649 -0.08443849 -0.08333995) quadrant=all radius=0.04307738 length=0.1117537
      WrapCylinder Gmax3_at_pelvis_l: xyz_body_rotation=(0.1 0 0) translation=(-0.08443849 -0.08952514 -0.08333995)
          quadrant=all radius=0.04073896 length=0.1223687
      WrapCylinder PS_at_brim_r: xyz_body_rotation=(-0.25 -0.27 0.1) translation=(-0.0752825 -0.06103987 0.08039854)
          quadrant=-y radius=0.05159583 length=0.1200948
      WrapCylinder PS_at_brim_l: xyz_body_rotation=(0.25 0.27 0.1) translation=(-0.0752825 -0.06103987 -0.08039854)
          quadrant=-y radius=0.05159583 length=0.1200948
      WrapCylinder IL_at_brim_r: xyz_body_rotation=(-0.32 -0.24 0.9) translation=(-0.07223051 -0.06612652 0.09265441)
          quadrant=-y radius=0.05678255 length=0.1196688
      WrapCylinder IL_at_brim_l: xyz_body_rotation=(0.32 0.24 0.9) translation=(-0.07223051 -0.06612652 -0.09265441)
          quadrant=-y radius=0.05678255 length=0.1196688
    Body femur_r: mass=7.839958 mass_center=(0 -0.1690525 0) inertia=(0.111607 0.0292562 0.1176916 0 0 0)
        meshes=femur_r.vtp
      WrapCylinder GasLat_at_condyles_r: translation=(0.004972133 -0.4077149 0) quadrant=all radius=0.02585509
          length=0.09944265
      WrapCylinder GasMed_at_condyles_r: translation=(0.004972133 -0.4077149 0) quadrant=all radius=0.02486066
          length=0.09944265
      WrapCylinder KnExt_at_fem_r: xyz_body_rotation=(-0.0623366 0.0507601 0)
          translation=(0.003568281 -0.4004874 0.002079455) quadrant=all radius=0.02486066 length=0.09944265
      WrapCylinder KnExtVL_at_fem_r: xyz_body_rotation=(-0.0623366 0.0507601 0)
          translation=(0.001877756 -0.4004874 0.002079455) quadrant=all radius=0.02486066 length=0.09944265
      WrapCylinder AB_at_femshaft_r: xyz_body_rotation=(1.66157 0.186644 0)
          translation=(0.01456179 -0.1119675 0.02323478) quadrant=all radius=0.01640804 length=0.06960986
      WrapCylinder AL_at_femshaft_r: xyz_body_rotation=(1.77711 0.136489 0)
          translation=(0.03056141 -0.2306165 0.01502946) quadrant=all radius=0.01998797 length=0.09944265
      WrapCylinder AMprox_at_femshaft_r: xyz_body_rotation=(1.61126 0.18656 0)
          translation=(0.005154103 -0.07248852 0.02526142) quadrant=all radius=0.0209824 length=0.06960986
      WrapCylinder AMmid_at_femshaft_r: xyz_body_rotation=(1.61139 0.13656 0)
          translation=(0.02288424 -0.1598153 0.02046947) quadrant=all radius=0.02128073 length=0.1193312
      WrapCylinder AMdist_at_femshaft_r: xyz_body_rotation=(1.71188 0.186636 0)
          translation=(0.03143034 -0.2592828 0.009312406) quadrant=all radius=0.0216785 length=0.1988853
      WrapCylinder AMisch_at_condyles_r: xyz_body_rotation=(1.71115 -0.463363 0)
          translation=(-0.02252485 -0.3747307 -0.003136789) quadrant=all radius=0.03977706 length=0.2386624
      WrapCylinder PECT_at_femshaft_r: xyz_body_rotation=(1.81295 0.276344 0)
          translation=(0.006051811 -0.08403192 0.03027084) quadrant=all radius=0.0149164 length=0.04972133
    Body tibia_r: mass=3.124975 mass_center=(0 -0.1820316 0) inertia=(0.04038322 0.004086398 0.0409441 0 0 0)
        meshes=(tibia_r.vtp r_fibula.vtp)
      WrapCylinder GasLat_at_shank_r: xyz_body_rotation=(2.96723 -0.279725 -1.47812)
          translation=(-0.007214965 -0.07214965 -0.003217485) quadrant=-y radius=0.05362474 length=0.09749953
      WrapCylinder GasMed_at_shank_r: xyz_body_rotation=(2.96723 0.0279725 -1.47812)
          translation=(-0.007214965 -0.07214965 -0.003217485) quadrant=-y radius=0.05752472 length=0.09749953
      WrapCylinder GR_at_condyles_r: xyz_body_rotation=(0 -0.4 0) translation=(-0.002924986 -0.01949991 0) quadrant=all
          radius=0.03509983 length=0.09749953
      WrapCylinder SM_at_condyles_r: xyz_body_rotation=(0 -0.1 0) translation=(-0.0009749953 -0.01949991 0)
          quadrant=all radius=0.03363734 length=0.09749953
      WrapCylinder ST_at_condyles_r: xyz_body_rotation=(0 -0.2 0) translation=(-0.001949991 -0.0199874 0) quadrant=all
          radius=0.0414373 length=0.09749953
      WrapCylinder BF_at_gastroc_r: translation=(-0.03802482 -0.05849972 0) quadrant=y radius=0.02827486
          length=0.1462493
    Body patella_r: mass=0.0726562 mass_center=(0.001789968 0.02625286 0)
        inertia=(2.392174e-6 1.092732e-5 1.092732e-5 0 0 0) meshes=r_patella.vtp
    Body talus_r: mass=0.08428793 mass_center=(0 0 0) inertia=(0.0007883755 0.0007883755 0.0007883755 0 0 0)
        meshes=r_talus.vtp
    Body calcn_r: mass=1.053599 mass_center=(0.09671278 0.02901383 0)
        inertia=(0.001103726 0.003074664 0.00323234 0 0 0) meshes=r_foot.vtp
    Body toes_r: mass=0.1825677 mass_center=(0.03346262 0.005802767 -0.01692474)
        inertia=(7.883755e-5 0.0001576751 0.0007883755 0 0 0) meshes=r_bofoot.vtp
    Body femur_l: mass=7.839958 mass_center=(0 -0.1669151 0) inertia=(0.1088026 0.02852108 0.1147344 0 0 0)
        meshes=femur_l.vtp
      WrapCylinder GasLat_at_condyles_l: translation=(0.004909268 -0.40256 0) quadrant=all radius=0.02552819
          length=0.09818536
      WrapCylinder GasMed_at_condyles_l: translation=(0.004909268 -0.40256 0) quadrant=all radius=0.02454634
          length=0.09818536
      WrapCylinder KnExt_at_fem_l: xyz_body_rotation=(0.0623366 -0.0507601 0)
          translation=(0.003523165 -0.3954238 -0.002053164) quadrant=all radius=0.02454634 length=0.09818536
      WrapCylinder KnExtVL_at_fem_l: xyz_body_rotation=(0.0623366 -0.0507601 0)
          translation=(0.001854014 -0.3954238 -0.002053164) quadrant=all radius=0.02454634 length=0.09818536
      WrapCylinder AB_at_femshaft_l: xyz_body_rotation=(-1.66157 -0.186644 0)
          translation=(0.01437767 -0.1105518 -0.02294101) quadrant=all radius=0.01620058 length=0.06872975
      WrapCylinder AL_at_femshaft_l: xyz_body_rotation=(-1.77711 -0.136489 0)
          translation=(0.03017501 -0.2277007 -0.01483944) quadrant=all radius=0.01973526 length=0.09818536
      WrapCylinder AMprox_at_femshaft_l: xyz_body_rotation=(-1.61126 -0.18656 0)
          translation=(0.005088937 -0.07157202 -0.02494203) quadrant=all radius=0.02071711 length=0.06872975
      WrapCylinder AMmid_at_femshaft_l: xyz_body_rotation=(-1.61139 -0.13656 0)
          translation=(0.02259491 -0.1577947 -0.02021067) quadrant=all radius=0.02101167 length=0.1178224
      WrapCylinder AMdist_at_femshaft_l: xyz_body_rotation=(-1.71188 -0.186636 0)
          translation=(0.03103295 -0.2560046 -0.009194666) quadrant=all radius=0.02140441 length=0.1963707
      WrapCylinder AMisch_at_condyles_l: xyz_body_rotation=(-1.71115 0.463363 0)
          translation=(-0.02224006 -0.3699929 0.003097129) quadrant=all radius=0.03927414 length=0.2356449
      WrapCylinder PECT_at_femshaft_l: xyz_body_rotation=(-1.81295 -0.276344 0)
          translation=(0.005975296 -0.08296947 -0.02988811) quadrant=all radius=0.0147278 length=0.04909268
    Body tibia_l: mass=3.124975 mass_center=(0 -0.1839217 0) inertia=(0.04122621 0.0041717 0.0417988 0 0 0)
        meshes=(tibia_l.vtp l_fibula.vtp)
      WrapCylinder GasLat_at_shank_l: xyz_body_rotation=(-2.96723 0.279725 -1.47812)
          translation=(-0.007289881 -0.07289881 0.003250893) quadrant=-y radius=0.05418155 length=0.09851191
      WrapCylinder GasMed_at_shank_l: xyz_body_rotation=(-2.96723 -0.0279725 -1.47812)
          translation=(-0.007289881 -0.07289881 0.003250893) quadrant=-y radius=0.05812203 length=0.09851191
      WrapCylinder GR_at_condyles_l: xyz_body_rotation=(0 0.4 0) translation=(-0.002955357 -0.01970238 0) quadrant=all
          radius=0.03546429 length=0.09851191
      WrapCylinder SM_at_condyles_l: xyz_body_rotation=(0 0.1 0) translation=(-0.0009851191 -0.01970238 0) quadrant=all
          radius=0.03398661 length=0.09851191
      WrapCylinder ST_at_condyles_l: xyz_body_rotation=(0 0.2 0) translation=(-0.001970238 -0.02019494 0) quadrant=all
          radius=0.04186756 length=0.09851191
      WrapCylinder BF_at_gastroc_l: translation=(-0.03841965 -0.05910715 0) quadrant=all radius=0.02856845
          length=0.1477679
    Body patella_l: mass=0.0726562 mass_center=(0.001767336 0.02592093 0)
        inertia=(2.332065e-6 1.065275e-5 1.065275e-5 0 0 0) meshes=l_patella.vtp
    Body talus_l: mass=0.08428793 mass_center=(0 0 0) inertia=(0.0007883755 0.0007883755 0.0007883755 0 0 0)
        meshes=l_talus.vtp
    Body calcn_l: mass=1.053599 mass_center=(0.09671278 0.02901383 0)
        inertia=(0.001103726 0.003074664 0.00323234 0 0 0) meshes=l_foot.vtp
    Body toes_l: mass=0.1825677 mass_center=(0.03346262 0.005802767 0.01692474)
        inertia=(7.883755e-5 0.0001576751 0.0007883755 0 0 0) meshes=l_bofoot.vtp
    Body torso: mass=22.61159 mass_center=(-0.02758963 0.2942894 0) inertia=(1.242826 0.6367953 1.206497 0 0 0)
        meshes=(hat_spine.vtp hat_jaw.vtp hat_skull.vtp hat_ribs_scap.vtp)
    Body humerus_r: mass=1.713152 mass_center=(0 -0.1694059 0) inertia=(0.01067831 0.003683685 0.01198606 0 0 0)
        meshes=humerus_rv.vtp
    Body ulna_r: mass=0.5120492 mass_center=(0 -0.1150028 0) inertia=(0.00227307 0.0004742597 0.00246569 0 0 0)
        meshes=ulna_rv.vtp
    Body radius_r: mass=0.5120492 mass_center=(0 -0.1150028 0) inertia=(0.00227307 0.0004742597 0.00246569 0 0 0)
        meshes=radius_rv.vtp
    Body hand_r: mass=0.3856173 mass_center=(0 -0.06497502 0) inertia=(0.0006845302 0.0004197735 0.00102833 0 0 0)
        meshes=(pisiform_rvs.vtp lunate_rvs.vtp scaphoid_rvs.vtp triquetrum_rvs.vtp hamate_rvs.vtp capitate_rvs.vtp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)
    Body humerus_l: mass=1.713152 mass_center=(0 -0.1694059 0) inertia=(0.01067831 0.003683685 0.01198606 0 0 0)
        meshes=humerus_lv.vtp
    Body ulna_l: mass=0.5120492 mass_center=(0 -0.1150028 0) inertia=(0.00227307 0.0004742597 0.00246569 0 0 0)
        meshes=ulna_lv.vtp
    Body radius_l: mass=0.5120492 mass_center=(0 -0.1150028 0) inertia=(0.00227307 0.0004742597 0.00246569 0 0 0)
        meshes=radius_lv.vtp
    Body hand_l: mass=0.3856173 mass_center=(0 -0.06497502 0) inertia=(0.0006845302 0.0004197735 0.00102833 0 0 0)
        meshes=(pisiform_lvs.vtp lunate_lvs.vtp scaphoid_lvs.vtp triquetrum_lvs.vtp hamate_lvs.vtp capitate_lvs.vtp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)
    Body exo_back: mass=1 mass_center=(0 0 0) inertia=(0.1 0.1 0.1 0 0 0)
      Brick exo_back_geom_1: half_lengths=(0.01 0.1 0.1)
    Body exo_waist: mass=1 mass_center=(0 0 0) inertia=(0.1 0.1 0.1 0 0 0)
      Brick exo_waist_geom_1: half_lengths=(0.02 0.01 0.2169774)
    Body exo_w2h_R: mass=0 mass_center=(0 0 0) inertia=(0 0 0 0 0 0)
      Brick exo_w2h_R_geom_1: half_lengths=(0.09177409 0.01 0.01)
    Body exo_w2h_L: mass=0 mass_center=(0 0 0) inertia=(0 0 0 0 0 0)
      Brick exo_w2h_L_geom_1: half_lengths=(0.09177409 0.01 0.01)
    Body exo_waist_2_thigh_R: mass=1 mass_center=(0 0 0) inertia=(0.1 0.1 0.1 0 0 0)
      Cylinder exo_waist_2_thigh_R_geom_1: radius=0.01 half_height=-0.08138141
    Body exo_R_thigh: mass=1 mass_center=(0 0 0) inertia=(0.1 0.1 0.1 0 0 0)
      Cylinder exo_R_thigh_geom_1: radius=0.01 half_height=0.2088452
    Body exo_R_shank: mass=1 mass_center=(0 0 0) inertia=(0.1 0.1 0.1 0 0 0)
      Cylinder exo_R_shank_geom_1: radius=0.01 half_height=0.1996923
    Body exo_R_feet: mass=1 mass_center=(0 0 0) inertia=(0.1 0.1 0.1 0 0 0)
      PhysicalOffsetFrame calcn_weld_frame_r: socket_parent=..
          translation=(-0.04716682 0.005637114 0.00765965) [meters] orientation=(-1.76819 0.906223 1.8196) [radians]
      Brick exo_R_feet_geom_1: half_lengths=(0.1 0.001 0.1)
    Body exo_waist_2_thigh_L: mass=1 mass_center=(0 0 0) inertia=(0.1 0.1 0.1 0 0 0)
      Cylinder exo_waist_2_thigh_L_geom_1: radius=0.01 half_height=-0.08138141
    Body exo_L_thigh: mass=1 mass_center=(0 0 0) inertia=(0.1 0.1 0.1 0 0 0)
      Cylinder exo_L_thigh_geom_1: radius=0.01 half_height=0.2088452
    Body exo_L_shank: mass=1 mass_center=(0 0 0) inertia=(0.1 0.1 0.1 0 0 0)
      Cylinder exo_L_shank_geom_1: radius=0.01 half_height=0.1996923
    Body exo_L_feet: mass=1 mass_center=(0 0 0) inertia=(0.1 0.1 0.1 0 0 0)
      PhysicalOffsetFrame calcn_weld_frame_l: socket_parent=.. translation=(-0.04716682 0.006773594 -0.00765965)
          orientation=(1.76819 -0.906223 1.8196)
      Brick exo_L_feet_geom_1: half_lengths=(0.1 0.001 0.1)
  JointSet:
    CustomJoint ground_pelvis: socket_parent_frame=ground_offset socket_child_frame=pelvis_offset
      Coordinate pelvis_tilt: default_value=0 range=(-1.570796 1.570796) clamped=true
      Coordinate pelvis_list: default_value=0 range=(-1.570796 1.570796) clamped=true
      Coordinate pelvis_rotation: default_value=0 range=(-3.14 3.14) clamped=true
      Coordinate pelvis_tx: default_value=0 range=(-5 5) clamped=true
      Coordinate pelvis_ty: default_value=0.93 range=(-1 2) clamped=true
      Coordinate pelvis_tz: default_value=0 range=(-3 3) clamped=true
      PhysicalOffsetFrame ground_offset: socket_parent=/ground translation=(0 0 0)
      PhysicalOffsetFrame pelvis_offset: socket_parent=/bodyset/pelvis translation=(0 0 0)
      SpatialTransform:
        TransformAxis rotation1: coordinates=pelvis_tilt axis=(0 0 1) LinearFunction(coefficients=1 0)
        TransformAxis rotation2: coordinates=pelvis_list axis=(1 0 0) LinearFunction(coefficients=1 0)
        TransformAxis rotation3: coordinates=pelvis_rotation axis=(0 1 0) LinearFunction(coefficients=1 0)
        TransformAxis translation1: coordinates=pelvis_tx axis=(1 0 0) LinearFunction(coefficients=1 0)
        TransformAxis translation2: coordinates=pelvis_ty axis=(0 1 0) LinearFunction(coefficients=1 0)
        TransformAxis translation3: coordinates=pelvis_tz axis=(0 0 1) LinearFunction(coefficients=1 0)
    CustomJoint hip_r: socket_parent_frame=pelvis_offset socket_child_frame=femur_r_offset
      Coordinate hip_flexion_r: default_value=0 range=(-0.5235988 2.094395) clamped=true
      Coordinate hip_adduction_r: default_value=0 range=(-0.8726646 0.5235988) clamped=true
      Coordinate hip_rotation_r: default_value=0 range=(-0.6981317 0.6981317) clamped=true
      PhysicalOffsetFrame pelvis_offset: socket_parent=/bodyset/pelvis translation=(-0.05725133 -0.07985032 0.09468889)
      PhysicalOffsetFrame femur_r_offset: socket_parent=/bodyset/femur_r translation=(0 0 0)
      SpatialTransform: axes_held_at_zero=(translation1 translation2 translation3)
        TransformAxis rotation1: coordinates=hip_flexion_r axis=(0 0 1) LinearFunction(coefficients=1 0)
        TransformAxis rotation2: coordinates=hip_adduction_r axis=(1 0 0) LinearFunction(coefficients=1 0)
        TransformAxis rotation3: coordinates=hip_rotation_r axis=(0 1 0) LinearFunction(coefficients=1 0)
    CustomJoint walker_knee_r: socket_parent_frame=femur_r_offset socket_child_frame=tibia_r_offset
      Coordinate knee_angle_r: default_value=0 range=(0 2.443461) clamped=true
      PhysicalOffsetFrame femur_r_offset: socket_parent=/bodyset/femur_r
          translation=(-0.004474919 -0.4073171 -0.001740246) orientation=(-1.64157 1.44618 1.5708)
      PhysicalOffsetFrame tibia_r_offset: socket_parent=/bodyset/tibia_r
          translation=(-0.007887264 -0.003446413 -0.001447615) orientation=(-1.64157 1.44618 1.5708)
      SpatialTransform:
        TransformAxis rotation1: coordinates=knee_angle_r axis=(1 0 0) LinearFunction(coefficients=1 0)
        TransformAxis rotation2: coordinates=knee_angle_r axis=(0 0 1)
          PolynomialFunction: coefficients=(0.01083209 -0.02521833 -0.03284781 0.07910001 -1.473252e-8)
        TransformAxis rotation3: coordinates=knee_angle_r axis=(0 1 0)
          PolynomialFunction: coefficients=(0.02516576 -0.1694801 0.3694993 -4.430358e-8)
        TransformAxis translation1: coordinates=knee_angle_r axis=(1 0 0)
          MultiplierFunction: scale=0.9944265
            PolynomialFunction: coefficients=(0.0001590448 -0.00101515 0.001817511 2.641427e-5 -7.746564e-7)
        TransformAxis translation2: coordinates=knee_angle_r axis=(0 1 0)
          MultiplierFunction: scale=0.9944265
            PolynomialFunction: coefficients=(-0.0005796878 0.005079766 -0.01144238 0.003936909 -2.51635e-5)
        TransformAxis translation3: coordinates=knee_angle_r axis=(0 0 1)
          MultiplierFunction: scale=0.9944265
            PolynomialFunction: coefficients=(0.001208087 -0.004453611 0.0006116494 0.00626543 -1.461913e-5)
    CustomJoint patellofemoral_r: socket_parent_frame=femur_r_offset socket_child_frame=patella_r_offset
      Coordinate knee_angle_r_beta: default_value=0 range=(-99999.9 99999.9) clamped=false
      PhysicalOffsetFrame femur_r_offset: socket_parent=/bodyset/femur_r
          translation=(-0.00804491 -0.4056862 -0.002734673)
      PhysicalOffsetFrame patella_r_offset: socket_parent=/bodyset/patella_r translation=(0 0 0)
      SpatialTransform: axes_held_at_zero=(rotation2 rotation3)
        TransformAxis rotation1: coordinates=knee_angle_r_beta axis=(0 0 1)
          SimmSpline: x=(0 0.174533 0.349066 0.523599 0.698132 0.872665 1.0472 1.22173 1.39626 1.5708 1.74533 1.91986 2.0944)
              y=(0.00113686 -0.00629212 -0.105582 -0.253683 -0.414245 -0.579047 -0.747244 -0.91799 -1.09044 -1.26379 -1.43763 -1.61186 -1.78634)
        TransformAxis translation1: coordinates=knee_angle_r_beta axis=(1 0 0)
          MultiplierFunction: scale=0.9944265
            SimmSpline: x=(0 0.174533 0.349066 0.523599 0.698132 0.872665 1.0472 1.22173 1.39626 1.5708 1.74533 1.91986 2.0944)
                y=(0.0524 0.0488 0.0437 0.0371 0.0296 0.0216 0.0136 0.0057 -0.0019 -0.0088 -0.0148 -0.0196 -0.0227)
        TransformAxis translation2: coordinates=knee_angle_r_beta axis=(0 1 0)
          MultiplierFunction: scale=0.9944265
            SimmSpline: x=(0 0.174533 0.349066 0.523599 0.698132 0.872665 1.0472 1.22173 1.39626 1.5708 1.74533 1.91986 2.0944)
                y=(-0.0108 -0.019 -0.0263 -0.0322 -0.0367 -0.0395 -0.0408 -0.0404 -0.0384 -0.0349 -0.0301 -0.0245 -0.0187)
        TransformAxis translation3: axis=(0 0 1) MultiplierFunction(scale=0.9944265, Constant(value=0.00275))
    PinJoint ankle_r: socket_parent_frame=tibia_r_offset socket_child_frame=talus_r_offset
      Coordinate ankle_angle_r: default_value=0 range=(-0.8726646 0.8726646) clamped=true
      PhysicalOffsetFrame tibia_r_offset: socket_parent=/bodyset/tibia_r translation=(-0.009749953 -0.3899981 0)
          orientation=(0.175895 -0.105208 0.0186622)
      PhysicalOffsetFrame talus_r_offset: socket_parent=/bodyset/talus_r translation=(0 0 0)
          orientation=(0.175895 -0.105208 0.0186622)
    PinJoint subtalar_r: socket_parent_frame=talus_r_offset socket_child_frame=calcn_r_offset
      Coordinate subtalar_angle_r: default_value=0 range=(-0.6108652 0.6108652) clamped=true
      PhysicalOffsetFrame talus_r_offset: socket_parent=/bodyset/talus_r
          translation=(-0.04716682 -0.04057101 0.007659652) orientation=(-1.76819 0.906223 1.8196)
      PhysicalOffsetFrame calcn_r_offset: socket_parent=/bodyset/calcn_r translation=(0 0 0)
          orientation=(-1.76819 0.906223 1.8196)
    PinJoint mtp_r: socket_parent_frame=calcn_r_offset socket_child_frame=toes_r_offset
      Coordinate mtp_angle_r: default_value=0 range=(-0.7853982 0.5235988) clamped=true
      PhysicalOffsetFrame calcn_r_offset: socket_parent=/bodyset/calcn_r
          translation=(0.1729224 -0.001934256 0.001044498) orientation=(-3.14159 0.619901 0)
      PhysicalOffsetFrame toes_r_offset: socket_parent=/bodyset/toes_r translation=(0 0 0)
          orientation=(-3.14159 0.619901 0)
    CustomJoint hip_l: socket_parent_frame=pelvis_offset socket_child_frame=femur_l_offset
      Coordinate hip_flexion_l: default_value=0 range=(-0.5235988 2.094395) clamped=true
      Coordinate hip_adduction_l: default_value=0 range=(-0.8726646 0.5235988) clamped=true
      Coordinate hip_rotation_l: default_value=0 range=(-0.6981317 0.6981317) clamped=true
      PhysicalOffsetFrame pelvis_offset: socket_parent=/bodyset/pelvis
          translation=(-0.05725133 -0.07985032 -0.09468889)
      PhysicalOffsetFrame femur_l_offset: socket_parent=/bodyset/femur_l translation=(0 0 0)
      SpatialTransform: axes_held_at_zero=(translation1 translation2 translation3)
        TransformAxis rotation1: coordinates=hip_flexion_l axis=(0 0 1) LinearFunction(coefficients=1 0)
        TransformAxis rotation2: coordinates=hip_adduction_l axis=(1 0 0) LinearFunction(coefficients=-1 0)
        TransformAxis rotation3: coordinates=hip_rotation_l axis=(0 1 0) LinearFunction(coefficients=-1 0)
    CustomJoint walker_knee_l: socket_parent_frame=femur_l_offset socket_child_frame=tibia_l_offset
      Coordinate knee_angle_l: default_value=0 range=(0 2.443461) clamped=true
      PhysicalOffsetFrame femur_l_offset: socket_parent=/bodyset/femur_l
          translation=(-0.004418341 -0.4021672 0.001718244) orientation=(1.64157 -1.44618 1.5708)
      PhysicalOffsetFrame tibia_l_offset: socket_parent=/bodyset/tibia_l
          translation=(-0.00796916 -0.003482199 0.001462646) orientation=(1.64157 -1.44618 1.5708)
      SpatialTransform:
        TransformAxis rotation1: coordinates=knee_angle_l axis=(-1 0 0) LinearFunction(coefficients=1 0)
        TransformAxis rotation2: coordinates=knee_angle_l axis=(0 0 1)
          PolynomialFunction: coefficients=(0.01083209 -0.02521833 -0.03284781 0.07910001 -1.473252e-8)
        TransformAxis rotation3: coordinates=knee_angle_l axis=(0 1 0)
          PolynomialFunction: coefficients=(-0.02516576 0.1694801 -0.3694993 4.430358e-8)
        TransformAxis translation1: coordinates=knee_angle_l axis=(1 0 0)
          MultiplierFunction: scale=0.9818536
            PolynomialFunction: coefficients=(0.0001590448 -0.00101515 0.001817511 2.641427e-5 -7.746564e-7)
        TransformAxis translation2: coordinates=knee_angle_l axis=(0 1 0)
          MultiplierFunction: scale=0.9818536
            PolynomialFunction: coefficients=(-0.0005796878 0.005079766 -0.01144238 0.003936909 -2.51635e-5)
        TransformAxis translation3: coordinates=knee_angle_l axis=(0 0 1)
          MultiplierFunction: scale=0.9818536
            PolynomialFunction: coefficients=(-0.001208087 0.004453611 -0.0006116494 -0.00626543 1.461913e-5)
    CustomJoint patellofemoral_l: socket_parent_frame=femur_l_offset socket_child_frame=patella_l_offset
      Coordinate knee_angle_l_beta: default_value=0 range=(-99999.9 99999.9) clamped=false
      PhysicalOffsetFrame femur_l_offset: socket_parent=/bodyset/femur_l
          translation=(-0.007943195 -0.400557 0.002700097)
      PhysicalOffsetFrame patella_l_offset: socket_parent=/bodyset/patella_l translation=(0 0 0)
      SpatialTransform: axes_held_at_zero=(rotation2 rotation3)
        TransformAxis rotation1: coordinates=knee_angle_l_beta axis=(0 0 1)
          SimmSpline: x=(0 0.174533 0.349066 0.523599 0.698132 0.872665 1.0472 1.22173 1.39626 1.5708 1.74533 1.91986 2.0944)
              y=(0.00113686 -0.00629212 -0.105582 -0.253683 -0.414245 -0.579047 -0.747244 -0.91799 -1.09044 -1.26379 -1.43763 -1.61186 -1.78634)
        TransformAxis translation1: coordinates=knee_angle_l_beta axis=(1 0 0)
          MultiplierFunction: scale=0.9818536
            SimmSpline: x=(0 0.174533 0.349066 0.523599 0.698132 0.872665 1.0472 1.22173 1.39626 1.5708 1.74533 1.91986 2.0944)
                y=(0.0524 0.0488 0.0437 0.0371 0.0296 0.0216 0.0136 0.0057 -0.0019 -0.0088 -0.0148 -0.0196 -0.0227)
        TransformAxis translation2: coordinates=knee_angle_l_beta axis=(0 1 0)
          MultiplierFunction: scale=0.9818536
            SimmSpline: x=(0 0.174533 0.349066 0.523599 0.698132 0.872665 1.0472 1.22173 1.39626 1.5708 1.74533 1.91986 2.0944)
                y=(-0.0108 -0.019 -0.0263 -0.0322 -0.0367 -0.0395 -0.0408 -0.0404 -0.0384 -0.0349 -0.0301 -0.0245 -0.0187)
        TransformAxis translation3: axis=(0 0 1) MultiplierFunction(scale=0.9818536, Constant(value=-0.00275))
    PinJoint ankle_l: socket_parent_frame=tibia_l_offset socket_child_frame=talus_l_offset
      Coordinate ankle_angle_l: default_value=0 range=(-0.8726646 0.8726646) clamped=true
      PhysicalOffsetFrame tibia_l_offset: socket_parent=/bodyset/tibia_l translation=(-0.009851191 -0.3940476 0)
          orientation=(-0.175895 0.105208 0.0186622)
      PhysicalOffsetFrame talus_l_offset: socket_parent=/bodyset/talus_l translation=(0 0 0)
          orientation=(-0.175895 0.105208 0.0186622)
    PinJoint subtalar_l: socket_parent_frame=talus_l_offset socket_child_frame=calcn_l_offset
      Coordinate subtalar_angle_l: default_value=0 range=(-0.6108652 0.6108652) clamped=true
      PhysicalOffsetFrame talus_l_offset: socket_parent=/bodyset/talus_l
          translation=(-0.04716682 -0.04057101 -0.007659652) orientation=(1.76819 -0.906223 1.8196)
      PhysicalOffsetFrame calcn_l_offset: socket_parent=/bodyset/calcn_l translation=(0 0 0)
          orientation=(1.76819 -0.906223 1.8196)
    PinJoint mtp_l: socket_parent_frame=calcn_l_offset socket_child_frame=toes_l_offset
      Coordinate mtp_angle_l: default_value=0 range=(-0.7853982 0.5235988) clamped=true
      PhysicalOffsetFrame calcn_l_offset: socket_parent=/bodyset/calcn_l
          translation=(0.1729224 -0.001934256 -0.001044498) orientation=(-3.14159 -0.619901 0)
      PhysicalOffsetFrame toes_l_offset: socket_parent=/bodyset/toes_l translation=(0 0 0)
          orientation=(-3.14159 -0.619901 0)
    CustomJoint back: socket_parent_frame=pelvis_offset socket_child_frame=torso_offset
      Coordinate lumbar_extension: default_value=0 range=(-1.570796 1.570796) clamped=true
      Coordinate lumbar_bending: default_value=0 range=(-1.570796 1.570796) clamped=true
      Coordinate lumbar_rotation: default_value=0 range=(-1.570796 1.570796) clamped=true
      PhysicalOffsetFrame pelvis_offset: socket_parent=/bodyset/pelvis translation=(-0.1024452 0.08291249 0)
      PhysicalOffsetFrame torso_offset: socket_parent=/bodyset/torso translation=(0 0 0)
      SpatialTransform: axes_held_at_zero=(translation1 translation2 translation3)
        TransformAxis rotation1: coordinates=lumbar_extension axis=(0 0 1) LinearFunction(coefficients=1 0)
        TransformAxis rotation2: coordinates=lumbar_bending axis=(1 0 0) LinearFunction(coefficients=1 0)
        TransformAxis rotation3: coordinates=lumbar_rotation axis=(0 1 0) LinearFunction(coefficients=1 0)
    CustomJoint acromial_r: socket_parent_frame=torso_offset socket_child_frame=humerus_r_offset
      Coordinate arm_flex_r: default_value=0 range=(-3.141593 3.141593) clamped=true
      Coordinate arm_add_r: default_value=0 range=(-3.141593 3.141593) clamped=true
      Coordinate arm_rot_r: default_value=0 range=(-3.141593 3.141593) clamped=true
      PhysicalOffsetFrame torso_offset: socket_parent=/bodyset/torso translation=(0.002901509 0.3416515 0.1877491)
      PhysicalOffsetFrame humerus_r_offset: socket_parent=/bodyset/humerus_r translation=(0 0 0)
      SpatialTransform: axes_held_at_zero=(translation1 translation2 translation3)
        TransformAxis rotation1: coordinates=arm_flex_r axis=(0 0 1) LinearFunction(coefficients=1 0)
        TransformAxis rotation2: coordinates=arm_add_r axis=(1 0 0) LinearFunction(coefficients=1 0)
        TransformAxis rotation3: coordinates=arm_rot_r axis=(0 1 0) LinearFunction(coefficients=1 0)
    PinJoint elbow_r: socket_parent_frame=humerus_r_offset socket_child_frame=ulna_r_offset
      Coordinate elbow_flex_r: default_value=0 range=(0 2.618) clamped=true
      PhysicalOffsetFrame humerus_r_offset: socket_parent=/bodyset/humerus_r
          translation=(0.01353583 -0.2948069 -0.00988103) orientation=(-0.0228627 0.228018 0.0051689)
      PhysicalOffsetFrame ulna_r_offset: socket_parent=/bodyset/ulna_r translation=(0 0 0)
          orientation=(-0.0228627 0.228018 0.0051689)
    PinJoint radioulnar_r: socket_parent_frame=ulna_r_offset socket_child_frame=radius_r_offset
      Coordinate pro_sup_r: default_value=0 range=(0 2.09) clamped=true
      PhysicalOffsetFrame ulna_r_offset: socket_parent=/bodyset/ulna_r
          translation=(-0.006418782 -0.01241104 0.02488793) orientation=(-1.56884 0.056428 1.53614)
      PhysicalOffsetFrame radius_r_offset: socket_parent=/bodyset/radius_r translation=(0 0 0)
          orientation=(-1.56884 0.056428 1.53614)
    WeldJoint radius_hand_r: socket_parent_frame=radius_r_offset socket_child_frame=hand_r_offset
      PhysicalOffsetFrame radius_r_offset: socket_parent=/bodyset/radius_r
          translation=(-0.008393938 -0.2250352 0.01298642) orientation=(-1.5708 0 -1.5708)
      PhysicalOffsetFrame hand_r_offset: socket_parent=/bodyset/hand_r translation=(0 0 0)
          orientation=(-1.5708 0 -1.5708)
    CustomJoint acromial_l: socket_parent_frame=torso_offset socket_child_frame=humerus_l_offset
      Coordinate arm_flex_l: default_value=0 range=(-3.141593 3.141593) clamped=true
      Coordinate arm_add_l: default_value=0 range=(-3.141593 3.141593) clamped=true
      Coordinate arm_rot_l: default_value=0 range=(-3.141593 3.141593) clamped=true
      PhysicalOffsetFrame torso_offset: socket_parent=/bodyset/torso translation=(0.002901509 0.3416515 -0.1877491)
      PhysicalOffsetFrame humerus_l_offset: socket_parent=/bodyset/humerus_l translation=(0 0 0)
      SpatialTransform: axes_held_at_zero=(translation1 translation2 translation3)
        TransformAxis rotation1: coordinates=arm_flex_l axis=(0 0 1) LinearFunction(coefficients=1 0)
        TransformAxis rotation2: coordinates=arm_add_l axis=(-1 0 0) LinearFunction(coefficients=1 0)
        TransformAxis rotation3: coordinates=arm_rot_l axis=(0 -1 0) LinearFunction(coefficients=1 0)
    PinJoint elbow_l: socket_parent_frame=humerus_l_offset socket_child_frame=ulna_l_offset
      Coordinate elbow_flex_l: default_value=0 range=(0 2.618) clamped=true
      PhysicalOffsetFrame humerus_l_offset: socket_parent=/bodyset/humerus_l
          translation=(0.01353583 -0.2948069 0.00988103) orientation=(0.0228627 -0.228018 0.0051689)
      PhysicalOffsetFrame ulna_l_offset: socket_parent=/bodyset/ulna_l translation=(0 0 0)
          orientation=(0.0228627 -0.228018 0.0051689)
    PinJoint radioulnar_l: socket_parent_frame=ulna_l_offset socket_child_frame=radius_l_offset
      Coordinate pro_sup_l: default_value=0 range=(0 2.09) clamped=true
      PhysicalOffsetFrame ulna_l_offset: socket_parent=/bodyset/ulna_l
          translation=(-0.006418782 -0.01241104 -0.02488793) orientation=(1.56884 -0.056428 1.53614)
      PhysicalOffsetFrame radius_l_offset: socket_parent=/bodyset/radius_l translation=(0 0 0)
          orientation=(1.56884 -0.056428 1.53614)
    WeldJoint radius_hand_l: socket_parent_frame=radius_l_offset socket_child_frame=hand_l_offset
      PhysicalOffsetFrame radius_l_offset: socket_parent=/bodyset/radius_l
          translation=(-0.008393938 -0.2250352 -0.01298642) orientation=(1.5708 0 1.5708)
      PhysicalOffsetFrame hand_l_offset: socket_parent=/bodyset/hand_l translation=(0 0 0)
          orientation=(1.5708 0 1.5708)
    WeldJoint exo_back_2_human: socket_parent_frame=torso_offset socket_child_frame=exo_back_offset
      PhysicalOffsetFrame torso_offset: socket_parent=/bodyset/torso translation=(0 0 0)
      PhysicalOffsetFrame exo_back_offset: socket_parent=/bodyset/exo_back translation=(0.08109902 -0.1 0)
    CustomJoint exo_lumbar_joint: socket_parent_frame=exo_back_offset socket_child_frame=exo_waist_offset
      Coordinate exo_back_flexion_R: range=(-2.5 2.5) clamped=true
      Coordinate exo_back_bending_R: range=(-2.5 2.5) clamped=true
      Coordinate exo_back_rot_R: range=(-2.5 2.5) clamped=true
      Coordinate exo_back_trans_R: range=(-2.5 5) clamped=true
      PhysicalOffsetFrame exo_back_offset: socket_parent=/bodyset/exo_back translation=(0.08109902 -0.1 0)
      PhysicalOffsetFrame exo_waist_offset: socket_parent=/bodyset/exo_waist translation=(0.08109902 0 0)
      SpatialTransform:
        TransformAxis rotation1: coordinates=exo_back_flexion_R axis=(0 0 1) LinearFunction(coefficients=1 0)
        TransformAxis rotation2: coordinates=exo_back_bending_R axis=(1 0 0) LinearFunction(coefficients=1 0)
        TransformAxis rotation3: coordinates=exo_back_rot_R axis=(0 1 0) LinearFunction(coefficients=1 0)
        TransformAxis translation1: coordinates=exo_back_trans_R axis=(0 1 0) LinearFunction(coefficients=1 0)
        TransformAxis translation2: axis=(1 0 0)
        TransformAxis translation3: axis=(0 0 1)
    WeldJoint exo_waist2_w2h_R: socket_parent_frame=exo_waist_offset socket_child_frame=exo_w2h_R_offset
      PhysicalOffsetFrame exo_waist_offset: socket_parent=/bodyset/exo_waist translation=(0.09177409 0 0.2069774)
      PhysicalOffsetFrame exo_w2h_R_offset: socket_parent=/bodyset/exo_w2h_R translation=(0 0 0)
    WeldJoint exo_waist2_w2h_L: socket_parent_frame=exo_waist_offset socket_child_frame=exo_w2h_L_offset
      PhysicalOffsetFrame exo_waist_offset: socket_parent=/bodyset/exo_waist translation=(0.09177409 0 -0.2069774)
      PhysicalOffsetFrame exo_w2h_L_offset: socket_parent=/bodyset/exo_w2h_L translation=(0 0 0)
    CustomJoint exo_hip_AR_joint_R: socket_parent_frame=exo_w2h_R_offset socket_child_frame=exo_waist_2_thigh_R_offset
      Coordinate exo_hip_adduction_R: range=(-1.8 1.52) clamped=true
      Coordinate exo_hip_rot_R: range=(-1.69 1.69) clamped=true
      PhysicalOffsetFrame exo_w2h_R_offset: socket_parent=/bodyset/exo_w2h_R translation=(0.03451885 0 0)
      PhysicalOffsetFrame exo_waist_2_thigh_R_offset: socket_parent=/bodyset/exo_waist_2_thigh_R
          translation=(0 0.08138141 0)
      SpatialTransform:
        TransformAxis rotation1: coordinates=exo_hip_adduction_R axis=(1 0 0) LinearFunction(coefficients=1 0)
        TransformAxis rotation2: coordinates=exo_hip_rot_R axis=(0 1 0) LinearFunction(coefficients=1 0)
        TransformAxis rotation3: axis=(0 0 1)
        TransformAxis translation1: axis=(1 0 0)
        TransformAxis translation2: axis=(0 1 0)
        TransformAxis translation3: axis=(0 0 1)
    PinJoint exo_hipF_joint_R: socket_parent_frame=exo_waist_2_thigh_R_offset socket_child_frame=exo_R_thigh_offset
      Coordinate exo_hipF_joint_R_coord_0: range=(-1.5 3.1) clamped=true
      PhysicalOffsetFrame exo_waist_2_thigh_R_offset: socket_parent=/bodyset/exo_waist_2_thigh_R
          translation=(0 -0.08138141 0)
      PhysicalOffsetFrame exo_R_thigh_offset: socket_parent=/bodyset/exo_R_thigh translation=(0 0.1988452 0)
    PinJoint exo_knee_joint_R: socket_parent_frame=exo_R_thigh_offset socket_child_frame=exo_R_shank_offset
      Coordinate exo_knee_joint_R_coord_0: range=(-1 3.5) clamped=true
      PhysicalOffsetFrame exo_R_thigh_offset: socket_parent=/bodyset/exo_R_thigh
          translation=(-0.004486234 -0.2084984 -0.001737595) orientation=(-3.141593 1.224647e-16 -3.141593)
      PhysicalOffsetFrame exo_R_shank_offset: socket_parent=/bodyset/exo_R_shank translation=(0 0.1896923 0)
          orientation=(-3.141593 1.224647e-16 -3.141593)
    CustomJoint exo_ankle_joint_R: socket_parent_frame=exo_R_shank_offset socket_child_frame=exo_R_feet_offset
      Coordinate q_rz: range=(-1.8 1.8) clamped=true
      Coordinate q_ry: range=(-1.69 1.69) clamped=true
      PhysicalOffsetFrame exo_R_shank_offset: socket_parent=/bodyset/exo_R_shank
          translation=(-0.001862688 -0.1968594 -0.1108408) orientation=(0 0 -1.047198)
      PhysicalOffsetFrame exo_R_feet_offset: socket_parent=/bodyset/exo_R_feet translation=(0 0.04620812 0)
          orientation=(0 0 -1.047198)
      SpatialTransform:
        TransformAxis rotation1: coordinates=q_rz axis=(0 0 1) LinearFunction(coefficients=1 0)
        TransformAxis rotation2: coordinates=q_ry axis=(0 1 0) LinearFunction(coefficients=1 0)
        TransformAxis rotation3: axis=(1 0 0)
        TransformAxis translation1: axis=(1 0 0)
        TransformAxis translation2: axis=(0 1 0)
        TransformAxis translation3: axis=(0 0 1)
    CustomJoint exo_hip_AR_joint_L: socket_parent_frame=exo_w2h_L_offset socket_child_frame=exo_waist_2_thigh_L_offset
      Coordinate exo_hip_adduction_L: range=(-1.8 1.52) clamped=true
      Coordinate exo_hip_rot_L: range=(-1.69 1.69) clamped=true
      PhysicalOffsetFrame exo_w2h_L_offset: socket_parent=/bodyset/exo_w2h_L translation=(0.03451885 0 0)
          orientation=(-3.141593 1.224647e-16 -3.141593)
      PhysicalOffsetFrame exo_waist_2_thigh_L_offset: socket_parent=/bodyset/exo_waist_2_thigh_L
          translation=(0 0.08138141 0) orientation=(-3.141593 1.224647e-16 -3.141593)
      SpatialTransform:
        TransformAxis rotation1: coordinates=exo_hip_adduction_L axis=(1 0 0) LinearFunction(coefficients=1 0)
        TransformAxis rotation2: coordinates=exo_hip_rot_L axis=(0 1 0) LinearFunction(coefficients=1 0)
        TransformAxis rotation3: axis=(0 0 1)
        TransformAxis translation1: axis=(1 0 0)
        TransformAxis translation2: axis=(0 1 0)
        TransformAxis translation3: axis=(0 0 1)
    PinJoint exo_hipF_joint_L: socket_parent_frame=exo_waist_2_thigh_L_offset socket_child_frame=exo_L_thigh_offset
      Coordinate exo_hipF_joint_L_coord_0: range=(-1.5 3.1)
      PhysicalOffsetFrame exo_waist_2_thigh_L_offset: socket_parent=/bodyset/exo_waist_2_thigh_L
          translation=(0 -0.08138141 0)
      PhysicalOffsetFrame exo_L_thigh_offset: socket_parent=/bodyset/exo_L_thigh translation=(0 0.1988452 0)
    PinJoint exo_knee_joint_L: socket_parent_frame=exo_L_thigh_offset socket_child_frame=exo_L_shank_offset
      Coordinate exo_knee_joint_L_coord_0: range=(-1 3.5) clamped=true
      PhysicalOffsetFrame exo_L_thigh_offset: socket_parent=/bodyset/exo_L_thigh
          translation=(-0.004429513 -0.2033482 0.001715625) orientation=(-3.141593 1.224647e-16 -3.141593)
      PhysicalOffsetFrame exo_L_shank_offset: socket_parent=/bodyset/exo_L_shank translation=(0 0.1896923 0)
          orientation=(-3.141593 1.224647e-16 -3.141593)
    CustomJoint exo_ankle_joint_L: socket_parent_frame=exo_L_shank_offset socket_child_frame=exo_L_feet_offset
      Coordinate q_rz: range=(-1.8 1.8) clamped=true
      Coordinate q_ry: range=(-1.69 1.69) clamped=true
      PhysicalOffsetFrame exo_L_shank_offset: socket_parent=/bodyset/exo_L_shank
          translation=(-0.001882029 -0.2008731 0.1108258) orientation=(0 0 -1.047198)
      PhysicalOffsetFrame exo_L_feet_offset: socket_parent=/bodyset/exo_L_feet translation=(0 0.0473446 0)
          orientation=(0 0 -1.047198)
      SpatialTransform:
        TransformAxis rotation1: coordinates=q_rz axis=(0 0 1) LinearFunction(coefficients=1 0)
        TransformAxis rotation2: coordinates=q_ry axis=(0 1 0) LinearFunction(coefficients=1 0)
        TransformAxis rotation3: axis=(1 0 0)
        TransformAxis translation1: axis=(1 0 0)
        TransformAxis translation2: axis=(0 1 0)
        TransformAxis translation3: axis=(0 0 1)
  ConstraintSet:
    CoordinateCouplerConstraint patellofemoral_knee_angle_r_con: independent_coordinate_names=knee_angle_r
        dependent_coordinate_name=knee_angle_r_beta scale_factor=1
        coupled_coordinates_function=LinearFunction(coefficients=1 0)
    CoordinateCouplerConstraint patellofemoral_knee_angle_l_con: independent_coordinate_names=knee_angle_l
        dependent_coordinate_name=knee_angle_l_beta scale_factor=1
        coupled_coordinates_function=LinearFunction(coefficients=1 0)
    WeldConstraint weld_constraint_r: socket_frame1=/jointset/subtalar_r/calcn_r_offset
        socket_frame2=/bodyset/exo_R_feet/calcn_weld_frame_r
    WeldConstraint weld_constraint_l: socket_frame1=/jointset/subtalar_l/calcn_l_offset
        socket_frame2=/bodyset/exo_L_feet/calcn_weld_frame_l
  ForceSet:
    Millard2012EquilibriumMuscle [values shared by the 80 below unless stated]: fiber_damping=0.01
        default_activation=0.01 minimum_activation=0.01
      ActiveForceLengthCurve: min_norm_active_fiber_length=0.25 transition_norm_fiber_length=0.77
          max_norm_active_fiber_length=1.9 shallow_ascending_slope=0.75 minimum_value=0
      ForceVelocityCurve: concentric_slope_at_vmax=0 concentric_slope_near_vmax=0.25 isometric_slope=5
          eccentric_slope_at_vmax=0 eccentric_slope_near_vmax=0.15 max_eccentric_velocity_force_multiplier=1.4
      TendonForceLengthCurve
    Millard2012EquilibriumMuscle addbrev_r: max_isometric_force=625.8197 optimal_fiber_length=0.1092729
        tendon_slack_length=0.03757281 pennation_angle_at_optimal=0.1147809 [radians]
      PathPoint P1: pelvis (-0.01943102 -0.09562913 0.01887405)
      PathPoint P2: femur_r (-0.001988853 -0.1173423 0.02476122)
      PathWrap: wrap_object=AB_at_femshaft_r method=hybrid
      FiberForceLengthCurve: strain_at_zero_force=-0.1927643 strain_at_one_norm_force=0.5015522
          stiffness_at_low_force=0.2 stiffness_at_one_norm_force=2.880531 curviness=0.75
    Millard2012EquilibriumMuscle addlong_r: max_isometric_force=916.8 optimal_fiber_length=0.1095222
        tendon_slack_length=0.13341 pennation_angle_at_optimal=0.1377704
      PathPoint P1: pelvis (-0.00771137 -0.09044074 0.02313909)
      PathPoint P2: femur_r (0.01119724 -0.2380359 0.01574177)
      PathWrap: wrap_object=AL_at_femshaft_r method=hybrid
      FiberForceLengthCurve: strain_at_zero_force=-0.1917374 strain_at_one_norm_force=0.5002995
          stiffness_at_low_force=0.2 stiffness_at_one_norm_force=2.890019 curviness=0.75
    Millard2012EquilibriumMuscle addmagDist_r: max_isometric_force=597.2951 optimal_fiber_length=0.1772755
        tendon_slack_length=0.08741794 pennation_angle_at_optimal=0.194705
      PathPoint P1: pelvis (-0.0753232 -0.1298827 0.04880289)
      PathPoint P2: femur_r (0.0111873 -0.261037 0.01919243)
      PathWrap: wrap_object=AMdist_at_femshaft_r method=hybrid
      FiberForceLengthCurve: strain_at_zero_force=-3.981963e-9 strain_at_one_norm_force=0.7 stiffness_at_low_force=0.2
          stiffness_at_one_norm_force=2.857143 curviness=0.75
    Millard2012EquilibriumMuscle addmagIsch_r: max_isometric_force=597.2951 optimal_fiber_length=0.1548575
        tendon_slack_length=0.2144836 pennation_angle_at_optimal=0.1680443
      PathPoint P1: pelvis (-0.09117322 -0.1320089 0.05111925)
      PathPoint P2: femur_r (0.004783191 -0.3858077 -0.03254758)
      PathWrap: wrap_object=AMisch_at_condyles_r method=hybrid
      FiberForceLengthCurve: strain_at_zero_force=0.007389956 strain_at_one_norm_force=0.7000392
          stiffness_at_low_force=0.2 stiffness_at_one_norm_force=2.887464 curviness=0.75
    Millard2012EquilibriumMuscle addmagMid_r: max_isometric_force=597.2951 optimal_fiber_length=0.1423263
        tendon_slack_length=0.04819426 pennation_angle_at_optimal=0.2073076
      PathPoint P1: pelvis (-0.05357266 -0.1228427 0.03497827)
      PathPoint P2: femur_r (0.002406512 -0.1614949 0.02905714)
      PathWrap: wrap_object=AMmid_at_femshaft_r method=hybrid
      FiberForceLengthCurve: strain_at_zero_force=-3.981963e-9 strain_at_one_norm_force=0.7 stiffness_at_low_force=0.2
          stiffness_at_one_norm_force=2.857143 curviness=0.75
    Millard2012EquilibriumMuscle addmagProx_r: max_isometric_force=597.2951 optimal_fiber_length=0.1160236
        tendon_slack_length=0.04430444 pennation_angle_at_optimal=0.3114833
      PathPoint P1: pelvis (-0.03151692 -0.109414 0.01672927)
      PathPoint P2: femur_r (-0.01518489 -0.07842047 0.03184154)
      PathWrap: wrap_object=AMprox_at_femshaft_r method=hybrid
      FiberForceLengthCurve: strain_at_zero_force=-3.981963e-9 strain_at_one_norm_force=0.7 stiffness_at_low_force=0.2
          stiffness_at_one_norm_force=2.857143 curviness=0.75
    Millard2012EquilibriumMuscle bflh_r: max_isometric_force=1313.184 optimal_fiber_length=0.09675858
        tendon_slack_length=0.3296318 pennation_angle_at_optimal=0.1759182
      PathPoint P1: pelvis (-0.1058024 -0.1211641 0.07181942)
      PathPoint P2: tibia_r (-0.03350084 -0.03556783 0.03527533)
      PathPoint P3: tibia_r (-0.02636387 -0.04882776 0.03389084)
      FiberForceLengthCurve: strain_at_zero_force=0.1965607 strain_at_one_norm_force=0.7068715
          stiffness_at_low_force=0.2 stiffness_at_one_norm_force=3.91918 curviness=0.75
    Millard2012EquilibriumMuscle bfsh_r: max_isometric_force=557.1148 optimal_fiber_length=0.1093794
        tendon_slack_length=0.1049341 pennation_angle_at_optimal=0.2642232
      PathPoint P1: femur_r (0.004972133 -0.2099234 0.02326958)
      PathPoint P2: tibia_r (-0.02794337 -0.03201885 0.03123885)
      PathWrap: wrap_object=BF_at_gastroc_r method=hybrid
      FiberForceLengthCurve: strain_at_zero_force=0.115251 strain_at_one_norm_force=0.6888986
          stiffness_at_low_force=0.2 stiffness_at_one_norm_force=3.486462 curviness=0.75
    Millard2012EquilibriumMuscle edl_r: max_isometric_force=603.4982 optimal_fiber_length=0.06736044
        tendon_slack_length=0.3585512 pennation_angle_at_optimal=0.2182582
      PathPoint P1: tibia_r (-0.01559992 -0.112807 0.0199874)
      PathPoint P2: tibia_r (0.01598992 -0.3665982 0.01091995)
      PathPoint P3: calcn_r (0.08887904 0.0348166 0.0007737022)
      PathPoint P4: calcn_r (0.1562878 0.005319203 0.01257266)
      PathPoint P5: toes_r (0.0002901383 0.004545501 0.01479705)
      PathPoint P6: toes_r (0.04284376 -0.0003868511 0.02417819)
      FiberForceLengthCurve: strain_at_zero_force=0.1317998 strain_at_one_norm_force=0.7072192
          stiffness_at_low_force=0.2 stiffness_at_one_norm_force=3.475726 curviness=0.75
    Millard2012EquilibriumMuscle ehl_r: max_isometric_force=285.8675 optimal_fiber_length=0.07267729
        tendon_slack_length=0.3175213 pennation_angle_at_optimal=0.1972681
      PathPoint P1: tibia_r (-0.01364993 -0.1511243 0.01842741)
      PathPoint P2: tibia_r (0.006922467 -0.2836261 0.01598992)
      PathPoint P3: tibia_r (0.01949991 -0.3600658 -0.002729987)
      PathPoint P4: calcn_r (0.09381139 0.03762127 -0.0204064)
      PathPoint P5: calcn_r (0.1250496 0.02988425 -0.02485518)
      PathPoint P6: calcn_r (0.1677 0.01344308 -0.02707958)
      PathPoint P7: toes_r (0.02882041 0.003965224 -0.02369463)
      PathPoint P8: toes_r (0.05444929 0.003288234 -0.01798858)
      FiberForceLengthCurve: strain_at_zero_force=0.1051406 strain_at_one_norm_force=0.7178208
          stiffness_at_low_force=0.2 stiffness_at_one_norm_force=3.264346 curviness=0.75
    Millard2012EquilibriumMuscle fdl_r: max_isometric_force=423.177 optimal_fiber_length=0.04331234
        tendon_slack_length=0.3678372 pennation_angle_at_optimal=0.2248391
      PathPoint P1: tibia_r (-0.002242489 -0.1786191 -0.001754992)
      PathPoint P2: tibia_r (-0.01715992 -0.3553858 -0.01208994)
      PathPoint P3: calcn_r (0.04216677 0.03046452 -0.02707958)
      PathPoint P4: calcn_r (0.06847265 0.01702145 -0.02543546)
      PathPoint P5: calcn_r (0.1603498 -0.007833735 0.01121868)
      PathPoint P6: toes_r (-0.001837543 -0.007543597 0.01421678)
      PathPoint P7: toes_r (0.02756314 -0.006866607 0.02079325)
      PathPoint P8: toes_r (0.04265033 -0.005802767 0.02340449)
      FiberForceLengthCurve: strain_at_zero_force=-0.01205975 strain_at_one_norm_force=0.6997089
          stiffness_at_low_force=0.2 stiffness_at_one_norm_force=2.809902 curviness=0.75
    Millard2012EquilibriumMuscle fhl_r: max_isometric_force=907.8393 optimal_fiber_length=0.05115744
        tendon_slack_length=0.3439679 pennation_angle_at_optimal=0.2580255
      PathPoint P1: tibia_r (-0.03022485 -0.2108915 0.01949991)
      PathPoint P2: tibia_r (-0.02359489 -0.3579208 -0.007409964)
      PathPoint P3: calcn_r (0.03617058 0.02669273 -0.02330778)
      PathPoint P4: calcn_r (0.1003879 0.006576469 -0.02475847)
      PathPoint P5: calcn_r (0.1669263 -0.005125777 -0.02601574)
      PathPoint P6: toes_r (0.01499048 -0.006189618 -0.02562889)
      PathPoint P7: toes_r (0.05435258 -0.009864703 -0.01750501)
      FiberForceLengthCurve: strain_at_zero_force=0.01130745 strain_at_one_norm_force=0.7002505
          stiffness_at_low_force=0.2 stiffness_at_one_norm_force=2.902997 curviness=0.75
    Millard2012EquilibriumMuscle gaslat_r: max_isometric_force=1575.059 optimal_fiber_length=0.06731797
        tendon_slack_length=0.3648829 pennation_angle_at_optimal=0.2102268
      PathPoint P1: femur_r (0.001988853 -0.3788765 0.02047524)
      PathPoint P2: calcn_r (0.004255362 0.02998096 -0.005125777)
      PathWrap: wrap_object=GasLat_at_shank_r method=hybrid
      PathWrap pathwrap_0: wrap_object=GasLat_at_condyles_r method=hybrid
      FiberForceLengthCurve: strain_at_zero_force=-0.05983233 strain_at_one_norm_force=0.7435102
          stiffness_at_low_force=0.2 stiffness_at_one_norm_force=2.489598 curviness=0.75
    Millard2012EquilibriumMuscle gasmed_r: max_isometric_force=3115.515 optimal_fiber_length=0.05756862
        tendon_slack_length=0.3776111 pennation_angle_at_optimal=0.1656816
      PathPoint P1: femur_r (0.005966559 -0.3828542 -0.02187738)
      PathPoint P2: calcn_r (0.004255362 0.02998096 -0.005125777)
      PathWrap: wrap_object=GasMed_at_shank_r method=hybrid
      PathWrap pathwrap_0: wrap_object=GasMed_at_condyles_r method=hybrid
      FiberForceLengthCurve: strain_at_zero_force=0.1998358 strain_at_one_norm_force=0.7902371
          stiffness_at_low_force=0.2 stiffness_at_one_norm_force=3.387526 curviness=0.75
    Millard2012EquilibriumMuscle glmax1_r: max_isometric_force=983.7836 optimal_fiber_length=0.1497433
        tendon_slack_length=0.0889292 pennation_angle_at_optimal=0.3540118
      PathPoint P1: pelvis (-0.1252335 0.03509792 0.06900057)
      PathPoint P2: pelvis (-0.1278785 -0.02461941 0.09547326)
      PathPoint P3: femur_r (-0.04415254 -0.0324183 0.03003168)
      PathPoint P4: femur_r (-0.02754561 -0.05628454 0.04673805)
      PathWrap: wrap_object=Gmax1_at_pelvis_r method=hybrid
      FiberForceLengthCurve: strain_at_zero_force=-0.07534176 strain_at_one_norm_force=0.8468075
          stiffness_at_low_force=0.2 stiffness_at_one_norm_force=2.168846 curviness=0.75
    Millard2012EquilibriumMuscle glmax2_r: max_isometric_force=1406.046 optimal_fiber_length=0.160563
        tendon_slack_length=0.1114737 pennation_angle_at_optimal=0.3673821
      PathPoint P1: pelvis (-0.1339825 0.008850781 0.05662214)
      PathPoint P2: pelvis (-0.1367293 -0.06195547 0.09964026)
      PathPoint P3: femur_r (-0.04474919 -0.05807451 0.02505955)
      PathPoint P4: femur_r (-0.01551305 -0.1010337 0.04166647)
      PathWrap: wrap_object=Gmax2_at_pelvis_r method=hybrid
      FiberForceLengthCurve: strain_at_zero_force=0.199275 strain_at_one_norm_force=0.7164175
          stiffness_at_low_force=0.2 stiffness_at_one_norm_force=3.867406 curviness=0.75
    Millard2012EquilibriumMuscle glmax3_r: max_isometric_force=947.7541 optimal_fiber_length=0.1730944
        tendon_slack_length=0.1067588 pennation_angle_at_optimal=0.3824161
      PathPoint P1: pelvis (-0.132253 -0.05340989 0.01103029)
      PathPoint P2: pelvis (-0.1295063 -0.1284889 0.05331305)
      PathPoint P3: femur_r (-0.02794338 -0.111873 0.009347609)
      PathPoint P4: femur_r (-0.005966559 -0.1411091 0.04087093)
      PathWrap: wrap_object=Gmax3_at_pelvis_r method=hybrid
      FiberForceLengthCurve: strain_at_zero_force=0.1989714 strain_at_one_norm_force=0.7121937
          stiffness_at_low_force=0.2 stiffness_at_one_norm_force=3.896947 curviness=0.75
    Millard2012EquilibriumMuscle glmed1_r: max_isometric_force=1093.467 optimal_fiber_length=0.07693664
        tendon_slack_length=0.05882684 pennation_angle_at_optimal=0.3165559
      PathPoint P1: pelvis (-0.04998901 0.02660652 0.141296)
      PathPoint P2_0: femur_r (-0.01381433 -0.01819274 0.05885973)
      FiberForceLengthCurve: strain_at_zero_force=-3.729382e-9 strain_at_one_norm_force=0.7 stiffness_at_low_force=0.2
          stiffness_at_one_norm_force=2.857143 curviness=0.75
    Millard2012EquilibriumMuscle glmed2_r: max_isometric_force=765.0917 optimal_fiber_length=0.08529643
        tendon_slack_length=0.0762396 pennation_angle_at_optimal=0.3165559
      PathPoint P1: pelvis (-0.08619575 0.05558079 0.100478)
      PathPoint P2_0: femur_r (-0.0219132 -0.00990359 0.0558134)
      FiberForceLengthCurve: strain_at_zero_force=0.06397124 strain_at_one_norm_force=0.7014005
          stiffness_at_low_force=0.2 stiffness_at_one_norm_force=3.137603 curviness=0.75
    Millard2012EquilibriumMuscle glmed3_r: max_isometric_force=871.1993 optimal_fiber_length=0.07995511
        tendon_slack_length=0.04954242 pennation_angle_at_optimal=0.3165559
      PathPoint P1: pelvis (-0.1015966 0.01582905 0.07831703)
      PathPoint P2_0: femur_r (-0.03072778 -0.004673805 0.05151129)
      FiberForceLengthCurve: strain_at_zero_force=0.1252157 strain_at_one_norm_force=0.7030514
          stiffness_at_low_force=0.2 stiffness_at_one_norm_force=3.461191 curviness=0.75
    Millard2012EquilibriumMuscle glmin1_r: max_isometric_force=374.0459 optimal_fiber_length=0.08173356
        tendon_slack_length=0.01939703 pennation_angle_at_optimal=0.1745329
      PathPoint P1: pelvis (-0.03009218 -0.0001100922 0.1451764)
      PathPoint P2: femur_r (0.005458724 -0.01540228 0.05572548)
      FiberForceLengthCurve: strain_at_zero_force=-3.729382e-9 strain_at_one_norm_force=0.7 stiffness_at_low_force=0.2
          stiffness_at_one_norm_force=2.857143 curviness=0.75
    Millard2012EquilibriumMuscle glmin2_r: max_isometric_force=394.8197 optimal_fiber_length=0.06873732
        tendon_slack_length=0.03203534 pennation_angle_at_optimal=0
      PathPoint P1: pelvis (-0.0626676 0.01017358 0.1239624)
      PathPoint P2: femur_r (0.003523791 -0.008962039 0.05217192)
      FiberForceLengthCurve: strain_at_zero_force=0.003039474 strain_at_one_norm_force=0.7000285
          stiffness_at_low_force=0.2 stiffness_at_one_norm_force=2.869486 curviness=0.75
    Millard2012EquilibriumMuscle glmin3_r: max_isometric_force=446.7738 optimal_fiber_length=0.03557439
        tendon_slack_length=0.04762522 pennation_angle_at_optimal=0.01745329
      PathPoint P1: pelvis (-0.08026743 -0.01576863 0.09780188)
      PathPoint P2: femur_r (-0.003556206 -0.001259641 0.05097594)
      FiberForceLengthCurve: strain_at_zero_force=0.007461173 strain_at_one_norm_force=0.7002322
          stiffness_at_low_force=0.2 stiffness_at_one_norm_force=2.886957 curviness=0.75
    Millard2012EquilibriumMuscle grac_r: max_isometric_force=281.3115 optimal_fiber_length=0.2255298
        tendon_slack_length=0.1702996 pennation_angle_at_optimal=0.1720016
      PathPoint P1: pelvis (-0.0481808 -0.1315613 0.03010043)
      PathPoint P2: tibia_r (-0.01795941 -0.04636103 -0.02886961)
      PathPoint P3: tibia_r (0.001735492 -0.06787917 -0.01533668)
      PathWrap: wrap_object=GR_at_condyles_r method=hybrid
      FiberForceLengthCurve: strain_at_zero_force=-0.1969779 strain_at_one_norm_force=0.8027483
          stiffness_at_low_force=0.2 stiffness_at_one_norm_force=2.000548 curviness=0.75
    Millard2012EquilibriumMuscle iliacus_r: max_isometric_force=1021.141 optimal_fiber_length=0.1081703
        tendon_slack_length=0.09753665 pennation_angle_at_optimal=0.279914
      PathPoint P1: pelvis (-0.06154853 0.03143553 0.103317)
      PathPoint P2: pelvis (-0.01373397 -0.05666534 0.09265441)
      PathPoint P3: femur_r (-0.002287181 -0.0561851 0.01382253)
      PathPoint P4: femur_r (-0.012132 -0.06334497 0.01949076)
      PathWrap: wrap_object=IL_at_brim_r method=hybrid range=(2 3)
      FiberForceLengthCurve: strain_at_zero_force=-0.1703103 strain_at_one_norm_force=0.5005449
          stiffness_at_low_force=0.2 stiffness_at_one_norm_force=2.98127 curviness=0.75
    Millard2012EquilibriumMuscle perbrev_r: max_isometric_force=521.2016 optimal_fiber_length=0.04419221
        tendon_slack_length=0.1436028 pennation_angle_at_optimal=0.2052361
      PathPoint P1: tibia_r (-0.02369239 -0.2468688 0.02447238)
      PathPoint P2: tibia_r (-0.03305234 -0.3795657 0.02427738)
      PathPoint P3: tibia_r (-0.02778737 -0.3903881 0.02486238)
      PathPoint P4: calcn_r (0.04555172 0.02611245 0.02253408)
      PathPoint P5: calcn_r (0.06547455 0.0211801 0.03317248)
      FiberForceLengthCurve: strain_at_zero_force=-0.04234068 strain_at_one_norm_force=0.6987541
          stiffness_at_low_force=0.2 stiffness_at_one_norm_force=2.69871 curviness=0.75
    Millard2012EquilibriumMuscle perlong_r: max_isometric_force=1115.371 optimal_fiber_length=0.04940689
        tendon_slack_length=0.3231101 pennation_angle_at_optimal=0.2479525
      PathPoint P1: tibia_r (-0.01949991 -0.1338669 0.02749487)
      PathPoint P2: tibia_r (-0.03090735 -0.3802482 0.02310739)
      PathPoint P3: tibia_r (-0.02651987 -0.3913631 0.02339989)
      PathPoint P4: calcn_r (0.0423602 0.02224394 0.02137352)
      PathPoint P5: calcn_r (0.0658614 0.01025155 0.02746643)
      PathPoint P6: calcn_r (0.08239929 0.006673182 0.01141211)
      PathPoint P7: calcn_r (0.1163455 0.008220586 -0.01779515)
      FiberForceLengthCurve: strain_at_zero_force=-0.1323481 strain_at_one_norm_force=0.6924185
          stiffness_at_low_force=0.2 stiffness_at_one_norm_force=2.424929 curviness=0.75
    Millard2012EquilibriumMuscle piri_r: max_isometric_force=1029.787 optimal_fiber_length=0.0284739
        tendon_slack_length=0.1258396 pennation_angle_at_optimal=0.1745329
      PathPoint P1: pelvis (-0.1035745 -0.006643172 0.01655769)
      PathPoint P2: pelvis (-0.1037881 -0.03119137 0.07466279)
      PathPoint P3: femur_r (-0.01471751 -0.003579935 0.04345644)
      FiberForceLengthCurve: strain_at_zero_force=0.09922992 strain_at_one_norm_force=0.7028348
          stiffness_at_low_force=0.2 stiffness_at_one_norm_force=3.313426 curviness=0.75
    Millard2012EquilibriumMuscle psoas_r: max_isometric_force=1426.79 optimal_fiber_length=0.1192807
        tendon_slack_length=0.1015704 pennation_angle_at_optimal=0.2155251
      PathPoint P1: pelvis (-0.06165027 0.06307453 0.04779791)
      PathPoint P2: pelvis (-0.02085529 -0.06653346 0.08039854)
      PathPoint P3: femur_r (-0.01312643 -0.04643972 0.004574362)
      PathPoint P4: femur_r (-0.02336902 -0.05210795 0.008750953)
      PathWrap: wrap_object=PS_at_brim_r method=hybrid range=(2 3)
      FiberForceLengthCurve: strain_at_zero_force=-0.09543841 strain_at_one_norm_force=0.5010382
          stiffness_at_low_force=0.2 stiffness_at_one_norm_force=3.353023 curviness=0.75
    Millard2012EquilibriumMuscle recfem_r: max_isometric_force=2191.741 optimal_fiber_length=0.07549136
        tendon_slack_length=0.4479781 pennation_angle_at_optimal=0.2170149
      PathPoint P1: pelvis (-0.02441595 -0.03947245 0.1143473)
      PathPoint P2: patella_r (0.009944265 0.0487269 0.0006960986)
      PathPoint P3: patella_r (0.01203256 0.04345644 -0.0009944265)
      PathPoint P4: patella_r (0.004972133 0.002456233 2.98328e-5)
      PathPoint P5: tibia_r (0.03178485 -0.0615417 -0.0004582478)
      PathWrap: wrap_object=KnExt_at_fem_r method=hybrid
      FiberForceLengthCurve: strain_at_zero_force=0.1999726 strain_at_one_norm_force=0.8999622
          stiffness_at_low_force=0.2 stiffness_at_one_norm_force=2.857186 curviness=0.75
    Millard2012EquilibriumMuscle sart_r: max_isometric_force=249.4131 optimal_fiber_length=0.4011594
        tendon_slack_length=0.1234335 pennation_angle_at_optimal=0.02613542
      PathPoint P1: pelvis (-0.01983796 -0.01587037 0.129422)
      PathPoint P2: femur_r (-0.00298328 -0.3548114 -0.04186536)
      PathPoint P3: tibia_r (-0.02447238 -0.03909731 -0.03558733)
      PathPoint P4: tibia_r (-0.01550243 -0.05840222 -0.02573988)
      PathPoint P5: tibia_r (0.01325994 -0.07897462 -0.002534988)
      FiberForceLengthCurve: strain_at_zero_force=-0.1984568 strain_at_one_norm_force=0.7212821
          stiffness_at_low_force=0.2 stiffness_at_one_norm_force=2.17453 curviness=0.75
    Millard2012EquilibriumMuscle semimem_r: max_isometric_force=2200.987 optimal_fiber_length=0.08519956
        tendon_slack_length=0.331882 pennation_angle_at_optimal=0.2545615
      PathPoint P1: pelvis (-0.1004106 -0.1159758 0.07525107)
      PathPoint P2: tibia_r (-0.02632487 -0.03997481 -0.01910991)
      PathWrap: wrap_object=SM_at_condyles_r method=hybrid
      FiberForceLengthCurve: strain_at_zero_force=0.1994426 strain_at_one_norm_force=0.7353994
          stiffness_at_low_force=0.2 stiffness_at_one_norm_force=3.731644 curviness=0.75
    Millard2012EquilibriumMuscle semiten_r: max_isometric_force=591.2951 optimal_fiber_length=0.1907579
        tendon_slack_length=0.2443272 pennation_angle_at_optimal=0.241295
      PathPoint P1: pelvis (-0.105599 -0.1274716 0.06311775)
      PathPoint P2: tibia_r (-0.03041985 -0.04952976 -0.02232739)
      PathPoint P3: tibia_r (0.001852491 -0.07536714 -0.01140745)
      PathWrap: wrap_object=ST_at_condyles_r method=hybrid
      FiberForceLengthCurve: strain_at_zero_force=0.007279189 strain_at_one_norm_force=0.7803276
          stiffness_at_low_force=0.2 stiffness_at_one_norm_force=2.58716 curviness=0.75
    Millard2012EquilibriumMuscle soleus_r: max_isometric_force=6194.843 optimal_fiber_length=0.04288137
        tendon_slack_length=0.2741971 pennation_angle_at_optimal=0.3814289
      PathPoint P1: tibia_r (-0.007409964 -0.08930957 0.009554954)
      PathPoint P2: calcn_r (0.004255362 0.02998096 -0.005125777)
      FiberForceLengthCurve: strain_at_zero_force=0.1569032 strain_at_one_norm_force=0.8506533
          stiffness_at_low_force=0.2 stiffness_at_one_norm_force=2.882882 curviness=0.75
    Millard2012EquilibriumMuscle tfl_r: max_isometric_force=411.2066 optimal_fiber_length=0.09282322
        tendon_slack_length=0.4391975 pennation_angle_at_optimal=0.05235988
      PathPoint P1: pelvis (-0.0206923 0.01103941 0.1584655)
      PathPoint P2: femur_r (0.02923614 -0.09894544 0.05936726)
      PathPoint P3: femur_r (0.01064036 -0.4027427 0.03221942)
      PathPoint P4: tibia_r (0.01052995 -0.03997481 0.03373484)
      FiberForceLengthCurve: strain_at_zero_force=0.07118385 strain_at_one_norm_force=0.7197196
          stiffness_at_low_force=0.2 stiffness_at_one_norm_force=3.08387 curviness=0.75
    Millard2012EquilibriumMuscle tibant_r: max_isometric_force=1227.452 optimal_fiber_length=0.06649064
        tendon_slack_length=0.2340909 pennation_angle_at_optimal=0.1951828
      PathPoint P1: tibia_r (0.01501493 -0.1279194 0.01579492)
      PathPoint P2: tibia_r (0.02447238 -0.1858341 0.01247994)
      PathPoint P3: tibia_r (0.02271739 -0.3567508 -0.01286994)
      PathPoint P4: calcn_r (0.1127671 0.01721487 -0.0294974)
      FiberForceLengthCurve: strain_at_zero_force=0.1892237 strain_at_one_norm_force=0.7076768
          stiffness_at_low_force=0.2 stiffness_at_one_norm_force=3.85763 curviness=0.75
    Millard2012EquilibriumMuscle tibpost_r: max_isometric_force=1730.154 optimal_fiber_length=0.03680861
        tendon_slack_length=0.2734155 pennation_angle_at_optimal=0.2264891
      PathPoint P1: tibia_r (-0.003997481 -0.1271394 0.01004245)
      PathPoint P2: tibia_r (-0.01598992 -0.3563608 -0.01706242)
      PathPoint P3: calcn_r (0.04032923 0.03230207 -0.02765985)
      PathPoint P4: calcn_r (0.07466226 0.01537733 -0.02717629)
      FiberForceLengthCurve: strain_at_zero_force=-0.1916705 strain_at_one_norm_force=0.6862359
          stiffness_at_low_force=0.2 stiffness_at_one_norm_force=2.278147 curviness=0.75
    Millard2012EquilibriumMuscle vasint_r: max_isometric_force=1697.361 optimal_fiber_length=0.1159651
        tendon_slack_length=0.2031868 pennation_angle_at_optimal=0.06309973
      PathPoint P1: femur_r (0.02883837 -0.1913277 0.03082722)
      PathPoint P2: femur_r (0.03331329 -0.2072385 0.02834116)
      PathPoint P3: patella_r (0.005767674 0.04773247 -0.0005966559)
      PathPoint P4: patella_r (0.004972133 0.002456233 -0.0003878263)
      PathPoint P5: tibia_r (0.0317556 -0.0616197 0.000419248)
      PathWrap: wrap_object=KnExt_at_fem_r method=hybrid
      FiberForceLengthCurve: strain_at_zero_force=0.1999153 strain_at_one_norm_force=0.8514363
          stiffness_at_low_force=0.2 stiffness_at_one_norm_force=3.06974 curviness=0.75
    Millard2012EquilibriumMuscle vaslat_r: max_isometric_force=5148.767 optimal_fiber_length=0.115984
        tendon_slack_length=0.219081 pennation_angle_at_optimal=0.2528673
      PathPoint P1: femur_r (0.004773247 -0.1843667 0.03470549)
      PathPoint P2: femur_r (0.02675007 -0.2576559 0.04067204)
      PathPoint P3: patella_r (0.01024259 0.04206424 0.01402141)
      PathPoint P4: patella_r (0.004972133 0.002456233 0.007289146)
      PathPoint P5: tibia_r (0.03172635 -0.0617952 0.004982226)
      PathWrap: wrap_object=KnExtVL_at_fem_r method=hybrid
      FiberForceLengthCurve: strain_at_zero_force=0.1999632 strain_at_one_norm_force=0.8928189
          stiffness_at_low_force=0.2 stiffness_at_one_norm_force=2.886604 curviness=0.75
    Millard2012EquilibriumMuscle vasmed_r: max_isometric_force=2747.823 optimal_fiber_length=0.1090128
        tendon_slack_length=0.2061333 pennation_angle_at_optimal=0.4222225
      PathPoint P1: femur_r (0.01392197 -0.2087301 0.01869522)
      PathPoint P2: femur_r (0.03540158 -0.2753567 0.0008949839)
      PathPoint P3: patella_r (0.006264887 0.04425198 -0.01690525)
      PathPoint P4: patella_r (0.004972133 0.002456233 -0.008452625)
      PathPoint P5: tibia_r (0.03110235 -0.06198045 -0.006610468)
      PathWrap: wrap_object=KnExt_at_fem_r method=hybrid
      FiberForceLengthCurve: strain_at_zero_force=0.1999354 strain_at_one_norm_force=0.8518332
          stiffness_at_low_force=0.2 stiffness_at_one_norm_force=3.067965 curviness=0.75
    Millard2012EquilibriumMuscle addbrev_l: max_isometric_force=625.8197 optimal_fiber_length=0.1083649
        tendon_slack_length=0.0372606 pennation_angle_at_optimal=0.1147809
      PathPoint P1: pelvis (-0.01943102 -0.09562913 -0.01887405)
      PathPoint P2: femur_l (-0.001963707 -0.1158587 -0.02444815)
      PathWrap: wrap_object=AB_at_femshaft_l method=hybrid
      FiberForceLengthCurve: strain_at_zero_force=-0.1927643 strain_at_one_norm_force=0.5015522
          stiffness_at_low_force=0.2 stiffness_at_one_norm_force=2.880531 curviness=0.75
    Millard2012EquilibriumMuscle addlong_l: max_isometric_force=916.8 optimal_fiber_length=0.1082705
        tendon_slack_length=0.1318852 pennation_angle_at_optimal=0.1377704
      PathPoint P1: pelvis (-0.00771137 -0.09044074 -0.02313909)
      PathPoint P2: femur_l (0.01105567 -0.2350263 -0.01554274)
      PathWrap: wrap_object=AL_at_femshaft_l method=hybrid
      FiberForceLengthCurve: strain_at_zero_force=-0.1917374 strain_at_one_norm_force=0.5002995
          stiffness_at_low_force=0.2 stiffness_at_one_norm_force=2.890019 curviness=0.75
    Millard2012EquilibriumMuscle addmagDist_l: max_isometric_force=597.2951 optimal_fiber_length=0.1747139
        tendon_slack_length=0.08615475 pennation_angle_at_optimal=0.194705
      PathPoint P1: pelvis (-0.0753232 -0.1298827 -0.04880289)
      PathPoint P2: femur_l (0.01104585 -0.2577366 -0.01894977)
      PathWrap: wrap_object=AMdist_at_femshaft_l method=hybrid
      FiberForceLengthCurve: strain_at_zero_force=-3.981963e-9 strain_at_one_norm_force=0.7 stiffness_at_low_force=0.2
          stiffness_at_one_norm_force=2.857143 curviness=0.75
    Millard2012EquilibriumMuscle addmagIsch_l: max_isometric_force=597.2951 optimal_fiber_length=0.1526273
        tendon_slack_length=0.2113948 pennation_angle_at_optimal=0.1680443
      PathPoint P1: pelvis (-0.09117322 -0.1320089 -0.05111925)
      PathPoint P2: femur_l (0.004722716 -0.3809297 0.03213607)
      PathWrap: wrap_object=AMisch_at_condyles_l method=hybrid
      FiberForceLengthCurve: strain_at_zero_force=0.007389956 strain_at_one_norm_force=0.7000392
          stiffness_at_low_force=0.2 stiffness_at_one_norm_force=2.887464 curviness=0.75
    Millard2012EquilibriumMuscle addmagMid_l: max_isometric_force=597.2951 optimal_fiber_length=0.1405452
        tendon_slack_length=0.04759114 pennation_angle_at_optimal=0.2073076
      PathPoint P1: pelvis (-0.05357266 -0.1228427 -0.03497827)
      PathPoint P2: femur_l (0.002376086 -0.159453 -0.02868976)
      PathWrap: wrap_object=AMmid_at_femshaft_l method=hybrid
      FiberForceLengthCurve: strain_at_zero_force=-3.981963e-9 strain_at_one_norm_force=0.7 stiffness_at_low_force=0.2
          stiffness_at_one_norm_force=2.857143 curviness=0.75
    Millard2012EquilibriumMuscle addmagProx_l: max_isometric_force=597.2951 optimal_fiber_length=0.1152921
        tendon_slack_length=0.04402508 pennation_angle_at_optimal=0.3114833
      PathPoint P1: pelvis (-0.03151692 -0.109414 -0.01672927)
      PathPoint P2: femur_l (-0.0149929 -0.07742897 -0.03143895)
      PathWrap: wrap_object=AMprox_at_femshaft_l method=hybrid
      FiberForceLengthCurve: strain_at_zero_force=-3.981963e-9 strain_at_one_norm_force=0.7 stiffness_at_low_force=0.2
          stiffness_at_one_norm_force=2.857143 curviness=0.75
    Millard2012EquilibriumMuscle bflh_l: max_isometric_force=1313.184 optimal_fiber_length=0.09570378
        tendon_slack_length=0.3260389 pennation_angle_at_optimal=0.1759182
      PathPoint P1: pelvis (-0.1058024 -0.1211641 -0.07181942)
      PathPoint P2: tibia_l (-0.03384869 -0.03593714 -0.03564161)
      PathPoint P3: tibia_l (-0.02663762 -0.04933476 -0.03424274)
      FiberForceLengthCurve: strain_at_zero_force=0.1965607 strain_at_one_norm_force=0.7068715
          stiffness_at_low_force=0.2 stiffness_at_one_norm_force=3.91918 curviness=0.75
    Millard2012EquilibriumMuscle bfsh_l: max_isometric_force=557.1148 optimal_fiber_length=0.1083506
        tendon_slack_length=0.103947 pennation_angle_at_optimal=0.2642232
      PathPoint P1: femur_l (0.004909268 -0.2072693 -0.02297537)
      PathPoint P2: tibia_l (-0.02823351 -0.03235131 -0.03156322)
      PathWrap: wrap_object=BF_at_gastroc_l method=hybrid
      FiberForceLengthCurve: strain_at_zero_force=0.115251 strain_at_one_norm_force=0.6888986
          stiffness_at_low_force=0.2 stiffness_at_one_norm_force=3.486462 curviness=0.75
    Millard2012EquilibriumMuscle edl_l: max_isometric_force=603.4982 optimal_fiber_length=0.06779657
        tendon_slack_length=0.3608727 pennation_angle_at_optimal=0.2182582
      PathPoint P1: tibia_l (-0.01576191 -0.1139783 -0.02019494)
      PathPoint P2: tibia_l (0.01615595 -0.3704048 -0.01103333)
      PathPoint P3: calcn_l (0.08887904 0.0348166 -0.0007737022)
      PathPoint P4: calcn_l (0.1562878 0.005319203 -0.01257266)
      PathPoint P5: toes_l (0.0002901383 0.004545501 -0.01479705)
      PathPoint P6: toes_l (0.04284376 -0.0003868511 -0.02417819)
      FiberForceLengthCurve: strain_at_zero_force=0.1317998 strain_at_one_norm_force=0.7072192
          stiffness_at_low_force=0.2 stiffness_at_one_norm_force=3.475726 curviness=0.75
    Millard2012EquilibriumMuscle ehl_l: max_isometric_force=285.8675 optimal_fiber_length=0.07311057
        tendon_slack_length=0.3194143 pennation_angle_at_optimal=0.1972681
      PathPoint P1: tibia_l (-0.01379167 -0.1526935 -0.01861875)
      PathPoint P2: tibia_l (0.006994346 -0.2865711 -0.01615595)
      PathPoint P3: tibia_l (0.01970238 -0.3638045 0.002758333)
      PathPoint P4: calcn_l (0.09381139 0.03762127 0.0204064)
      PathPoint P5: calcn_l (0.1250496 0.02988425 0.02485518)
      PathPoint P6: calcn_l (0.1677 0.01344308 0.02707958)
      PathPoint P7: toes_l (0.02882041 0.003965224 0.02369463)
      PathPoint P8: toes_l (0.05444929 0.003288234 0.01798858)
      FiberForceLengthCurve: strain_at_zero_force=0.1051406 strain_at_one_norm_force=0.7178208
          stiffness_at_low_force=0.2 stiffness_at_one_norm_force=3.264346 curviness=0.75
    Millard2012EquilibriumMuscle fdl_l: max_isometric_force=423.177 optimal_fiber_length=0.04354203
        tendon_slack_length=0.3697879 pennation_angle_at_optimal=0.2248391
      PathPoint P1: tibia_l (-0.002265774 -0.1804738 0.001773214)
      PathPoint P2: tibia_l (-0.0173381 -0.3590759 0.01221548)
      PathPoint P3: calcn_l (0.04216677 0.03046452 0.02707958)
      PathPoint P4: calcn_l (0.06847265 0.01702145 0.02543546)
      PathPoint P5: calcn_l (0.1603498 -0.007833735 -0.01121868)
      PathPoint P6: toes_l (-0.001837543 -0.007543597 -0.01421678)
      PathPoint P7: toes_l (0.02756314 -0.006866607 -0.02079325)
      PathPoint P8: toes_l (0.04265033 -0.005802767 -0.02340449)
      FiberForceLengthCurve: strain_at_zero_force=-0.01205975 strain_at_one_norm_force=0.6997089
          stiffness_at_low_force=0.2 stiffness_at_one_norm_force=2.809902 curviness=0.75
    Millard2012EquilibriumMuscle fhl_l: max_isometric_force=907.8393 optimal_fiber_length=0.05140176
        tendon_slack_length=0.3456107 pennation_angle_at_optimal=0.2580255
      PathPoint P1: tibia_l (-0.03053869 -0.2130813 -0.01970238)
      PathPoint P2: tibia_l (-0.02383988 -0.3616372 0.007486905)
      PathPoint P3: calcn_l (0.03617058 0.02669273 0.02330778)
      PathPoint P4: calcn_l (0.1003879 0.006576469 0.02475847)
      PathPoint P5: calcn_l (0.1669263 -0.005125777 0.02601574)
      PathPoint P6: toes_l (0.01499048 -0.006189618 0.02562889)
      PathPoint P7: toes_l (0.05435258 -0.009864703 0.01750501)
      FiberForceLengthCurve: strain_at_zero_force=0.01130745 strain_at_one_norm_force=0.7002505
          stiffness_at_low_force=0.2 stiffness_at_one_norm_force=2.902997 curviness=0.75
    Millard2012EquilibriumMuscle gaslat_l: max_isometric_force=1575.059 optimal_fiber_length=0.06793459
        tendon_slack_length=0.3682252 pennation_angle_at_optimal=0.2102268
      PathPoint P1: femur_l (0.001963707 -0.3740862 -0.02021636)
      PathPoint P2: calcn_l (0.004255362 0.02998096 0.005125777)
      PathWrap: wrap_object=GasLat_at_shank_l method=hybrid
      PathWrap pathwrap_0: wrap_object=GasLat_at_condyles_l method=hybrid
      FiberForceLengthCurve: strain_at_zero_force=-0.05983233 strain_at_one_norm_force=0.7435102
          stiffness_at_low_force=0.2 stiffness_at_one_norm_force=2.489598 curviness=0.75
    Millard2012EquilibriumMuscle gasmed_l: max_isometric_force=3115.515 optimal_fiber_length=0.05809073
        tendon_slack_length=0.3810358 pennation_angle_at_optimal=0.1656816
      PathPoint P1: femur_l (0.005891121 -0.3780136 0.02160078)
      PathPoint P2: calcn_l (0.004255362 0.02998096 0.005125777)
      PathWrap: wrap_object=GasMed_at_shank_l method=hybrid
      PathWrap pathwrap_0: wrap_object=GasMed_at_condyles_l method=hybrid
      FiberForceLengthCurve: strain_at_zero_force=0.1998358 strain_at_one_norm_force=0.7902371
          stiffness_at_low_force=0.2 stiffness_at_one_norm_force=3.387526 curviness=0.75
    Millard2012EquilibriumMuscle glmax1_l: max_isometric_force=983.7836 optimal_fiber_length=0.1491622
        tendon_slack_length=0.08858409 pennation_angle_at_optimal=0.3540118
      PathPoint P1: pelvis (-0.1252335 0.03509792 -0.06900057)
      PathPoint P2: pelvis (-0.1278785 -0.02461941 -0.09547326)
      PathPoint P3: femur_l (-0.0435943 -0.03200843 -0.02965198)
      PathPoint P4: femur_l (-0.02719734 -0.05557291 -0.04614712)
      PathWrap: wrap_object=Gmax1_at_pelvis_l method=hybrid
      FiberForceLengthCurve: strain_at_zero_force=-0.07534176 strain_at_one_norm_force=0.8468075
          stiffness_at_low_force=0.2 stiffness_at_one_norm_force=2.168846 curviness=0.75
    Millard2012EquilibriumMuscle glmax2_l: max_isometric_force=1406.046 optimal_fiber_length=0.1597146
        tendon_slack_length=0.1108846 pennation_angle_at_optimal=0.3673821
      PathPoint P1: pelvis (-0.1339825 0.008850781 -0.05662214)
      PathPoint P2: pelvis (-0.1367293 -0.06195547 -0.09964026)
      PathPoint P3: femur_l (-0.04418341 -0.05734025 -0.02474271)
      PathPoint P4: femur_l (-0.01531692 -0.09975632 -0.04113966)
      PathWrap: wrap_object=Gmax2_at_pelvis_l method=hybrid
      FiberForceLengthCurve: strain_at_zero_force=0.199275 strain_at_one_norm_force=0.7164175
          stiffness_at_low_force=0.2 stiffness_at_one_norm_force=3.867406 curviness=0.75
    Millard2012EquilibriumMuscle glmax3_l: max_isometric_force=947.7541 optimal_fiber_length=0.1719756
        tendon_slack_length=0.1060688 pennation_angle_at_optimal=0.3824161
      PathPoint P1: pelvis (-0.132253 -0.05340989 -0.01103029)
      PathPoint P2: pelvis (-0.1295063 -0.1284889 -0.05331305)
      PathPoint P3: femur_l (-0.02759008 -0.1104585 -0.009229423)
      PathPoint P4: femur_l (-0.005891121 -0.139325 -0.04035418)
      PathWrap: wrap_object=Gmax3_at_pelvis_l method=hybrid
      FiberForceLengthCurve: strain_at_zero_force=0.1989714 strain_at_one_norm_force=0.7121937
          stiffness_at_low_force=0.2 stiffness_at_one_norm_force=3.896947 curviness=0.75
    Millard2012EquilibriumMuscle glmed1_l: max_isometric_force=1093.467 optimal_fiber_length=0.07650936
        tendon_slack_length=0.05850014 pennation_angle_at_optimal=0.3165559
      PathPoint P1: pelvis (-0.04984923 0.02645061 -0.1409426)
      PathPoint P2: femur_l (-0.01374595 -0.01767336 -0.05792936)
      FiberForceLengthCurve: strain_at_zero_force=-3.729382e-9 strain_at_one_norm_force=0.7 stiffness_at_low_force=0.2
          stiffness_at_one_norm_force=2.857143 curviness=0.75
    Millard2012EquilibriumMuscle glmed2_l: max_isometric_force=765.0917 optimal_fiber_length=0.08531076
        tendon_slack_length=0.07625241 pennation_angle_at_optimal=0.3165559
      PathPoint P1: pelvis (-0.08647315 0.05595321 -0.1004982)
      PathPoint P2: femur_l (-0.02160078 -0.009818536 -0.0549838)
      FiberForceLengthCurve: strain_at_zero_force=0.06397124 strain_at_one_norm_force=0.7014005
          stiffness_at_low_force=0.2 stiffness_at_one_norm_force=3.137603 curviness=0.75
    Millard2012EquilibriumMuscle glmed3_l: max_isometric_force=871.1993 optimal_fiber_length=0.07992455
        tendon_slack_length=0.04952349 pennation_angle_at_optimal=0.3165559
      PathPoint P1: pelvis (-0.1017331 0.0162773 -0.0784376)
      PathPoint P2: femur_l (-0.03033927 -0.004614712 -0.05086001)
      FiberForceLengthCurve: strain_at_zero_force=0.1252157 strain_at_one_norm_force=0.7030514
          stiffness_at_low_force=0.2 stiffness_at_one_norm_force=3.461191 curviness=0.75
    Millard2012EquilibriumMuscle glmin1_l: max_isometric_force=374.0459 optimal_fiber_length=0.08128871
        tendon_slack_length=0.01929146 pennation_angle_at_optimal=0.1745329
      PathPoint P1: pelvis (-0.03051993 0 -0.1446193)
      PathPoint P2: femur_l (0.004909268 -0.0147278 -0.0549838)
      FiberForceLengthCurve: strain_at_zero_force=-3.729382e-9 strain_at_one_norm_force=0.7 stiffness_at_low_force=0.2
          stiffness_at_one_norm_force=2.857143 curviness=0.75
    Millard2012EquilibriumMuscle glmin2_l: max_isometric_force=394.8197 optimal_fiber_length=0.06854037
        tendon_slack_length=0.03194355 pennation_angle_at_optimal=0
      PathPoint P1: pelvis (-0.0626676 0.01017331 -0.1237843)
      PathPoint P2: femur_l (0.003927414 -0.008836682 -0.05105639)
      FiberForceLengthCurve: strain_at_zero_force=0.003039474 strain_at_one_norm_force=0.7000285
          stiffness_at_low_force=0.2 stiffness_at_one_norm_force=2.869486 curviness=0.75
    Millard2012EquilibriumMuscle glmin3_l: max_isometric_force=446.7738 optimal_fiber_length=0.03522403
        tendon_slack_length=0.04715616 pennation_angle_at_optimal=0.01745329
      PathPoint P1: pelvis (-0.08026743 -0.01576863 -0.09780188)
      PathPoint P2: femur_l (-0.003927414 -0.0009818536 -0.05007453)
      FiberForceLengthCurve: strain_at_zero_force=0.007461173 strain_at_one_norm_force=0.7002322
          stiffness_at_low_force=0.2 stiffness_at_one_norm_force=2.886957 curviness=0.75
    Millard2012EquilibriumMuscle grac_l: max_isometric_force=281.3115 optimal_fiber_length=0.2232889
        tendon_slack_length=0.1686075 pennation_angle_at_optimal=0.1720016
      PathPoint P1: pelvis (-0.0481808 -0.1315613 -0.03010043)
      PathPoint P2: tibia_l (-0.01814589 -0.04684241 0.02916938)
      PathPoint P3: tibia_l (0.001753512 -0.06858399 0.01549592)
      PathWrap: wrap_object=GR_at_condyles_l method=hybrid
      FiberForceLengthCurve: strain_at_zero_force=-0.1969779 strain_at_one_norm_force=0.8027483
          stiffness_at_low_force=0.2 stiffness_at_one_norm_force=2.000548 curviness=0.75
    Millard2012EquilibriumMuscle iliacus_l: max_isometric_force=1021.141 optimal_fiber_length=0.1077982
        tendon_slack_length=0.09720109 pennation_angle_at_optimal=0.279914
      PathPoint P1: pelvis (-0.06154853 0.03143553 -0.103317)
      PathPoint P2: pelvis (-0.01373397 -0.05666534 -0.09265441)
      PathPoint P3: femur_l (-0.002258263 -0.05547473 -0.01364776)
      PathPoint P4: femur_l (-0.01197861 -0.06254407 -0.01924433)
      PathWrap: wrap_object=IL_at_brim_l method=hybrid range=(2 3)
      FiberForceLengthCurve: strain_at_zero_force=-0.1703103 strain_at_one_norm_force=0.5005449
          stiffness_at_low_force=0.2 stiffness_at_one_norm_force=2.98127 curviness=0.75
    Millard2012EquilibriumMuscle perbrev_l: max_isometric_force=521.2016 optimal_fiber_length=0.04455934
        tendon_slack_length=0.1447958 pennation_angle_at_optimal=0.2052361
      PathPoint P1: tibia_l (-0.02393839 -0.2494322 -0.02472649)
      PathPoint P2: tibia_l (-0.03339554 -0.3835069 -0.02452947)
      PathPoint P3: tibia_l (-0.02807589 -0.3944417 -0.02512054)
      PathPoint P4: calcn_l (0.04555172 0.02611245 -0.02253408)
      PathPoint P5: calcn_l (0.06547455 0.0211801 -0.03317248)
      FiberForceLengthCurve: strain_at_zero_force=-0.04234068 strain_at_one_norm_force=0.6987541
          stiffness_at_low_force=0.2 stiffness_at_one_norm_force=2.69871 curviness=0.75
    Millard2012EquilibriumMuscle perlong_l: max_isometric_force=1115.371 optimal_fiber_length=0.04976355
        tendon_slack_length=0.3254426 pennation_angle_at_optimal=0.2479525
      PathPoint P1: tibia_l (-0.01970238 -0.1352569 -0.02778036)
      PathPoint P2: tibia_l (-0.03122828 -0.3841965 -0.02334732)
      PathPoint P3: tibia_l (-0.02679524 -0.3954268 -0.02364286)
      PathPoint P4: calcn_l (0.0423602 0.02224394 -0.02137352)
      PathPoint P5: calcn_l (0.0658614 0.01025155 -0.02746643)
      PathPoint P6: calcn_l (0.08239929 0.006673182 -0.01141211)
      PathPoint P7: calcn_l (0.1163455 0.008220586 0.01779515)
      FiberForceLengthCurve: strain_at_zero_force=-0.1323481 strain_at_one_norm_force=0.6924185
          stiffness_at_low_force=0.2 stiffness_at_one_norm_force=2.424929 curviness=0.75
    Millard2012EquilibriumMuscle piri_l: max_isometric_force=1029.787 optimal_fiber_length=0.02840723
        tendon_slack_length=0.1255449 pennation_angle_at_optimal=0.1745329
      PathPoint P1: pelvis (-0.1035745 -0.006643172 -0.01655769)
      PathPoint P2: pelvis (-0.1037881 -0.03119137 -0.07466279)
      PathPoint P3: femur_l (-0.01453143 -0.003534673 -0.042907)
      FiberForceLengthCurve: strain_at_zero_force=0.09922992 strain_at_one_norm_force=0.7028348
          stiffness_at_low_force=0.2 stiffness_at_one_norm_force=3.313426 curviness=0.75
    Millard2012EquilibriumMuscle psoas_l: max_isometric_force=1426.79 optimal_fiber_length=0.1189335
        tendon_slack_length=0.1012748 pennation_angle_at_optimal=0.2155251
      PathPoint P1: pelvis (-0.06165027 0.06307453 -0.04779791)
      PathPoint P2: pelvis (-0.02085529 -0.06653346 -0.08039854)
      PathPoint P3: femur_l (-0.01296047 -0.04585256 -0.004516526)
      PathPoint P4: femur_l (-0.02307356 -0.05144913 -0.008640311)
      PathWrap: wrap_object=PS_at_brim_l method=hybrid range=(2 3)
      FiberForceLengthCurve: strain_at_zero_force=-0.09543841 strain_at_one_norm_force=0.5010382
          stiffness_at_low_force=0.2 stiffness_at_one_norm_force=3.353023 curviness=0.75
    Millard2012EquilibriumMuscle recfem_l: max_isometric_force=2191.741 optimal_fiber_length=0.07476918
        tendon_slack_length=0.4436916 pennation_angle_at_optimal=0.2170149
      PathPoint P1: pelvis (-0.02441595 -0.03947245 -0.1143473)
      PathPoint P2: patella_l (0.009818536 0.04811082 -0.0006872975)
      PathPoint P3: patella_l (0.01188043 0.042907 0.0009818536)
      PathPoint P4: patella_l (0.004909268 0.002425178 -2.945561e-5)
      PathPoint P5: tibia_l (0.03211488 -0.06218072 0.000463006)
      PathWrap: wrap_object=KnExt_at_fem_l method=hybrid
      FiberForceLengthCurve: strain_at_zero_force=0.1999726 strain_at_one_norm_force=0.8999622
          stiffness_at_low_force=0.2 stiffness_at_one_norm_force=2.857186 curviness=0.75
    Millard2012EquilibriumMuscle sart_l: max_isometric_force=249.4131 optimal_fiber_length=0.3983285
        tendon_slack_length=0.1225625 pennation_angle_at_optimal=0.02613542
      PathPoint P1: pelvis (-0.01983796 -0.01587037 -0.129422)
      PathPoint P2: femur_l (-0.002945561 -0.3503253 0.04133603)
      PathPoint P3: tibia_l (-0.02472649 -0.03950328 0.03595685)
      PathPoint P4: tibia_l (-0.01566339 -0.05900863 0.02600714)
      PathPoint P5: tibia_l (0.01339762 -0.07979465 0.00256131)
      FiberForceLengthCurve: strain_at_zero_force=-0.1984568 strain_at_one_norm_force=0.7212821
          stiffness_at_low_force=0.2 stiffness_at_one_norm_force=2.17453 curviness=0.75
    Millard2012EquilibriumMuscle semimem_l: max_isometric_force=2200.987 optimal_fiber_length=0.08420847
        tendon_slack_length=0.3280214 pennation_angle_at_optimal=0.2545615
      PathPoint P1: pelvis (-0.1004106 -0.1159758 -0.07525107)
      PathPoint P2: tibia_l (-0.02659822 -0.04038988 0.01930833)
      PathWrap: wrap_object=SM_at_condyles_l method=hybrid
      FiberForceLengthCurve: strain_at_zero_force=0.1994426 strain_at_one_norm_force=0.7353994
          stiffness_at_low_force=0.2 stiffness_at_one_norm_force=3.731644 curviness=0.75
    Millard2012EquilibriumMuscle semiten_l: max_isometric_force=591.2951 optimal_fiber_length=0.1889706
        tendon_slack_length=0.242038 pennation_angle_at_optimal=0.241295
      PathPoint P1: pelvis (-0.105599 -0.1274716 -0.06311775)
      PathPoint P2: tibia_l (-0.03073572 -0.05004405 0.02255923)
      PathPoint P3: tibia_l (0.001871726 -0.07614971 0.01152589)
      PathWrap: wrap_object=ST_at_condyles_l method=hybrid
      FiberForceLengthCurve: strain_at_zero_force=0.007279189 strain_at_one_norm_force=0.7803276
          stiffness_at_low_force=0.2 stiffness_at_one_norm_force=2.58716 curviness=0.75
    Millard2012EquilibriumMuscle soleus_l: max_isometric_force=6194.843 optimal_fiber_length=0.04330319
        tendon_slack_length=0.2768944 pennation_angle_at_optimal=0.3814289
      PathPoint P1: tibia_l (-0.007486905 -0.09023691 -0.009654167)
      PathPoint P2: calcn_l (0.004255362 0.02998096 0.005125777)
      FiberForceLengthCurve: strain_at_zero_force=0.1569032 strain_at_one_norm_force=0.8506533
          stiffness_at_low_force=0.2 stiffness_at_one_norm_force=2.882882 curviness=0.75
    Millard2012EquilibriumMuscle tfl_l: max_isometric_force=411.2066 optimal_fiber_length=0.09203832
        tendon_slack_length=0.4354837 pennation_angle_at_optimal=0.05235988
      PathPoint P1: pelvis (-0.02034662 0.01119064 -0.1581008)
      PathPoint P2: femur_l (0.02886649 -0.09769443 -0.05861666)
      PathPoint P3: femur_l (0.01050583 -0.3976507 -0.03181206)
      PathPoint P4: tibia_l (0.01063929 -0.04038988 -0.03408512)
      FiberForceLengthCurve: strain_at_zero_force=0.07118385 strain_at_one_norm_force=0.7197196
          stiffness_at_low_force=0.2 stiffness_at_one_norm_force=3.08387 curviness=0.75
    Millard2012EquilibriumMuscle tibant_l: max_isometric_force=1227.452 optimal_fiber_length=0.06705215
        tendon_slack_length=0.2360678 pennation_angle_at_optimal=0.1951828
      PathPoint P1: tibia_l (0.01517083 -0.1292476 -0.01595893)
      PathPoint P2: tibia_l (0.02472649 -0.1877637 -0.01260952)
      PathPoint P3: tibia_l (0.02295328 -0.3604551 0.01300357)
      PathPoint P4: calcn_l (0.1127671 0.01721487 0.0294974)
      FiberForceLengthCurve: strain_at_zero_force=0.1892237 strain_at_one_norm_force=0.7076768
          stiffness_at_low_force=0.2 stiffness_at_one_norm_force=3.85763 curviness=0.75
    Millard2012EquilibriumMuscle tibpost_l: max_isometric_force=1730.154 optimal_fiber_length=0.03713193
        tendon_slack_length=0.2758172 pennation_angle_at_optimal=0.2264891
      PathPoint P1: tibia_l (-0.004038988 -0.1284595 -0.01014673)
      PathPoint P2: tibia_l (-0.01615595 -0.360061 0.01723958)
      PathPoint P3: calcn_l (0.04032923 0.03230207 0.02765985)
      PathPoint P4: calcn_l (0.07466226 0.01537733 0.02717629)
      FiberForceLengthCurve: strain_at_zero_force=-0.1916705 strain_at_one_norm_force=0.6862359
          stiffness_at_low_force=0.2 stiffness_at_one_norm_force=2.278147 curviness=0.75
    Millard2012EquilibriumMuscle vasint_l: max_isometric_force=1697.361 optimal_fiber_length=0.114942
        tendon_slack_length=0.2013941 pennation_angle_at_optimal=0.06309973
      PathPoint P1: femur_l (0.02847375 -0.1889086 -0.03043746)
      PathPoint P2: femur_l (0.03289209 -0.2046183 -0.02798283)
      PathPoint P3: patella_l (0.005694751 0.04712897 0.0005891121)
      PathPoint P4: patella_l (0.004909268 0.002425178 0.0003829229)
      PathPoint P5: tibia_l (0.03208533 -0.06225953 -0.0004236012)
      PathWrap: wrap_object=KnExt_at_fem_l method=hybrid
      FiberForceLengthCurve: strain_at_zero_force=0.1999153 strain_at_one_norm_force=0.8514363
          stiffness_at_low_force=0.2 stiffness_at_one_norm_force=3.06974 curviness=0.75
    Millard2012EquilibriumMuscle vaslat_l: max_isometric_force=5148.767 optimal_fiber_length=0.1149388
        tendon_slack_length=0.2171067 pennation_angle_at_optimal=0.2528673
      PathPoint P1: femur_l (0.004712897 -0.1820356 -0.03426669)
      PathPoint P2: femur_l (0.02641186 -0.2543983 -0.04015781)
      PathPoint P3: patella_l (0.01011309 0.04153241 -0.01384414)
      PathPoint P4: patella_l (0.004909268 0.002425178 -0.007196987)
      PathPoint P5: tibia_l (0.03205578 -0.06243685 -0.005033959)
      PathWrap: wrap_object=KnExtVL_at_fem_l method=hybrid
      FiberForceLengthCurve: strain_at_zero_force=0.1999632 strain_at_one_norm_force=0.8928189
          stiffness_at_low_force=0.2 stiffness_at_one_norm_force=2.886604 curviness=0.75
    Millard2012EquilibriumMuscle vasmed_l: max_isometric_force=2747.823 optimal_fiber_length=0.1080676
        tendon_slack_length=0.204346 pennation_angle_at_optimal=0.4222225
      PathPoint P1: femur_l (0.01374595 -0.2060911 -0.01845885)
      PathPoint P2: femur_l (0.03495399 -0.2718753 -0.0008836682)
      PathPoint P3: patella_l (0.006185677 0.04369248 0.01669151)
      PathPoint P4: patella_l (0.004909268 0.002425178 0.008345755)
      PathPoint P5: tibia_l (0.0314253 -0.06262402 0.006679108)
      PathWrap: wrap_object=KnExt_at_fem_l method=hybrid
      FiberForceLengthCurve: strain_at_zero_force=0.1999354 strain_at_one_norm_force=0.8518332
          stiffness_at_low_force=0.2 stiffness_at_one_norm_force=3.067965 curviness=0.75
    CoordinateActuator lumbar_ext: coordinate=lumbar_extension optimal_force=10
    CoordinateActuator lumbar_bend: coordinate=lumbar_bending optimal_force=10
    CoordinateActuator lumbar_rot: coordinate=lumbar_rotation optimal_force=10
    CoordinateActuator shoulder_flex_r: coordinate=arm_flex_r optimal_force=10
    CoordinateActuator shoulder_add_r: coordinate=arm_add_r optimal_force=10
    CoordinateActuator shoulder_rot_r: coordinate=arm_rot_r optimal_force=10
    CoordinateActuator elbow_flex_r: coordinate=elbow_flex_r optimal_force=10
    CoordinateActuator pro_sup_r: coordinate=pro_sup_r optimal_force=10
    CoordinateActuator shoulder_flex_l: coordinate=arm_flex_l optimal_force=10
    CoordinateActuator shoulder_add_l: coordinate=arm_add_l optimal_force=10
    CoordinateActuator shoulder_rot_l: coordinate=arm_rot_l optimal_force=10
    CoordinateActuator elbow_flex_l: coordinate=elbow_flex_l optimal_force=10
    CoordinateActuator pro_sup_l: coordinate=pro_sup_l optimal_force=10
    ExpressionBasedPointToPointForce coupling_thigh_r: body1=/bodyset/femur_r body2=/bodyset/exo_R_thigh
        point1=(0 -0.2 0) point2=(0 0 0) expression=3283.0*(0.1-d)+367.0*ddot
      PathPoint human_point: femur_r (0 -0.2 0)
      PathPoint exo_point: exo_R_thigh (0 0 0)
    ExpressionBasedPointToPointForce coupling_thigh_l: body1=/bodyset/femur_l body2=/bodyset/exo_L_thigh
        point1=(0 -0.2 0) point2=(0 0 0) expression=3283.0*(0.1-d)+367.0*ddot
      PathPoint human_point: femur_l (0 -0.2 0)
      PathPoint exo_point: exo_L_thigh (0 0 0)
    ExpressionBasedPointToPointForce coupling_shank_r: body1=/bodyset/tibia_r body2=/bodyset/exo_R_shank
        point1=(0 -0.2 0) point2=(0 0 0) expression=3283.0*(0.1-d)+367.0*ddot
      PathPoint human_point: tibia_r (0 -0.2 0)
      PathPoint exo_point: exo_R_shank (0 0 0)
    ExpressionBasedPointToPointForce coupling_shank_l: body1=/bodyset/tibia_l body2=/bodyset/exo_L_shank
        point1=(0 -0.2 0) point2=(0 0 0) expression=3283.0*(0.1-d)+367.0*ddot
      PathPoint human_point: tibia_l (0 -0.2 0)
      PathPoint exo_point: exo_L_shank (0 0 0)
    ObjectGroup right_leg: members=(addbrev_r addlong_r addmagDist_r addmagIsch_r addmagMid_r addmagProx_r bflh_r bfsh_r edl_r ehl_r fdl_r fhl_r gaslat_r gasmed_r glmax1_r glmax2_r glmax3_r glmed1_r glmed2_r glmed3_r glmin1_r glmin2_r glmin3_r grac_r iliacus_r perbrev_r perlong_r piri_r psoas_r recfem_r sart_r semimem_r semiten_r soleus_r tfl_r tibant_r tibpost_r vasint_r vaslat_r vasmed_r)
    ObjectGroup left_leg: members=(addbrev_l addlong_l addmagDist_l addmagIsch_l addmagMid_l addmagProx_l bflh_l bfsh_l edl_l ehl_l fdl_l fhl_l gaslat_l gasmed_l glmax1_l glmax2_l glmax3_l glmed1_l glmed2_l glmed3_l glmin1_l glmin2_l glmin3_l grac_l iliacus_l perbrev_l perlong_l piri_l psoas_l recfem_l sart_l semimem_l semiten_l soleus_l tfl_l tibant_l tibpost_l vasint_l vaslat_l vasmed_l)
    ObjectGroup hip_add_r: members=(addbrev_r addlong_r addmagDist_r addmagIsch_r addmagMid_r addmagProx_r bflh_r grac_r semimem_r semiten_r)
    ObjectGroup hip_abd_r: members=(glmax1_r glmed1_r glmed2_r glmed3_r glmin1_r glmin2_r glmin3_r piri_r sart_r tfl_r)
    ObjectGroup hip_flex_r: members=(addbrev_r addlong_r glmin1_r grac_r iliacus_r psoas_r recfem_r sart_r tfl_r)
    ObjectGroup hip_ext_r: members=(addlong_r addmagDist_r addmagIsch_r addmagMid_r addmagProx_r bflh_r glmax1_r glmax2_r glmax3_r glmed1_r glmed2_r glmed3_r glmin3_r semimem_r semiten_r)
    ObjectGroup hip_inrot_r: members=(glmed1_r glmed2_r glmed3_r glmin1_r iliacus_r psoas_r tfl_r)
    ObjectGroup hip_exrot_r: members=(glmin3_r piri_r)
    ObjectGroup knee_flex_r: members=(bflh_r bfsh_r gaslat_r gasmed_r grac_r sart_r semimem_r semiten_r)
    ObjectGroup knee_ext_r: members=(recfem_r vasint_r vaslat_r vasmed_r)
    ObjectGroup ankle_df_r: members=(edl_r ehl_r tibant_r)
    ObjectGroup ankle_pf_r: members=(fdl_r fhl_r gaslat_r gasmed_r perbrev_r perlong_r soleus_r tibpost_r)
    ObjectGroup everter_r: members=(edl_r perbrev_r perlong_r)
    ObjectGroup inverter_r: members=(ehl_r fdl_r fhl_r tibant_r tibpost_r)
    ObjectGroup hip_add_l: members=(addbrev_l addlong_l addmagDist_l addmagIsch_l addmagMid_l addmagProx_l bflh_l grac_l semimem_l semiten_l)
    ObjectGroup hip_abd_l: members=(glmax1_l glmed1_l glmed2_l glmed3_l glmin1_l glmin2_l glmin3_l piri_l sart_l tfl_l)
    ObjectGroup hip_flex_l: members=(addbrev_l addlong_l glmin1_l grac_l iliacus_l psoas_l recfem_l sart_l tfl_l)
    ObjectGroup hip_ext_l: members=(addlong_l addmagDist_l addmagIsch_l addmagMid_l addmagProx_l bflh_l glmax1_l glmax2_l glmax3_l glmed1_l glmed2_l glmed3_l glmin3_l semimem_l semiten_l)
    ObjectGroup hip_exrot_l: members=(glmin3_l piri_l)
    ObjectGroup hip_inrot_l: members=(glmed1_l glmed2_l glmed3_l glmin1_l iliacus_l psoas_l tfl_l)
    ObjectGroup knee_flex_l: members=(bflh_l bfsh_l gaslat_l gasmed_l grac_l sart_l semimem_l semiten_l)
    ObjectGroup knee_ext_l: members=(recfem_l vasint_l vaslat_l vasmed_l)
    ObjectGroup ankle_df_l: members=(edl_l ehl_l tibant_l)
    ObjectGroup ankle_pf_l: members=(fdl_l fhl_l gaslat_l gasmed_l perbrev_l perlong_l soleus_l tibpost_l)
    ObjectGroup everter_l: members=(edl_l perbrev_l perlong_l)
    ObjectGroup inverter_l: members=(ehl_l fdl_l fhl_l tibant_l tibpost_l)
  MarkerSet:
    Marker C7: torso (-0.07109902 0.3978577 0.004498013)
    Marker R_Shoulder: torso (-0.008452799 0.3707095 0.1577275)
    Marker L_Shoulder: torso (-0.01625635 0.3823601 -0.1556099)
    Marker R_Sternum: torso (0.05727601 0.3679555 0.01520426)
    Marker L_Sternum: torso (0.05840342 0.3655946 -0.02370796)
    Marker r.ASIS: pelvis (0.03062608 -0.009991016 0.1220731)
    Marker L.ASIS: pelvis (0.03354335 -0.00587549 -0.1242062)
    Marker r.PSIS: pelvis (-0.1529221 0.03403417 0.05559793)
    Marker L.PSIS: pelvis (-0.1556294 0.03529429 -0.06016621)
    Marker R_HJC: femur_r (-0.001428081 -0.00138363 0.0002727045)
    Marker L_HJC: femur_l (0.003439943 -0.00168613 0.000496347)
    Marker r_thigh1: femur_r (0.08446298 -0.09327953 0.06080993)
    Marker r_thigh2: femur_r (0.08837543 -0.2043636 0.06328473)
    Marker r_thigh3: femur_r (0.04604061 -0.2306296 0.1077951)
    Marker r_thigh4: femur_r (-0.01692397 -0.09964821 0.1103633)
    Marker r_thigh5: femur_r (-0.007400061 -0.2148759 0.1134437)
    Marker r_knee: femur_r (-0.0009645076 -0.3998152 0.075825)
    Marker r_mknee: femur_r (-0.021477 -0.3981215 -0.05679285)
    Marker r_shank_antsup: tibia_r (0.03113867 -0.103041 0.05884036)
    Marker r_sh2: tibia_r (0.02633378 -0.2144696 0.04639184)
    Marker r_sh3: tibia_r (-0.02333563 -0.1083398 0.1115891)
    Marker r_sh4: tibia_r (-0.04303509 -0.21737 0.0890164)
    Marker r_ankle: tibia_r (-0.02363246 -0.3805852 0.03824127)
    Marker r_mankle: tibia_r (-3.924591e-5 -0.3601998 -0.03961022)
    Marker r_toe: calcn_r (0.1842831 0.01333315 0.01376483)
    Marker r_5meta: calcn_r (0.1488105 -0.005637115 0.05636531)
    Marker r_calc: calcn_r (-0.01413885 0.01630876 -0.01968936)
    Marker L_thigh1: femur_l (0.06816554 -0.1004735 -0.07786659)
    Marker L_thigh2: femur_l (0.07782083 -0.2389259 -0.07324226)
    Marker L_thigh3: femur_l (-0.03893423 -0.1037834 -0.1142136)
    Marker L_thigh4: femur_l (-0.03019184 -0.2440228 -0.1035303)
    Marker L_knee: femur_l (-0.006015671 -0.3955656 -0.07087202)
    Marker L_mknee: femur_l (-0.01098319 -0.393786 0.06074954)
    Marker L_ankle: tibia_l (-0.03198444 -0.3851126 -0.04414901)
    Marker L_shank_antsup: tibia_l (0.03079954 -0.0944598 -0.03042772)
    Marker L_sh2: tibia_l (-0.02666255 -0.07542261 -0.09757983)
    Marker L_sh3: tibia_l (-0.03231967 -0.1970863 -0.1050447)
    Marker L_mankle: tibia_l (-0.0009471407 -0.3660655 0.03547785)
    Marker L_toe: calcn_l (0.1872249 0.01697398 -0.006151063)
    Marker L_calc: calcn_l (-0.01371382 0.016819 0.01690431)
    Marker L_5meta: calcn_l (0.1453867 -0.004213564 -0.05762321)
    Marker R_elbow_med: humerus_r (0.005675602 -0.2864461 -0.04733938) fixed=true
    Marker R_elbow_lat: humerus_r (0.01077733 -0.2813338 0.04289643) fixed=true
    Marker R_wrist_radius: radius_r (-0.02829744 -0.2141932 0.03304046) fixed=true
    Marker R_wrist_ulna: radius_r (-0.02843783 -0.215012 -0.01039441) fixed=true
    Marker L_elbow_med: humerus_l (0.005675602 -0.2864461 0.04733938) fixed=true
    Marker L_elbow_lat: humerus_l (0.01077733 -0.2813338 -0.04289643) fixed=true
    Marker L_wrist_radius: radius_l (-0.03385275 -0.2162024 -0.03421327) fixed=true
    Marker L_wrist_ulna: radius_l (-0.03834205 -0.2163362 0.005365746) fixed=true
    Marker marker_exo_R_feet: exo_R_feet (-0.06130567 0.02194587 -0.01202971)
    Marker marker_exo_L_feet: exo_L_feet (-0.06088064 0.02359259 0.009244665)
